// SBML level 2 version 1

function Function_for_reaction_15b(mw7ff2e94a_ac19_47ed_9127_14d385a1e544, STAT1_CYTOSOL, mwf8062aeb_69d6_416b_b877_9687ef6fbc80, CYTOSOL)
  mw7ff2e94a_ac19_47ed_9127_14d385a1e544*STAT1_CYTOSOL*CYTOSOL/(mwf8062aeb_69d6_416b_b877_9687ef6fbc80 + STAT1_CYTOSOL*CYTOSOL)/CYTOSOL;
end

function Function_for_reaction_22(SOCS1_NUCLEUS, mw5805aaa6_5a0a_495b_a21b_16e6ba6f39bc, NUCLEUS)
  mw5805aaa6_5a0a_495b_a21b_16e6ba6f39bc*SOCS1_NUCLEUS*NUCLEUS;
end

function Function_for_reaction_23(JAK2_1, mw658feef9_67a1_431f_95fa_7358c6b294d2, mw8d03d46b_3832_4fe6_8a6b_467ef38af206, SOCS1_CYTOSOL, mwf50b6519_aaf9_4cb0_a651_d5a3159d7390, CYTOSOL)
  mw658feef9_67a1_431f_95fa_7358c6b294d2*JAK2_1*CYTOSOL/(mw8d03d46b_3832_4fe6_8a6b_467ef38af206*(1 + SOCS1_CYTOSOL*CYTOSOL/mwf50b6519_aaf9_4cb0_a651_d5a3159d7390) + JAK2_1*CYTOSOL)/CYTOSOL;
end

function Function_for_reaction_3(mw0930c7cf_99a6_4a20_a33d_02fd90e424bb, MyD88, CYTOSOL)
  mw0930c7cf_99a6_4a20_a33d_02fd90e424bb*MyD88*CYTOSOL/CYTOSOL;
end

function Function_for_reaction_4(IRAK1_IRAK4, mw5b78650d_d92f_4602_bbe9_66d900ff312e, CYTOSOL)
  mw5b78650d_d92f_4602_bbe9_66d900ff312e*IRAK1_IRAK4*CYTOSOL/CYTOSOL;
end

function Function_for_reaction_5(mwec4950e3_ecf8_4077_9cd1_b70818e911b9, TRAF6, CYTOSOL)
  mwec4950e3_ecf8_4077_9cd1_b70818e911b9*TRAF6*CYTOSOL/CYTOSOL;
end

function Function_for_reaction_6(mw9c4a9937_faff_4853_8a76_d17a084948d9, TAK1_TAB1_2, CYTOSOL)
  mw9c4a9937_faff_4853_8a76_d17a084948d9*TAK1_TAB1_2*CYTOSOL/CYTOSOL;
end

function Function_for_reaction_7(IKKbeta, mwb8d480f9_5783_4feb_aaf1_2f861b09e009, CYTOSOL)
  mwb8d480f9_5783_4feb_aaf1_2f861b09e009*IKKbeta*CYTOSOL/CYTOSOL;
end

function Function_for_reaction_10(IL6_NUCLEUS, mw58dfe861_b815_48b4_89e9_6f71cccb561e, NUCLEUS)
  mw58dfe861_b815_48b4_89e9_6f71cccb561e*IL6_NUCLEUS*NUCLEUS;
end

function Function_for_reaction_11(IL6_CYTOSOL, mwdf0efe39_4f88_4fc1_930b_55865b8d52f0, CYTOSOL)
  mwdf0efe39_4f88_4fc1_930b_55865b8d52f0*IL6_CYTOSOL*CYTOSOL;
end

function Function_for_reaction_13(mw4594ab28_d538_4a72_875a_d878e907020d, gp130, membrane, IL6_IL6R)
  mw4594ab28_d538_4a72_875a_d878e907020d*IL6_IL6R*membrane*gp130*membrane/membrane;
end

function Function_for_reaction_12(IL6_membrane, membrane, mw7b7a1d20_f258_4e3d_9234_62db60126326, IL6R)
  mw7b7a1d20_f258_4e3d_9234_62db60126326*IL6R*membrane*IL6_membrane*membrane/membrane;
end

function Function_for_reaction_15a(STAT3_CYTOSOL, mw5ea6c681_bf85_4ac5_9aac_536087a97950, mw65a608c7_1026_4108_bb3d_f3358430aaf2, CYTOSOL)
  mw65a608c7_1026_4108_bb3d_f3358430aaf2*STAT3_CYTOSOL*CYTOSOL/(mw5ea6c681_bf85_4ac5_9aac_536087a97950 + STAT3_CYTOSOL*CYTOSOL)/CYTOSOL;
end

function Function_for_reaction_14a(mw106608bc_52fb_40e5_babb_cbb58aaaeed4, membrane, IL6_IL6R_GP130)
  mw106608bc_52fb_40e5_babb_cbb58aaaeed4*IL6_IL6R_GP130*membrane;
end

function Function_for_reaction_8(NFkB_CYTOSOL, mwe0f7b31e_2efc_481e_90d0_e86c3b8d0be4, CYTOSOL)
  mwe0f7b31e_2efc_481e_90d0_e86c3b8d0be4*NFkB_CYTOSOL*CYTOSOL;
end

function Function_for_reaction_9(mw1981fa4d_c122_41a6_8c85_55a49d408c00, mw340bc412_34ab_498a_bd42_47dd6cf025bd, mw6cf7ac60_5bab_4b73_bb47_dc064486f000, NFkB_NUCLEUS, NUCLEUS)
  mw1981fa4d_c122_41a6_8c85_55a49d408c00*(NFkB_NUCLEUS*NUCLEUS)^mw340bc412_34ab_498a_bd42_47dd6cf025bd/(mw6cf7ac60_5bab_4b73_bb47_dc064486f000 + (NFkB_NUCLEUS*NUCLEUS)^mw340bc412_34ab_498a_bd42_47dd6cf025bd)/NUCLEUS;
end

function Function_for_reaction_19(mw87e9394c_7eef_4271_85bc_d1b0a96db1f2, STAT1_P, CYTOSOL)
  mw87e9394c_7eef_4271_85bc_d1b0a96db1f2*STAT1_P*CYTOSOL/CYTOSOL;
end

function Function_for_reaction_20(_2_STAT1_CYTOSOL, mwd84cf612_edaf_4dd9_9abd_003cc0569864, CYTOSOL)
  mwd84cf612_edaf_4dd9_9abd_003cc0569864*_2_STAT1_CYTOSOL*CYTOSOL;
end

function Function_for_reaction_21(mw051e0a03_1d45_448b_be4a_9d489e1b3ff9, mw322ca6ab_81cf_4f6c_835e_48bb5f8b11de, _2_STAT1_NUCLEUS, NUCLEUS, mwf9b630f8_c8a5_4fd0_bef1_92819b1257d2)
  mw051e0a03_1d45_448b_be4a_9d489e1b3ff9*(_2_STAT1_NUCLEUS*NUCLEUS)^mwf9b630f8_c8a5_4fd0_bef1_92819b1257d2/(mw322ca6ab_81cf_4f6c_835e_48bb5f8b11de + (_2_STAT1_NUCLEUS*NUCLEUS)^mwf9b630f8_c8a5_4fd0_bef1_92819b1257d2)/NUCLEUS;
end

function Function_for_reaction_16(STAT3_P, mwe479dc91_2774_4239_8212_60a330a84a76, CYTOSOL)
  mwe479dc91_2774_4239_8212_60a330a84a76*STAT3_P*CYTOSOL/CYTOSOL;
end

function Function_for_reaction_17(_2_STAT3_CYTOSOL, mwf5ba0e23_9a0b_4bf6_b0ea_9fbc91843b5c, CYTOSOL)
  mwf5ba0e23_9a0b_4bf6_b0ea_9fbc91843b5c*_2_STAT3_CYTOSOL*CYTOSOL;
end

function Function_for_reaction_18(mw3bf6abba_fc8d_4254_bc9c_037ec64d3e12, mw4c1174b0_1cba_4d7c_bedb_c29d9f65c10c, _2_STAT3_NUCLEUS, mw85474b5d_1b19_4388_bcee_098fbb23f2e0, NUCLEUS)
  mw3bf6abba_fc8d_4254_bc9c_037ec64d3e12*(_2_STAT3_NUCLEUS*NUCLEUS)^mw4c1174b0_1cba_4d7c_bedb_c29d9f65c10c/(mw85474b5d_1b19_4388_bcee_098fbb23f2e0 + (_2_STAT3_NUCLEUS*NUCLEUS)^mw4c1174b0_1cba_4d7c_bedb_c29d9f65c10c)/NUCLEUS;
end

function Function_for_reaction_14b(membrane, mwd01d5494_fdcd_494e_8652_87201fa5b291, IL6_IL6R_GP130)
  mwd01d5494_fdcd_494e_8652_87201fa5b291*IL6_IL6R_GP130*membrane;
end

function Function_for_reaction_28(STAT1_NUCLEUS, mw5b67154e_1851_4ba0_9491_7a14b2064c42, NUCLEUS)
  mw5b67154e_1851_4ba0_9491_7a14b2064c42*STAT1_NUCLEUS*NUCLEUS;
end

function Function_for_reaction_24(mw202bb744_d70a_4cf2_b2db_0d9d360bdfb5, IKKbeta, CYTOSOL)
  mw202bb744_d70a_4cf2_b2db_0d9d360bdfb5*IKKbeta*CYTOSOL/CYTOSOL;
end

function Function_for_reaction_25(mw3288f227_0208_435a_a41c_b1778f50008c, TLP2, CYTOSOL)
  mw3288f227_0208_435a_a41c_b1778f50008c*TLP2*CYTOSOL/CYTOSOL;
end

function Function_for_reaction_26(MKK1_2, mwe250484c_acc9_4453_9eb6_49cda54b2f1e, CYTOSOL)
  mwe250484c_acc9_4453_9eb6_49cda54b2f1e*MKK1_2*CYTOSOL/CYTOSOL;
end

function Function_for_reaction_27(mw2ba0a425_a224_4fa1_affc_bcc206027a3e, STAT3_CYTOSOL, mw8f586bdf_8d42_49c1_807a_670a1c49cbd9, CYTOSOL)
  mw8f586bdf_8d42_49c1_807a_670a1c49cbd9*STAT3_CYTOSOL*CYTOSOL/(mw2ba0a425_a224_4fa1_affc_bcc206027a3e + STAT3_CYTOSOL*CYTOSOL)/CYTOSOL;
end

function Function_for_reaction_34(STAT3_NUCLEUS, NUCLEUS, mwe808b2da_9ed2_421e_a8d9_3c3534d42ee0)
  mwe808b2da_9ed2_421e_a8d9_3c3534d42ee0*STAT3_NUCLEUS*NUCLEUS;
end

function Function_for_reaction_29(IFN_gR, membrane, mw7246cef3_7a78_43b0_acb7_21533c394daa, IFN_g)
  mw7246cef3_7a78_43b0_acb7_21533c394daa*IFN_g*membrane*IFN_gR*membrane/membrane;
end

function Function_for_reaction_30(mw2081c907_9d37_48a0_8581_8b8f3d5f7148, membrane, IFNg_IFNgR)
  mw2081c907_9d37_48a0_8581_8b8f3d5f7148*IFNg_IFNgR*membrane;
end

function Function_for_reaction_31(JAK2, mw91a51f27_e4be_41a6_a967_b6a63c909652, mwd7b0f9fb_1180_47bb_b8c0_be2f89aa1c59, CYTOSOL)
  mw91a51f27_e4be_41a6_a967_b6a63c909652*JAK2*CYTOSOL/(mwd7b0f9fb_1180_47bb_b8c0_be2f89aa1c59 + JAK2*CYTOSOL)/CYTOSOL;
end

function Function_for_reaction_32(mw2a60d98a_bc06_4e05_b965_c920da8987dc, mw3c07a768_8e7a_49bb_8a1d_fdc92192f92b, JAK2, mw9704b67a_2c16_4ac7_a311_2096ab426758, SOCS1_CYTOSOL, CYTOSOL)
  mw3c07a768_8e7a_49bb_8a1d_fdc92192f92b*JAK2*CYTOSOL/(mw9704b67a_2c16_4ac7_a311_2096ab426758*(1 + SOCS1_CYTOSOL*CYTOSOL/mw2a60d98a_bc06_4e05_b965_c920da8987dc) + JAK2*CYTOSOL)/CYTOSOL;
end

function Function_for_reaction_33(mw9ca6d980_6fbd_4207_9f2c_c05e2b5b0502, _2_STAT1_NUCLEUS, mwcffa9e49_67c6_4908_9314_6c16030c8989, NUCLEUS, mwf32cef57_32ba_4c0f_bbaf_bbc90af4a8aa)
  mwf32cef57_32ba_4c0f_bbaf_bbc90af4a8aa*(_2_STAT1_NUCLEUS*NUCLEUS)^mwcffa9e49_67c6_4908_9314_6c16030c8989/(mw9ca6d980_6fbd_4207_9f2c_c05e2b5b0502 + (_2_STAT1_NUCLEUS*NUCLEUS)^mwcffa9e49_67c6_4908_9314_6c16030c8989)/NUCLEUS;
end

function Function_for_reaction_35(mw287bd1ba_fbc1_43a0_94ab_38a6336bbebb, mw2db26dbd_dda3_4770_b923_d2725a80ccba, _2_STAT3_NUCLEUS, mwb86b112e_674a_4e98_8ca4_3d0273a134d4, NUCLEUS)
  mwb86b112e_674a_4e98_8ca4_3d0273a134d4*(_2_STAT3_NUCLEUS*NUCLEUS)^mw2db26dbd_dda3_4770_b923_d2725a80ccba/(mw287bd1ba_fbc1_43a0_94ab_38a6336bbebb + (_2_STAT3_NUCLEUS*NUCLEUS)^mw2db26dbd_dda3_4770_b923_d2725a80ccba)/NUCLEUS;
end

function Function_for_reaction_14(mw1aca690a_9ee1_460f_bc28_780fb04c1a32, STAT1_CYTOSOL, mwf604d18f_ae32_4d08_bfef_f778aae8f24b, CYTOSOL)
  mwf604d18f_ae32_4d08_bfef_f778aae8f24b*STAT1_CYTOSOL*CYTOSOL/(mw1aca690a_9ee1_460f_bc28_780fb04c1a32 + STAT1_CYTOSOL*CYTOSOL)/CYTOSOL;
end

function Function_for_reaction_1(membrane, LPG, TLR6_1, mwf80a94ba_03ba_44f0_b793_4f60c20fd074, TLR2)
  mwf80a94ba_03ba_44f0_b793_4f60c20fd074*TLR2*membrane*TLR6_1*membrane*LPG*membrane/membrane;
end

function Function_for_reaction_2(TLR2_6_LPG, membrane, mwce7a28b5_2f60_4228_a88f_ccd3a6213c3e)
  mwce7a28b5_2f60_4228_a88f_ccd3a6213c3e*TLR2_6_LPG*membrane;
end

model Soni2018_IL6_induced_M2_Phenotype_in_Leishmania_major_infected_macrophage()
  // Soni2018 - IL6 induced M2 Phenotype in Leishmania major infected macrophage
  // IL-6 has been proposed to favor the development of Th2 responses and play an important role in the communication between cells of multicellular organisms. They are involved in the regulation of complex cellular processes such as proliferation, differentiation and act as key player during inflammation and immune response. Th2 cytokines play an immunoregulatory role in early infection. Literature says in mice infected with L. major, IL-6 may promote the development of both Th1 and Th2 responses. IL-4 is also considered to be the signature cytokine of Th-2 response. IL6 was initially characterized as a Th1 cytokine but later on it was proved to be a pleiotropic cytokine, secreted from different cell types including the macrophages. A major challenge is to understand how these complex non-linear processes are connected and regulated. Systems biology approaches may be used to tackle this challenge in an iterative process of quantitative mathematical analysis. In this study, we created an in silico model of IL6 mediated macrophage activation which suffers from an excessive impact of the negative feedback loop involving SOCS1. The strategy adopted in this framework may help to reduce the complexity of the leishmanial IL6 model analysis and also laydown various physiological or pathological conditions of IL6 signaling in future.

  // Compartments:
  compartment membrane = 1;
  compartment CYTOSOL = 1;
  compartment NUCLEUS in CYTOSOL = 1;

  // Species:
  species $TLR2 in membrane = 1000/membrane;  // substance in MWBUILTINUNIT_molecule
  species $TLR6_1 in membrane = 1000/membrane; TLR6_1 is "TLR6/1";  // substance in MWBUILTINUNIT_molecule
  species $IL6_IL6R in membrane = 1000/membrane; IL6_IL6R is "IL6-IL6R";  // substance in MWBUILTINUNIT_molecule
  species $IL6R in membrane = 100000/membrane;  // substance in MWBUILTINUNIT_molecule
  species $IL6_membrane in membrane = 1000/membrane;  // substance in MWBUILTINUNIT_molecule
  species $LPG in membrane = 1000/membrane;  // substance in MWBUILTINUNIT_molecule
  species IL6_IL6R_GP130 in membrane = 1000/membrane; IL6_IL6R_GP130 is "IL6-IL6R-GP130";  // substance in MWBUILTINUNIT_molecule
  species $IFN_g in membrane = 200/membrane; IFN_g is "IFN-g";  // substance in MWBUILTINUNIT_molecule
  species $IFN_gR in membrane = 150/membrane; IFN_gR is "IFN-gR";  // substance in MWBUILTINUNIT_molecule
  species IFNg_IFNgR in membrane = 800/membrane; IFNg_IFNgR is "IFNg-IFNgR";  // substance in MWBUILTINUNIT_molecule
  species $gp130 in membrane = 1000/membrane;  // substance in MWBUILTINUNIT_molecule
  species TLR2_6_LPG in membrane = 900/membrane; TLR2_6_LPG is "TLR2/6-LPG";  // substance in MWBUILTINUNIT_molecule
  species MyD88 in CYTOSOL = 800/CYTOSOL;  // substance in MWBUILTINUNIT_molecule
  species IRAK1_IRAK4 in CYTOSOL = 700/CYTOSOL; IRAK1_IRAK4 is "IRAK1-IRAK4";  // substance in MWBUILTINUNIT_molecule
  species TRAF6 in CYTOSOL = 600/CYTOSOL;  // substance in MWBUILTINUNIT_molecule
  species TAK1_TAB1_2 in CYTOSOL = 500/CYTOSOL; TAK1_TAB1_2 is "TAK1-TAB1/2";  // substance in MWBUILTINUNIT_molecule
  species IKKbeta in CYTOSOL = 400/CYTOSOL;  // substance in MWBUILTINUNIT_molecule
  species NFkB_CYTOSOL in CYTOSOL = 300/CYTOSOL;  // substance in MWBUILTINUNIT_molecule
  species IL6_CYTOSOL in CYTOSOL = 100/CYTOSOL;  // substance in MWBUILTINUNIT_molecule
  species STAT3_P in CYTOSOL = 90000/CYTOSOL; STAT3_P is "STAT3.P";  // substance in MWBUILTINUNIT_molecule
  species STAT1_P in CYTOSOL = 0; STAT1_P is "STAT1.P";  // substance in MWBUILTINUNIT_molecule
  species $JAK1_2 in CYTOSOL = 2000/CYTOSOL; JAK1_2 is "JAK1/2";  // substance in MWBUILTINUNIT_molecule
  species _2_STAT1_CYTOSOL in CYTOSOL = 0; _2_STAT1_CYTOSOL is "2.STAT1";  // substance in MWBUILTINUNIT_molecule
  species _2_STAT3_CYTOSOL in CYTOSOL = 80000/CYTOSOL; _2_STAT3_CYTOSOL is "2.STAT3";  // substance in MWBUILTINUNIT_molecule
  species $JAK2_1 in CYTOSOL = 2000/CYTOSOL; JAK2_1 is "JAK2/1";  // substance in MWBUILTINUNIT_molecule
  species SOCS1_CYTOSOL in CYTOSOL = 10000/CYTOSOL;  // substance in MWBUILTINUNIT_molecule
  species TLP2 in CYTOSOL = 200/CYTOSOL;  // substance in MWBUILTINUNIT_molecule
  species MKK1_2 in CYTOSOL = 250/CYTOSOL; MKK1_2 is "MKK1/2";  // substance in MWBUILTINUNIT_molecule
  species $ERK1_ERK2 in CYTOSOL = 100/CYTOSOL; ERK1_ERK2 is "ERK1/ERK2";  // substance in MWBUILTINUNIT_molecule
  species $JAK2 in CYTOSOL = 15000/CYTOSOL;  // substance in MWBUILTINUNIT_molecule
  species STAT1_CYTOSOL in CYTOSOL = 100/CYTOSOL;  // substance in MWBUILTINUNIT_molecule
  species STAT3_CYTOSOL in CYTOSOL = 20000/CYTOSOL;  // substance in MWBUILTINUNIT_molecule
  species NFkB_NUCLEUS in NUCLEUS = 200/NUCLEUS;  // substance in MWBUILTINUNIT_molecule
  species IL6_NUCLEUS in NUCLEUS = 250/NUCLEUS;  // substance in MWBUILTINUNIT_molecule
  species _2_STAT1_NUCLEUS in NUCLEUS = 0; _2_STAT1_NUCLEUS is "2.STAT1";  // substance in MWBUILTINUNIT_molecule
  species _2_STAT3_NUCLEUS in NUCLEUS = 9000/NUCLEUS; _2_STAT3_NUCLEUS is "2.STAT3";  // substance in MWBUILTINUNIT_molecule
  species SOCS3 in NUCLEUS = 0;  // substance in MWBUILTINUNIT_molecule
  species STAT1_NUCLEUS in NUCLEUS = 100/NUCLEUS;  // substance in MWBUILTINUNIT_molecule
  species STAT3_NUCLEUS in NUCLEUS = 100/NUCLEUS;  // substance in MWBUILTINUNIT_molecule
  species SOCS1_NUCLEUS in NUCLEUS = 50000/NUCLEUS;  // substance in MWBUILTINUNIT_molecule
  species iNOS in NUCLEUS = 0;
  species AIF in NUCLEUS = 0;

  // Reactions:
  reaction_3: MyD88 => IRAK1_IRAK4; CYTOSOL*Function_for_reaction_3(reaction_3_parameter_1, MyD88, CYTOSOL);
    reaction_3_parameter_1 = 0.24;
  reaction_4: IRAK1_IRAK4 => TRAF6; CYTOSOL*Function_for_reaction_4(IRAK1_IRAK4, reaction_4_parameter_1, CYTOSOL);
    reaction_4_parameter_1 = 0.22;
  reaction_5: TRAF6 => TAK1_TAB1_2; CYTOSOL*Function_for_reaction_5(reaction_5_parameter_1, TRAF6, CYTOSOL);
    reaction_5_parameter_1 = 0.19;
  reaction_6: TAK1_TAB1_2 => IKKbeta; CYTOSOL*Function_for_reaction_6(reaction_6_parameter_1, TAK1_TAB1_2, CYTOSOL);
    reaction_6_parameter_1 = 0.16;
  reaction_7: IKKbeta => NFkB_CYTOSOL; CYTOSOL*Function_for_reaction_7(IKKbeta, reaction_7_parameter_1, CYTOSOL);
    reaction_7_parameter_1 = 0.14;
  reaction_10: IL6_NUCLEUS => IL6_CYTOSOL; Function_for_reaction_10(IL6_NUCLEUS, reaction_10_parameter_1, NUCLEUS);
    reaction_10_parameter_1 = 0.095;
  reaction_11: IL6_CYTOSOL => $IL6_membrane; Function_for_reaction_11(IL6_CYTOSOL, reaction_11_parameter_1, CYTOSOL);
    reaction_11_parameter_1 = 0.08;
  reaction_13: $IL6_IL6R + $gp130 => IL6_IL6R_GP130; membrane*Function_for_reaction_13(reaction_13_parameter_1, gp130, membrane, IL6_IL6R);
    reaction_13_parameter_1 = 1e-15;
  reaction_12: $IL6R + $IL6_membrane => $IL6_IL6R; membrane*Function_for_reaction_12(IL6_membrane, membrane, reaction_12_parameter_1, IL6R);
    reaction_12_parameter_1 = 6e-5;
  reaction_15a: $JAK1_2 + STAT3_CYTOSOL => STAT3_P; CYTOSOL*Function_for_reaction_15a(STAT3_CYTOSOL, reaction_15a_parameter_1, reaction_15a_parameter_2, CYTOSOL);
    reaction_15a_parameter_1 = 1; reaction_15a_parameter_2 = 1;
  reaction_14a: IL6_IL6R_GP130 => $JAK1_2; Function_for_reaction_14a(reaction_14a_parameter_1, membrane, IL6_IL6R_GP130);
    reaction_14a_parameter_1 = 0.24;
  reaction_8: NFkB_CYTOSOL => NFkB_NUCLEUS; Function_for_reaction_8(NFkB_CYTOSOL, reaction_8_parameter_1, CYTOSOL);
    reaction_8_parameter_1 = 0.125;
  reaction_9: NFkB_NUCLEUS => IL6_NUCLEUS + STAT1_NUCLEUS + STAT3_NUCLEUS; NUCLEUS*Function_for_reaction_9(reaction_9_parameter_1, reaction_9_parameter_2, reaction_9_parameter_3, NFkB_NUCLEUS, NUCLEUS);
    reaction_9_parameter_1 = 400; reaction_9_parameter_2 = 1; reaction_9_parameter_3 = 2000;
  reaction_19: STAT1_P => _2_STAT1_CYTOSOL; CYTOSOL*Function_for_reaction_19(reaction_19_parameter_1, STAT1_P, CYTOSOL);
    reaction_19_parameter_1 = 0;
  reaction_20: _2_STAT1_CYTOSOL => _2_STAT1_NUCLEUS; Function_for_reaction_20(_2_STAT1_CYTOSOL, reaction_20_parameter_1, CYTOSOL);
    reaction_20_parameter_1 = 0;
  reaction_21: _2_STAT1_NUCLEUS => SOCS1_NUCLEUS; NUCLEUS*Function_for_reaction_21(reaction_21_parameter_1, reaction_21_parameter_2, _2_STAT1_NUCLEUS, NUCLEUS, reaction_21_parameter_3);
    reaction_21_parameter_1 = 0; reaction_21_parameter_2 = 0; reaction_21_parameter_3 = 0;
  reaction_16: STAT3_P => _2_STAT3_CYTOSOL; CYTOSOL*Function_for_reaction_16(STAT3_P, reaction_16_parameter_1, CYTOSOL);
    reaction_16_parameter_1 = 0.86;
  reaction_17: _2_STAT3_CYTOSOL => _2_STAT3_NUCLEUS; Function_for_reaction_17(_2_STAT3_CYTOSOL, reaction_17_parameter_1, CYTOSOL);
    reaction_17_parameter_1 = 0.1;
  reaction_18: _2_STAT3_NUCLEUS => AIF; NUCLEUS*Function_for_reaction_18(reaction_18_parameter_1, reaction_18_parameter_2, _2_STAT3_NUCLEUS, reaction_18_parameter_3, NUCLEUS);
    reaction_18_parameter_1 = 1000; reaction_18_parameter_2 = 1; reaction_18_parameter_3 = 700;
  reaction_14b: IL6_IL6R_GP130 => $JAK2_1; Function_for_reaction_14b(membrane, reaction_14b_parameter_1, IL6_IL6R_GP130);
    reaction_14b_parameter_1 = 0.002;
  reaction_15b: $JAK2_1 + STAT1_CYTOSOL => STAT1_P; CYTOSOL*Function_for_reaction_15b(reaction_15b_parameter_1, STAT1_CYTOSOL, reaction_15b_parameter_2, CYTOSOL);
    reaction_15b_parameter_1 = 1; reaction_15b_parameter_2 = 1;
  reaction_22: SOCS1_NUCLEUS => SOCS1_CYTOSOL; Function_for_reaction_22(SOCS1_NUCLEUS, reaction_22_parameter_1, NUCLEUS);
    reaction_22_parameter_1 = 0.3;
  reaction_23: SOCS1_CYTOSOL + $JAK2_1 => $JAK2_1 + SOCS1_CYTOSOL; CYTOSOL*Function_for_reaction_23(JAK2_1, reaction_23_parameter_1, reaction_23_parameter_2, SOCS1_CYTOSOL, reaction_23_parameter_3, CYTOSOL);
    reaction_23_parameter_1 = 1e-15; reaction_23_parameter_2 = 10; reaction_23_parameter_3 = 10;
  reaction_28: STAT1_NUCLEUS => STAT1_CYTOSOL; Function_for_reaction_28(STAT1_NUCLEUS, reaction_28_parameter_1, NUCLEUS);
    reaction_28_parameter_1 = 0.06;
  reaction_24: IKKbeta => TLP2; CYTOSOL*Function_for_reaction_24(reaction_24_parameter_1, IKKbeta, CYTOSOL);
    reaction_24_parameter_1 = 0.1;
  reaction_25: TLP2 => MKK1_2; CYTOSOL*Function_for_reaction_25(reaction_25_parameter_1, TLP2, CYTOSOL);
    reaction_25_parameter_1 = 0.09;
  reaction_26: MKK1_2 => $ERK1_ERK2; CYTOSOL*Function_for_reaction_26(MKK1_2, reaction_26_parameter_1, CYTOSOL);
    reaction_26_parameter_1 = 0.3;
  reaction_27: $ERK1_ERK2 + STAT3_CYTOSOL => STAT3_P; CYTOSOL*Function_for_reaction_27(reaction_27_parameter_1, STAT3_CYTOSOL, reaction_27_parameter_2, CYTOSOL);
    reaction_27_parameter_1 = 1; reaction_27_parameter_2 = 1;
  reaction_34: STAT3_NUCLEUS => STAT3_CYTOSOL; Function_for_reaction_34(STAT3_NUCLEUS, NUCLEUS, reaction_34_parameter_1);
    reaction_34_parameter_1 = 0.2;
  reaction_29: $IFN_g + $IFN_gR => IFNg_IFNgR; membrane*Function_for_reaction_29(IFN_gR, membrane, reaction_29_parameter_1, IFN_g);
    reaction_29_parameter_1 = 0.001;
  reaction_30: IFNg_IFNgR => $JAK2; Function_for_reaction_30(reaction_30_parameter_1, membrane, IFNg_IFNgR);
    reaction_30_parameter_1 = 0.1;
  reaction_31: $JAK2 => STAT1_P; CYTOSOL*Function_for_reaction_31(JAK2, reaction_31_parameter_1, reaction_31_parameter_2, CYTOSOL);
    reaction_31_parameter_1 = 1; reaction_31_parameter_2 = 1;
  reaction_32: SOCS1_CYTOSOL + $JAK2 => $JAK2 + SOCS1_CYTOSOL; CYTOSOL*Function_for_reaction_32(reaction_32_parameter_1, reaction_32_parameter_2, JAK2, reaction_32_parameter_3, SOCS1_CYTOSOL, CYTOSOL);
    reaction_32_parameter_1 = 10; reaction_32_parameter_2 = 1e-15; reaction_32_parameter_3 = 10;
  reaction_33: _2_STAT1_NUCLEUS => iNOS; NUCLEUS*Function_for_reaction_33(reaction_33_parameter_1, _2_STAT1_NUCLEUS, reaction_33_parameter_2, NUCLEUS, reaction_33_parameter_3);
    reaction_33_parameter_1 = 0; reaction_33_parameter_2 = 0; reaction_33_parameter_3 = 0;
  reaction_35: _2_STAT3_NUCLEUS => SOCS3; NUCLEUS*Function_for_reaction_35(reaction_35_parameter_1, reaction_35_parameter_2, _2_STAT3_NUCLEUS, reaction_35_parameter_3, NUCLEUS);
    reaction_35_parameter_1 = 10; reaction_35_parameter_2 = 1; reaction_35_parameter_3 = 10;
  reaction_14: $ERK1_ERK2 + STAT1_CYTOSOL => STAT1_P; CYTOSOL*Function_for_reaction_14(reaction_14_parameter_1, STAT1_CYTOSOL, reaction_14_parameter_2, CYTOSOL);
    reaction_14_parameter_1 = 1; reaction_14_parameter_2 = 1;
  reaction_1: $TLR2 + $TLR6_1 + $LPG => TLR2_6_LPG; membrane*Function_for_reaction_1(membrane, LPG, TLR6_1, reaction_1_parameter_1, TLR2);
    reaction_1_parameter_1 = 8e-9;
  reaction_2: TLR2_6_LPG => MyD88; Function_for_reaction_2(TLR2_6_LPG, membrane, reaction_2_parameter_1);
    reaction_2_parameter_1 = 0.23;

  // Unit definitions:
  unit MWBUILTINUNIT_molecule = 1.660539e-24 mole;
  unit MWDERIVEDUNIT_1__second = dimensionless / second; MWDERIVEDUNIT_1__second is "1/second";
  unit MWDERIVEDUNIT_1__molecule_second = 6.022142e23 dimensionless / (mole * second); MWDERIVEDUNIT_1__molecule_second is "1/(molecule*second)";
  unit MWDERIVEDUNIT_molecule__second = mole * 1.660539e-24 dimensionless / second; MWDERIVEDUNIT_molecule__second is "molecule/second";
  unit MWDERIVEDUNIT_1__molecule_molecule_second = 3.626619e47 dimensionless / (mole^2 * second); MWDERIVEDUNIT_1__molecule_molecule_second is "1/(molecule*molecule*second)";
end
