// SBML level 2 version 4

model In_vitro_SSU_assembly_reduced_model_40_C()
  // Towards a whole-cell model of ribosome biogenesis: Kinetic modeling of SSU assembly
  // Tyler M. Earnest1,2, Jonathan Lai3, Ke Chen3,4, Michael J. Hallock5, James R. Williamson6,7,8, Zaida Luthey-Schulten1,2,3,†
  // 1Center for the Physics of Living Cells, Urbana, IL, USA; 2Department of Physics, University of Illinois, Urbana, IL, USA; 3Department of Chemistry, University of Illinois, Urbana, IL, USA; 4Department of Bioengineering, University of California, San Diego, La Jolla, CA, USA; 5School of Chemical Sciences, University of Illinois, Urbana, IL USA; 6Department of Integrative Structural and Computational Biology, Scripps Research Institute, La Jolla, CA, USA; 7Department of Chemistry, Scripps Research Institute, La Jolla, CA, USA; 8Skaggs Institute for Chemical Biology, Scripps Research Institute, La Jolla, CA, USA
  // †Correspondence to zan@illinois.edu
  // doi:10.1016/j.bpj.2015.07.030
  // In vitro SSU assembly, reduced model @ 40°C

  // Compartments:
  compartment rxnVolume = 0.00059;

  // Species:
  // Assembly intermediate 16S
  species R in rxnVolume = 4.066667e-8;
  // Assembly intermediate 000:20
  species Rs20 in rxnVolume = 0;
  // Assembly intermediate 000:4
  species Rs4 in rxnVolume = 0;
  // Assembly intermediate 000:17
  species Rs17 in rxnVolume = 0;
  // Assembly intermediate 000:4,20
  species Rs4s20 in rxnVolume = 0;
  // Assembly intermediate 000:4,17
  species Rs4s17 in rxnVolume = 0;
  // Assembly intermediate 000:4,16,20
  species Rs4s16s20 in rxnVolume = 0;
  // Assembly intermediate 000:17,20
  species Rs17s20 in rxnVolume = 0;
  // Assembly intermediate 100
  species Rs4s17s20 in rxnVolume = 0;
  // Assembly intermediate 200
  species Rs4s16s17s20 in rxnVolume = 0;
  // Assembly intermediate 000:8
  species Rs8 in rxnVolume = 0;
  // Assembly intermediate 000:4,8
  species Rs4s8 in rxnVolume = 0;
  // Assembly intermediate 000:8,17
  species Rs8s17 in rxnVolume = 0;
  // Assembly intermediate 000:4,8,20
  species Rs4s8s20 in rxnVolume = 0;
  // Assembly intermediate 000:4,8,17
  species Rs4s8s17 in rxnVolume = 0;
  // Assembly intermediate 000:4,8,16,20
  species Rs4s8s16s20 in rxnVolume = 0;
  // Assembly intermediate 100:8
  species Rs4s8s17s20 in rxnVolume = 0;
  // Assembly intermediate 200:8
  species Rs4s8s16s17s20 in rxnVolume = 0;
  // Assembly intermediate 231:9
  species Rs4s6s7s8s9s11s15s16s17s20 in rxnVolume = 0;
  // Assembly intermediate 231:9,10
  species Rs4s6s7s8s9s10s11s15s16s17s20 in rxnVolume = 0;
  // Assembly intermediate 022:4,10,17
  species Rs4s6s7s8s9s10s13s15s17s19 in rxnVolume = 0;
  // Assembly intermediate 000:15
  species Rs15 in rxnVolume = 0;
  // Assembly intermediate 000:15,20
  species Rs15s20 in rxnVolume = 0;
  // Assembly intermediate 000:4,15
  species Rs4s15 in rxnVolume = 0;
  // Assembly intermediate 000:15,17
  species Rs15s17 in rxnVolume = 0;
  // Assembly intermediate 000:4,15,16,20
  species Rs4s15s16s20 in rxnVolume = 0;
  // Assembly intermediate 000:4,15,17
  species Rs4s15s17 in rxnVolume = 0;
  // Assembly intermediate 000:6,15
  species Rs6s15 in rxnVolume = 0;
  // Assembly intermediate 000:6,15,20
  species Rs6s15s20 in rxnVolume = 0;
  // Assembly intermediate 000:4,6,15
  species Rs4s6s15 in rxnVolume = 0;
  // Assembly intermediate 000:6,15,17
  species Rs6s15s17 in rxnVolume = 0;
  // Assembly intermediate 000:4,6,15,20
  species Rs4s6s15s20 in rxnVolume = 0;
  // Assembly intermediate 000:4,6,15,16,20
  species Rs4s6s15s16s20 in rxnVolume = 0;
  // Assembly intermediate 000:6,15,17,20
  species Rs6s15s17s20 in rxnVolume = 0;
  // Assembly intermediate 000:4,6,15,17
  species Rs4s6s15s17 in rxnVolume = 0;
  // Assembly intermediate 010
  species Rs8s15 in rxnVolume = 0;
  // Assembly intermediate 010:4
  species Rs4s8s15 in rxnVolume = 0;
  // Assembly intermediate 010:4,16,20
  species Rs4s8s15s16s20 in rxnVolume = 0;
  // Assembly intermediate 010:4,17
  species Rs4s8s15s17 in rxnVolume = 0;
  // Assembly intermediate 020
  species Rs6s8s15 in rxnVolume = 0;
  // Assembly intermediate 020:4
  species Rs4s6s8s15 in rxnVolume = 0;
  // Assembly intermediate 020:17
  species Rs6s8s15s17 in rxnVolume = 0;
  // Assembly intermediate 020:4,20
  species Rs4s6s8s15s20 in rxnVolume = 0;
  // Assembly intermediate 020:4,17
  species Rs4s6s8s15s17 in rxnVolume = 0;
  // Assembly intermediate 020:4,16,20
  species Rs4s6s8s15s16s20 in rxnVolume = 0;
  // Assembly intermediate 021:4,17
  species Rs4s6s7s8s15s17 in rxnVolume = 0;
  // Assembly intermediate 221:5
  species Rs4s5s6s7s8s15s16s17s20 in rxnVolume = 0;
  // Assembly intermediate 021:4,9,17
  species Rs4s6s7s8s9s15s17 in rxnVolume = 0;
  // Assembly intermediate 221:5,9
  species Rs4s5s6s7s8s9s15s16s17s20 in rxnVolume = 0;
  // Assembly intermediate 221:9,10
  species Rs4s6s7s8s9s10s15s16s17s20 in rxnVolume = 0;
  // Assembly intermediate 200:6,11,15
  species Rs4s6s11s15s16s17s20 in rxnVolume = 0;
  // Assembly intermediate 030:4,17
  species Rs4s6s8s11s15s17 in rxnVolume = 0;
  // Assembly intermediate 130
  species Rs4s6s8s11s15s17s20 in rxnVolume = 0;
  // Assembly intermediate 030:4,16,20
  species Rs4s6s8s11s15s16s20 in rxnVolume = 0;
  // Assembly intermediate 230
  species Rs4s6s8s11s15s16s17s20 in rxnVolume = 0;
  // Assembly intermediate 230:5
  species Rs4s5s6s8s11s15s16s17s20 in rxnVolume = 0;
  // Assembly intermediate 231
  species Rs4s6s7s8s11s15s16s17s20 in rxnVolume = 0;
  // Assembly intermediate 231:5
  species Rs4s5s6s7s8s11s15s16s17s20 in rxnVolume = 0;
  // Assembly intermediate 231:5,9
  species Rs4s5s6s7s8s9s11s15s16s17s20 in rxnVolume = 0;
  // Assembly intermediate 231:5,9,10
  species Rs4s5s6s7s8s9s10s11s15s16s17s20 in rxnVolume = 0;
  // Assembly intermediate 220:12
  species Rs4s6s8s12s15s16s17s20 in rxnVolume = 0;
  // Assembly intermediate 320
  species Rs4s5s6s8s12s15s16s17s20 in rxnVolume = 0;
  // Assembly intermediate 221:12
  species Rs4s6s7s8s12s15s16s17s20 in rxnVolume = 0;
  // Assembly intermediate 321
  species Rs4s5s6s7s8s12s15s16s17s20 in rxnVolume = 0;
  // Assembly intermediate 221:9,12
  species Rs4s6s7s8s9s12s15s16s17s20 in rxnVolume = 0;
  // Assembly intermediate 321:9
  species Rs4s5s6s7s8s9s12s15s16s17s20 in rxnVolume = 0;
  // Assembly intermediate 230:12
  species Rs4s6s8s11s12s15s16s17s20 in rxnVolume = 0;
  // Assembly intermediate 330
  species Rs4s5s6s8s11s12s15s16s17s20 in rxnVolume = 0;
  // Assembly intermediate 231:12
  species Rs4s6s7s8s11s12s15s16s17s20 in rxnVolume = 0;
  // Assembly intermediate 331
  species Rs4s5s6s7s8s11s12s15s16s17s20 in rxnVolume = 0;
  // Assembly intermediate 331:19
  species Rs4s5s6s7s8s11s12s15s16s17s19s20 in rxnVolume = 0;
  // Assembly intermediate 231:9,12
  species Rs4s6s7s8s9s11s12s15s16s17s20 in rxnVolume = 0;
  // Assembly intermediate 331:9
  species Rs4s5s6s7s8s9s11s12s15s16s17s20 in rxnVolume = 0;
  // Assembly intermediate 331:9,19
  species Rs4s5s6s7s8s9s11s12s15s16s17s19s20 in rxnVolume = 0;
  // Assembly intermediate 331:9,10
  species Rs4s5s6s7s8s9s10s11s12s15s16s17s20 in rxnVolume = 0;
  // Assembly intermediate 331:3,9,10
  species Rs3s4s5s6s7s8s9s10s11s12s15s16s17s20 in rxnVolume = 0;
  // Assembly intermediate 221:13
  species Rs4s6s7s8s13s15s16s17s20 in rxnVolume = 0;
  // Assembly intermediate 221:5,13
  species Rs4s5s6s7s8s13s15s16s17s20 in rxnVolume = 0;
  // Assembly intermediate 221:9,13
  species Rs4s6s7s8s9s13s15s16s17s20 in rxnVolume = 0;
  // Assembly intermediate 021:4,9,13,17
  species Rs4s6s7s8s9s13s15s17 in rxnVolume = 0;
  // Assembly intermediate 221:5,9,13
  species Rs4s5s6s7s8s9s13s15s16s17s20 in rxnVolume = 0;
  // Assembly intermediate 021:4,9,10,13,17
  species Rs4s6s7s8s9s10s13s15s17 in rxnVolume = 0;
  // Assembly intermediate 221:9,10,13
  species Rs4s6s7s8s9s10s13s15s16s17s20 in rxnVolume = 0;
  // Assembly intermediate 221:5,9,10,13
  species Rs4s5s6s7s8s9s10s13s15s16s17s20 in rxnVolume = 0;
  // Assembly intermediate 221:3,5,9,10,13
  species Rs3s4s5s6s7s8s9s10s13s15s16s17s20 in rxnVolume = 0;
  // Assembly intermediate 222:3,5,10
  species Rs3s4s5s6s7s8s9s10s13s15s16s17s19s20 in rxnVolume = 0;
  // Assembly intermediate 231:5,13
  species Rs4s5s6s7s8s11s13s15s16s17s20 in rxnVolume = 0;
  // Assembly intermediate 231:5,9,13
  species Rs4s5s6s7s8s9s11s13s15s16s17s20 in rxnVolume = 0;
  // Assembly intermediate 232:5
  species Rs4s5s6s7s8s9s11s13s15s16s17s19s20 in rxnVolume = 0;
  // Assembly intermediate 231:13
  species Rs4s6s7s8s11s13s15s16s17s20 in rxnVolume = 0;
  // Assembly intermediate 231:9,10,13
  species Rs4s6s7s8s9s10s11s13s15s16s17s20 in rxnVolume = 0;
  // Assembly intermediate 231:5,9,10,13
  species Rs4s5s6s7s8s9s10s11s13s15s16s17s20 in rxnVolume = 0;
  // Assembly intermediate 231:3,5,9,10,13
  species Rs3s4s5s6s7s8s9s10s11s13s15s16s17s20 in rxnVolume = 0;
  // Assembly intermediate 222
  species Rs4s6s7s8s9s13s15s16s17s19s20 in rxnVolume = 0;
  // Assembly intermediate 232:3,5,10
  species Rs3s4s5s6s7s8s9s10s11s13s15s16s17s19s20 in rxnVolume = 0;
  // Assembly intermediate 221:9,12,13
  species Rs4s6s7s8s9s12s13s15s16s17s20 in rxnVolume = 0;
  // Assembly intermediate 321:9,13
  species Rs4s5s6s7s8s9s12s13s15s16s17s20 in rxnVolume = 0;
  // Assembly intermediate 221:9,10,12,13
  species Rs4s6s7s8s9s10s12s13s15s16s17s20 in rxnVolume = 0;
  // Assembly intermediate 321:9,10,13
  species Rs4s5s6s7s8s9s10s12s13s15s16s17s20 in rxnVolume = 0;
  // Assembly intermediate 321:3,9,10,13
  species Rs3s4s5s6s7s8s9s10s12s13s15s16s17s20 in rxnVolume = 0;
  // Assembly intermediate 322:3,10
  species Rs3s4s5s6s7s8s9s10s12s13s15s16s17s19s20 in rxnVolume = 0;
  // Assembly intermediate 231:9,13
  species Rs4s6s7s8s9s11s13s15s16s17s20 in rxnVolume = 0;
  // Assembly intermediate 331:13
  species Rs4s5s6s7s8s11s12s13s15s16s17s20 in rxnVolume = 0;
  // Assembly intermediate 331:13,19
  species Rs4s5s6s7s8s11s12s13s15s16s17s19s20 in rxnVolume = 0;
  // Assembly intermediate 231:9,12,13
  species Rs4s6s7s8s9s11s12s13s15s16s17s20 in rxnVolume = 0;
  // Assembly intermediate 331:9,13
  species Rs4s5s6s7s8s9s11s12s13s15s16s17s20 in rxnVolume = 0;
  // Assembly intermediate 332
  species Rs4s5s6s7s8s9s11s12s13s15s16s17s19s20 in rxnVolume = 0;
  // Assembly intermediate 231:9,10,12,13
  species Rs4s6s7s8s9s10s11s12s13s15s16s17s20 in rxnVolume = 0;
  // Assembly intermediate 232:10,12
  species Rs4s6s7s8s9s10s11s12s13s15s16s17s19s20 in rxnVolume = 0;
  // Assembly intermediate 331:9,10,13
  species Rs4s5s6s7s8s9s10s11s12s13s15s16s17s20 in rxnVolume = 0;
  // Assembly intermediate 331:3,9,10,13
  species Rs3s4s5s6s7s8s9s10s11s12s13s15s16s17s20 in rxnVolume = 0;
  // Assembly intermediate 332:10
  species Rs4s5s6s7s8s9s10s11s12s13s15s16s17s19s20 in rxnVolume = 0;
  // Assembly intermediate 332:3,10
  species Rs3s4s5s6s7s8s9s10s11s12s13s15s16s17s19s20 in rxnVolume = 0;
  // Assembly intermediate 222:10
  species Rs4s6s7s8s9s10s13s15s16s17s19s20 in rxnVolume = 0;
  // Assembly intermediate 100:6,15
  species Rs4s6s15s17s20 in rxnVolume = 0;
  // Assembly intermediate 232
  species Rs4s6s7s8s9s11s13s15s16s17s19s20 in rxnVolume = 0;
  // Assembly intermediate 120
  species Rs4s6s8s15s17s20 in rxnVolume = 0;
  // Assembly intermediate 331:9,14,19
  species Rs4s5s6s7s8s9s11s12s14s15s16s17s19s20 in rxnVolume = 0;
  // Assembly intermediate 200:15
  species Rs4s15s16s17s20 in rxnVolume = 0;
  // Assembly intermediate 200:6,15
  species Rs4s6s15s16s17s20 in rxnVolume = 0;
  // Assembly intermediate 201:6,15
  species Rs4s6s7s15s16s17s20 in rxnVolume = 0;
  // Assembly intermediate 210
  species Rs4s8s15s16s17s20 in rxnVolume = 0;
  // Assembly intermediate 220
  species Rs4s6s8s15s16s17s20 in rxnVolume = 0;
  // Assembly intermediate 220:5
  species Rs4s5s6s8s15s16s17s20 in rxnVolume = 0;
  // Assembly intermediate 221
  species Rs4s6s7s8s15s16s17s20 in rxnVolume = 0;
  // Assembly intermediate 022:4,10,14,17
  species Rs4s6s7s8s9s10s13s14s15s17s19 in rxnVolume = 0;
  // Assembly intermediate 122:10,14
  species Rs4s6s7s8s9s10s13s14s15s17s19s20 in rxnVolume = 0;
  // Assembly intermediate 222:10,14
  species Rs4s6s7s8s9s10s13s14s15s16s17s19s20 in rxnVolume = 0;
  // Assembly intermediate 222:5,10,14
  species Rs4s5s6s7s8s9s10s13s14s15s16s17s19s20 in rxnVolume = 0;
  // Assembly intermediate 223:5
  species Rs3s4s5s6s7s8s9s10s13s14s15s16s17s19s20 in rxnVolume = 0;
  // Assembly intermediate 201:6,9,15
  species Rs4s6s7s9s15s16s17s20 in rxnVolume = 0;
  // Assembly intermediate 232:14
  species Rs4s6s7s8s9s11s13s14s15s16s17s19s20 in rxnVolume = 0;
  // Assembly intermediate 232:5,14
  species Rs4s5s6s7s8s9s11s13s14s15s16s17s19s20 in rxnVolume = 0;
  // Assembly intermediate 232:10
  species Rs4s6s7s8s9s10s11s13s15s16s17s19s20 in rxnVolume = 0;
  // Assembly intermediate 232:5,10
  species Rs4s5s6s7s8s9s10s11s13s15s16s17s19s20 in rxnVolume = 0;
  // Assembly intermediate 221:9
  species Rs4s6s7s8s9s15s16s17s20 in rxnVolume = 0;
  // Assembly intermediate 232:10,14
  species Rs4s6s7s8s9s10s11s13s14s15s16s17s19s20 in rxnVolume = 0;
  // Assembly intermediate 232:5,10,14
  species Rs4s5s6s7s8s9s10s11s13s14s15s16s17s19s20 in rxnVolume = 0;
  // Assembly intermediate 233:5
  species Rs3s4s5s6s7s8s9s10s11s13s14s15s16s17s19s20 in rxnVolume = 0;
  // Assembly intermediate 222:10,12,14
  species Rs4s6s7s8s9s10s12s13s14s15s16s17s19s20 in rxnVolume = 0;
  // Assembly intermediate 323
  species Rs3s4s5s6s7s8s9s10s12s13s14s15s16s17s19s20 in rxnVolume = 0;
  // Assembly intermediate 332:14
  species Rs4s5s6s7s8s9s11s12s13s14s15s16s17s19s20 in rxnVolume = 0;
  // Assembly intermediate 232:10,12,14
  species Rs4s6s7s8s9s10s11s12s13s14s15s16s17s19s20 in rxnVolume = 0;
  // Assembly intermediate 332:10,14
  species Rs4s5s6s7s8s9s10s11s12s13s14s15s16s17s19s20 in rxnVolume = 0;
  // Assembly intermediate 30S
  species Rs3s4s5s6s7s8s9s10s11s12s13s14s15s16s17s19s20 in rxnVolume = 0;
  // Free S3
  species s3 in rxnVolume = 6.106667e-8;
  // Free S4
  species s4 in rxnVolume = 6.106667e-8;
  // Free S5
  species s5 in rxnVolume = 6.106667e-8;
  // Free S6
  species s6 in rxnVolume = 6.106667e-8;
  // Free S7
  species s7 in rxnVolume = 6.106667e-8;
  // Free S8
  species s8 in rxnVolume = 6.106667e-8;
  // Free S9
  species s9 in rxnVolume = 6.106667e-8;
  // Free S10
  species s10 in rxnVolume = 6.106667e-8;
  // Free S11
  species s11 in rxnVolume = 6.106667e-8;
  // Free S12
  species s12 in rxnVolume = 6.106667e-8;
  // Free S13
  species s13 in rxnVolume = 6.106667e-8;
  // Free S14
  species s14 in rxnVolume = 6.106667e-8;
  // Free S15
  species s15 in rxnVolume = 6.106667e-8;
  // Free S16
  species s16 in rxnVolume = 6.106667e-8;
  // Free S17
  species s17 in rxnVolume = 6.106667e-8;
  // Free S19
  species s19 in rxnVolume = 6.106667e-8;
  // Free S20
  species s20 in rxnVolume = 6.106667e-8;

  // Parameters:
  s3_def = 875437.8 per_M_per_s;
  s4_def = 1693335 per_M_per_s;
  s5_def = 53860.79 per_M_per_s;
  s6_def = 3.143623e7 per_M_per_s;
  s7_def = 41198.75 per_M_per_s;
  s8_def = 417520.7 per_M_per_s;
  s9_def = 801510.4 per_M_per_s;
  s10_def = 473862.8 per_M_per_s;
  s11_def = 59575.43 per_M_per_s;
  s12_def = 24938.35 per_M_per_s;
  s13_def = 530862 per_M_per_s;
  s14_def = 1749240 per_M_per_s;
  s15_def = 991510.8 per_M_per_s;
  s16_def = 1.428953e7 per_M_per_s;
  s17_def = 483741 per_M_per_s;
  s19_def = 240116.9 per_M_per_s;
  s20_def = 300694.4 per_M_per_s;

  // Reactions:
  s17_0000: s17 + Rs4 => Rs4s17; rxnVolume*s17_def*s17*Rs4;
  s8_0000: s8 + Rs4 => Rs4s8; rxnVolume*s8_def*s8*Rs4;
  s4_0000: s4 + Rs8 => Rs4s8; rxnVolume*s4_def*s4*Rs8;
  s15_0000: s15 + Rs8 => Rs8s15; rxnVolume*s15_def*s15*Rs8;
  s17_0001: s17 + Rs8 => Rs8s17; rxnVolume*s17_def*s17*Rs8;
  s20_0000: s20 + Rs4s8 => Rs4s8s20; rxnVolume*s20_def*s20*Rs4s8;
  s15_0001: s15 + Rs4s8 => Rs4s8s15; rxnVolume*s15_def*s15*Rs4s8;
  s17_0002: s17 + Rs4s8 => Rs4s8s17; rxnVolume*s17_def*s17*Rs4s8;
  s20_0001: s20 + Rs4s6s7s8s9s10s13s14s15s17s19 => Rs4s6s7s8s9s10s13s14s15s17s19s20; rxnVolume*s20_def*s20*Rs4s6s7s8s9s10s13s14s15s17s19;
  s4_0001: s4 + Rs20 => Rs4s20; rxnVolume*s4_def*s4*Rs20;
  s15_0002: s15 + Rs20 => Rs15s20; rxnVolume*s15_def*s15*Rs20;
  s17_0003: s17 + Rs20 => Rs17s20; rxnVolume*s17_def*s17*Rs20;
  s16_0000: s16 + Rs4s20 => Rs4s16s20; rxnVolume*s16_def*s16*Rs4s20;
  s17_0004: s17 + Rs4s20 => Rs4s17s20; rxnVolume*s17_def*s17*Rs4s20;
  s8_0001: s8 + Rs4s20 => Rs4s8s20; rxnVolume*s8_def*s8*Rs4s20;
  s16_0001: s16 + Rs4s8s20 => Rs4s8s16s20; rxnVolume*s16_def*s16*Rs4s8s20;
  s17_0005: s17 + Rs4s8s20 => Rs4s8s17s20; rxnVolume*s17_def*s17*Rs4s8s20;
  s20_0002: s20 + Rs15 => Rs15s20; rxnVolume*s20_def*s20*Rs15;
  s4_0002: s4 + Rs15 => Rs4s15; rxnVolume*s4_def*s4*Rs15;
  s17_0006: s17 + Rs15 => Rs15s17; rxnVolume*s17_def*s17*Rs15;
  s6_0000: s6 + Rs15 => Rs6s15; rxnVolume*s6_def*s6*Rs15;
  s8_0002: s8 + Rs15 => Rs8s15; rxnVolume*s8_def*s8*Rs15;
  s17_0007: s17 + Rs4s15 => Rs4s15s17; rxnVolume*s17_def*s17*Rs4s15;
  s6_0001: s6 + Rs4s15 => Rs4s6s15; rxnVolume*s6_def*s6*Rs4s15;
  s8_0003: s8 + Rs4s15 => Rs4s8s15; rxnVolume*s8_def*s8*Rs4s15;
  s20_0003: s20 + Rs6s15 => Rs6s15s20; rxnVolume*s20_def*s20*Rs6s15;
  s4_0003: s4 + Rs6s15 => Rs4s6s15; rxnVolume*s4_def*s4*Rs6s15;
  s17_0008: s17 + Rs6s15 => Rs6s15s17; rxnVolume*s17_def*s17*Rs6s15;
  s8_0004: s8 + Rs6s15 => Rs6s8s15; rxnVolume*s8_def*s8*Rs6s15;
  s20_0004: s20 + Rs4s6s15 => Rs4s6s15s20; rxnVolume*s20_def*s20*Rs4s6s15;
  s17_0009: s17 + Rs4s6s15 => Rs4s6s15s17; rxnVolume*s17_def*s17*Rs4s6s15;
  s8_0005: s8 + Rs4s6s15 => Rs4s6s8s15; rxnVolume*s8_def*s8*Rs4s6s15;
  s4_0004: s4 + Rs8s15 => Rs4s8s15; rxnVolume*s4_def*s4*Rs8s15;
  s6_0002: s6 + Rs8s15 => Rs6s8s15; rxnVolume*s6_def*s6*Rs8s15;
  s6_0003: s6 + Rs15s20 => Rs6s15s20; rxnVolume*s6_def*s6*Rs15s20;
  s17_0010: s17 + Rs4s8s15 => Rs4s8s15s17; rxnVolume*s17_def*s17*Rs4s8s15;
  s6_0004: s6 + Rs4s8s15 => Rs4s6s8s15; rxnVolume*s6_def*s6*Rs4s8s15;
  s4_0005: s4 + Rs6s8s15 => Rs4s6s8s15; rxnVolume*s4_def*s4*Rs6s8s15;
  s17_0011: s17 + Rs6s8s15 => Rs6s8s15s17; rxnVolume*s17_def*s17*Rs6s8s15;
  s4_0006: s4 + Rs6s15s20 => Rs4s6s15s20; rxnVolume*s4_def*s4*Rs6s15s20;
  s20_0005: s20 + Rs4s6s8s15 => Rs4s6s8s15s20; rxnVolume*s20_def*s20*Rs4s6s8s15;
  s17_0012: s17 + Rs6s15s20 => Rs6s15s17s20; rxnVolume*s17_def*s17*Rs6s15s20;
  s17_0013: s17 + Rs4s6s8s15 => Rs4s6s8s15s17; rxnVolume*s17_def*s17*Rs4s6s8s15;
  s16_0002: s16 + Rs4s6s15s20 => Rs4s6s15s16s20; rxnVolume*s16_def*s16*Rs4s6s15s20;
  s17_0014: s17 + Rs4s6s15s20 => Rs4s6s15s17s20; rxnVolume*s17_def*s17*Rs4s6s15s20;
  s8_0006: s8 + Rs4s6s15s20 => Rs4s6s8s15s20; rxnVolume*s8_def*s8*Rs4s6s15s20;
  s16_0003: s16 + Rs4s6s8s15s20 => Rs4s6s8s15s16s20; rxnVolume*s16_def*s16*Rs4s6s8s15s20;
  s17_0015: s17 + Rs4s6s8s15s20 => Rs4s6s8s15s17s20; rxnVolume*s17_def*s17*Rs4s6s8s15s20;
  s4_0007: s4 + Rs15s17 => Rs4s15s17; rxnVolume*s4_def*s4*Rs15s17;
  s6_0005: s6 + Rs15s17 => Rs6s15s17; rxnVolume*s6_def*s6*Rs15s17;
  s6_0006: s6 + Rs4s15s17 => Rs4s6s15s17; rxnVolume*s6_def*s6*Rs4s15s17;
  s8_0007: s8 + Rs4s15s17 => Rs4s8s15s17; rxnVolume*s8_def*s8*Rs4s15s17;
  s20_0006: s20 + Rs6s15s17 => Rs6s15s17s20; rxnVolume*s20_def*s20*Rs6s15s17;
  s4_0008: s4 + Rs6s15s17 => Rs4s6s15s17; rxnVolume*s4_def*s4*Rs6s15s17;
  s8_0008: s8 + Rs6s15s17 => Rs6s8s15s17; rxnVolume*s8_def*s8*Rs6s15s17;
  s20_0007: s20 + Rs4s6s15s17 => Rs4s6s15s17s20; rxnVolume*s20_def*s20*Rs4s6s15s17;
  s8_0009: s8 + Rs4s6s15s17 => Rs4s6s8s15s17; rxnVolume*s8_def*s8*Rs4s6s15s17;
  s6_0007: s6 + Rs4s8s15s17 => Rs4s6s8s15s17; rxnVolume*s6_def*s6*Rs4s8s15s17;
  s4_0009: s4 + Rs6s8s15s17 => Rs4s6s8s15s17; rxnVolume*s4_def*s4*Rs6s8s15s17;
  s20_0008: s20 + Rs4s6s8s15s17 => Rs4s6s8s15s17s20; rxnVolume*s20_def*s20*Rs4s6s8s15s17;
  s11_0000: s11 + Rs4s6s8s15s17 => Rs4s6s8s11s15s17; rxnVolume*s11_def*s11*Rs4s6s8s15s17;
  s7_0000: s7 + Rs4s6s8s15s17 => Rs4s6s7s8s15s17; rxnVolume*s7_def*s7*Rs4s6s8s15s17;
  s20_0009: s20 + Rs17 => Rs17s20; rxnVolume*s20_def*s20*Rs17;
  s9_0000: s9 + Rs4s6s7s8s15s17 => Rs4s6s7s8s9s15s17; rxnVolume*s9_def*s9*Rs4s6s7s8s15s17;
  s4_0010: s4 + Rs17 => Rs4s17; rxnVolume*s4_def*s4*Rs17;
  s15_0003: s15 + Rs17 => Rs15s17; rxnVolume*s15_def*s15*Rs17;
  s8_0010: s8 + Rs17 => Rs8s17; rxnVolume*s8_def*s8*Rs17;
  s20_0010: s20 + Rs4s17 => Rs4s17s20; rxnVolume*s20_def*s20*Rs4s17;
  s15_0004: s15 + Rs4s17 => Rs4s15s17; rxnVolume*s15_def*s15*Rs4s17;
  s8_0011: s8 + Rs4s17 => Rs4s8s17; rxnVolume*s8_def*s8*Rs4s17;
  s4_0011: s4 + Rs8s17 => Rs4s8s17; rxnVolume*s4_def*s4*Rs8s17;
  s20_0011: s20 + Rs4s8s17 => Rs4s8s17s20; rxnVolume*s20_def*s20*Rs4s8s17;
  s15_0005: s15 + Rs4s8s17 => Rs4s8s15s17; rxnVolume*s15_def*s15*Rs4s8s17;
  s15_0006: s15 + Rs4s16s20 => Rs4s15s16s20; rxnVolume*s15_def*s15*Rs4s16s20;
  s17_0016: s17 + Rs4s16s20 => Rs4s16s17s20; rxnVolume*s17_def*s17*Rs4s16s20;
  s8_0012: s8 + Rs4s16s20 => Rs4s8s16s20; rxnVolume*s8_def*s8*Rs4s16s20;
  s15_0007: s15 + Rs4s8s16s20 => Rs4s8s15s16s20; rxnVolume*s15_def*s15*Rs4s8s16s20;
  s17_0017: s17 + Rs4s8s16s20 => Rs4s8s16s17s20; rxnVolume*s17_def*s17*Rs4s8s16s20;
  s13_0000: s13 + Rs4s6s7s8s9s15s17 => Rs4s6s7s8s9s13s15s17; rxnVolume*s13_def*s13*Rs4s6s7s8s9s15s17;
  s17_0018: s17 + Rs4s15s16s20 => Rs4s15s16s17s20; rxnVolume*s17_def*s17*Rs4s15s16s20;
  s6_0008: s6 + Rs4s15s16s20 => Rs4s6s15s16s20; rxnVolume*s6_def*s6*Rs4s15s16s20;
  s8_0013: s8 + Rs4s15s16s20 => Rs4s8s15s16s20; rxnVolume*s8_def*s8*Rs4s15s16s20;
  s17_0019: s17 + Rs4s6s15s16s20 => Rs4s6s15s16s17s20; rxnVolume*s17_def*s17*Rs4s6s15s16s20;
  s8_0014: s8 + Rs4s6s15s16s20 => Rs4s6s8s15s16s20; rxnVolume*s8_def*s8*Rs4s6s15s16s20;
  s17_0020: s17 + Rs4s8s15s16s20 => Rs4s8s15s16s17s20; rxnVolume*s17_def*s17*Rs4s8s15s16s20;
  s6_0009: s6 + Rs4s8s15s16s20 => Rs4s6s8s15s16s20; rxnVolume*s6_def*s6*Rs4s8s15s16s20;
  s11_0001: s11 + Rs4s6s8s15s16s20 => Rs4s6s8s11s15s16s20; rxnVolume*s11_def*s11*Rs4s6s8s15s16s20;
  s17_0021: s17 + Rs4s6s8s15s16s20 => Rs4s6s8s15s16s17s20; rxnVolume*s17_def*s17*Rs4s6s8s15s16s20;
  s20_0012: s20 + Rs4s6s8s11s15s17 => Rs4s6s8s11s15s17s20; rxnVolume*s20_def*s20*Rs4s6s8s11s15s17;
  s17_0022: s17 + Rs4s6s8s11s15s16s20 => Rs4s6s8s11s15s16s17s20; rxnVolume*s17_def*s17*Rs4s6s8s11s15s16s20;
  s10_0000: s10 + Rs4s6s7s8s9s13s15s17 => Rs4s6s7s8s9s10s13s15s17; rxnVolume*s10_def*s10*Rs4s6s7s8s9s13s15s17;
  s4_0012: s4 + Rs17s20 => Rs4s17s20; rxnVolume*s4_def*s4*Rs17s20;
  s16_0004: s16 + Rs4s17s20 => Rs4s16s17s20; rxnVolume*s16_def*s16*Rs4s17s20;
  s8_0015: s8 + Rs4s17s20 => Rs4s8s17s20; rxnVolume*s8_def*s8*Rs4s17s20;
  s19_0000: s19 + Rs4s6s7s8s9s10s13s15s17 => Rs4s6s7s8s9s10s13s15s17s19; rxnVolume*s19_def*s19*Rs4s6s7s8s9s10s13s15s17;
  s16_0005: s16 + Rs4s8s17s20 => Rs4s8s16s17s20; rxnVolume*s16_def*s16*Rs4s8s17s20;
  s4_0013: s4 + Rs6s15s17s20 => Rs4s6s15s17s20; rxnVolume*s4_def*s4*Rs6s15s17s20;
  s16_0006: s16 + Rs4s6s15s17s20 => Rs4s6s15s16s17s20; rxnVolume*s16_def*s16*Rs4s6s15s17s20;
  s8_0016: s8 + Rs4s6s15s17s20 => Rs4s6s8s15s17s20; rxnVolume*s8_def*s8*Rs4s6s15s17s20;
  s16_0007: s16 + Rs4s6s8s15s17s20 => Rs4s6s8s15s16s17s20; rxnVolume*s16_def*s16*Rs4s6s8s15s17s20;
  s11_0002: s11 + Rs4s6s8s15s17s20 => Rs4s6s8s11s15s17s20; rxnVolume*s11_def*s11*Rs4s6s8s15s17s20;
  s16_0008: s16 + Rs4s6s7s8s9s10s13s14s15s17s19s20 => Rs4s6s7s8s9s10s13s14s15s16s17s19s20; rxnVolume*s16_def*s16*Rs4s6s7s8s9s10s13s14s15s17s19s20;
  s16_0009: s16 + Rs4s6s8s11s15s17s20 => Rs4s6s8s11s15s16s17s20; rxnVolume*s16_def*s16*Rs4s6s8s11s15s17s20;
  s15_0008: s15 + Rs4s16s17s20 => Rs4s15s16s17s20; rxnVolume*s15_def*s15*Rs4s16s17s20;
  s8_0017: s8 + Rs4s16s17s20 => Rs4s8s16s17s20; rxnVolume*s8_def*s8*Rs4s16s17s20;
  s15_0009: s15 + Rs4s8s16s17s20 => Rs4s8s15s16s17s20; rxnVolume*s15_def*s15*Rs4s8s16s17s20;
  s6_0010: s6 + Rs4s15s16s17s20 => Rs4s6s15s16s17s20; rxnVolume*s6_def*s6*Rs4s15s16s17s20;
  s8_0018: s8 + Rs4s15s16s17s20 => Rs4s8s15s16s17s20; rxnVolume*s8_def*s8*Rs4s15s16s17s20;
  s11_0003: s11 + Rs4s6s15s16s17s20 => Rs4s6s11s15s16s17s20; rxnVolume*s11_def*s11*Rs4s6s15s16s17s20;
  s7_0001: s7 + Rs4s6s15s16s17s20 => Rs4s6s7s15s16s17s20; rxnVolume*s7_def*s7*Rs4s6s15s16s17s20;
  s8_0019: s8 + Rs4s6s15s16s17s20 => Rs4s6s8s15s16s17s20; rxnVolume*s8_def*s8*Rs4s6s15s16s17s20;
  s9_0001: s9 + Rs4s6s7s15s16s17s20 => Rs4s6s7s9s15s16s17s20; rxnVolume*s9_def*s9*Rs4s6s7s15s16s17s20;
  s8_0020: s8 + Rs4s6s7s15s16s17s20 => Rs4s6s7s8s15s16s17s20; rxnVolume*s8_def*s8*Rs4s6s7s15s16s17s20;
  s6_0011: s6 + Rs4s8s15s16s17s20 => Rs4s6s8s15s16s17s20; rxnVolume*s6_def*s6*Rs4s8s15s16s17s20;
  s5_0000: s5 + Rs4s6s8s15s16s17s20 => Rs4s5s6s8s15s16s17s20; rxnVolume*s5_def*s5*Rs4s6s8s15s16s17s20;
  s11_0004: s11 + Rs4s6s8s15s16s17s20 => Rs4s6s8s11s15s16s17s20; rxnVolume*s11_def*s11*Rs4s6s8s15s16s17s20;
  s7_0002: s7 + Rs4s6s8s15s16s17s20 => Rs4s6s7s8s15s16s17s20; rxnVolume*s7_def*s7*Rs4s6s8s15s16s17s20;
  s12_0000: s12 + Rs4s6s8s15s16s17s20 => Rs4s6s8s12s15s16s17s20; rxnVolume*s12_def*s12*Rs4s6s8s15s16s17s20;
  s11_0005: s11 + Rs4s5s6s8s15s16s17s20 => Rs4s5s6s8s11s15s16s17s20; rxnVolume*s11_def*s11*Rs4s5s6s8s15s16s17s20;
  s7_0003: s7 + Rs4s5s6s8s15s16s17s20 => Rs4s5s6s7s8s15s16s17s20; rxnVolume*s7_def*s7*Rs4s5s6s8s15s16s17s20;
  s12_0001: s12 + Rs4s5s6s8s15s16s17s20 => Rs4s5s6s8s12s15s16s17s20; rxnVolume*s12_def*s12*Rs4s5s6s8s15s16s17s20;
  s5_0001: s5 + Rs4s6s7s8s15s16s17s20 => Rs4s5s6s7s8s15s16s17s20; rxnVolume*s5_def*s5*Rs4s6s7s8s15s16s17s20;
  s9_0002: s9 + Rs4s6s7s8s15s16s17s20 => Rs4s6s7s8s9s15s16s17s20; rxnVolume*s9_def*s9*Rs4s6s7s8s15s16s17s20;
  s11_0006: s11 + Rs4s6s7s8s15s16s17s20 => Rs4s6s7s8s11s15s16s17s20; rxnVolume*s11_def*s11*Rs4s6s7s8s15s16s17s20;
  s12_0002: s12 + Rs4s6s7s8s15s16s17s20 => Rs4s6s7s8s12s15s16s17s20; rxnVolume*s12_def*s12*Rs4s6s7s8s15s16s17s20;
  s13_0001: s13 + Rs4s6s7s8s15s16s17s20 => Rs4s6s7s8s13s15s16s17s20; rxnVolume*s13_def*s13*Rs4s6s7s8s15s16s17s20;
  s9_0003: s9 + Rs4s5s6s7s8s15s16s17s20 => Rs4s5s6s7s8s9s15s16s17s20; rxnVolume*s9_def*s9*Rs4s5s6s7s8s15s16s17s20;
  s11_0007: s11 + Rs4s5s6s7s8s15s16s17s20 => Rs4s5s6s7s8s11s15s16s17s20; rxnVolume*s11_def*s11*Rs4s5s6s7s8s15s16s17s20;
  s12_0003: s12 + Rs4s5s6s7s8s15s16s17s20 => Rs4s5s6s7s8s12s15s16s17s20; rxnVolume*s12_def*s12*Rs4s5s6s7s8s15s16s17s20;
  s13_0002: s13 + Rs4s5s6s7s8s15s16s17s20 => Rs4s5s6s7s8s13s15s16s17s20; rxnVolume*s13_def*s13*Rs4s5s6s7s8s15s16s17s20;
  s8_0021: s8 + Rs4s6s7s9s15s16s17s20 => Rs4s6s7s8s9s15s16s17s20; rxnVolume*s8_def*s8*Rs4s6s7s9s15s16s17s20;
  s9_0004: s9 + Rs4s5s6s7s8s11s12s15s16s17s19s20 => Rs4s5s6s7s8s9s11s12s15s16s17s19s20; rxnVolume*s9_def*s9*Rs4s5s6s7s8s11s12s15s16s17s19s20;
  s13_0003: s13 + Rs4s5s6s7s8s11s12s15s16s17s19s20 => Rs4s5s6s7s8s11s12s13s15s16s17s19s20; rxnVolume*s13_def*s13*Rs4s5s6s7s8s11s12s15s16s17s19s20;
  s5_0002: s5 + Rs4s6s7s8s9s15s16s17s20 => Rs4s5s6s7s8s9s15s16s17s20; rxnVolume*s5_def*s5*Rs4s6s7s8s9s15s16s17s20;
  s10_0001: s10 + Rs4s6s7s8s9s15s16s17s20 => Rs4s6s7s8s9s10s15s16s17s20; rxnVolume*s10_def*s10*Rs4s6s7s8s9s15s16s17s20;
  s11_0008: s11 + Rs4s6s7s8s9s15s16s17s20 => Rs4s6s7s8s9s11s15s16s17s20; rxnVolume*s11_def*s11*Rs4s6s7s8s9s15s16s17s20;
  s14_0000: s14 + Rs4s5s6s7s8s9s11s12s15s16s17s19s20 => Rs4s5s6s7s8s9s11s12s14s15s16s17s19s20; rxnVolume*s14_def*s14*Rs4s5s6s7s8s9s11s12s15s16s17s19s20;
  s12_0004: s12 + Rs4s6s7s8s9s15s16s17s20 => Rs4s6s7s8s9s12s15s16s17s20; rxnVolume*s12_def*s12*Rs4s6s7s8s9s15s16s17s20;
  s13_0004: s13 + Rs4s5s6s7s8s9s11s12s15s16s17s19s20 => Rs4s5s6s7s8s9s11s12s13s15s16s17s19s20; rxnVolume*s13_def*s13*Rs4s5s6s7s8s9s11s12s15s16s17s19s20;
  s13_0005: s13 + Rs4s6s7s8s9s15s16s17s20 => Rs4s6s7s8s9s13s15s16s17s20; rxnVolume*s13_def*s13*Rs4s6s7s8s9s15s16s17s20;
  s11_0009: s11 + Rs4s5s6s7s8s9s15s16s17s20 => Rs4s5s6s7s8s9s11s15s16s17s20; rxnVolume*s11_def*s11*Rs4s5s6s7s8s9s15s16s17s20;
  s12_0005: s12 + Rs4s5s6s7s8s9s15s16s17s20 => Rs4s5s6s7s8s9s12s15s16s17s20; rxnVolume*s12_def*s12*Rs4s5s6s7s8s9s15s16s17s20;
  s13_0006: s13 + Rs4s5s6s7s8s9s15s16s17s20 => Rs4s5s6s7s8s9s13s15s16s17s20; rxnVolume*s13_def*s13*Rs4s5s6s7s8s9s15s16s17s20;
  s11_0010: s11 + Rs4s6s7s8s9s10s15s16s17s20 => Rs4s6s7s8s9s10s11s15s16s17s20; rxnVolume*s11_def*s11*Rs4s6s7s8s9s10s15s16s17s20;
  s13_0007: s13 + Rs4s6s7s8s9s10s15s16s17s20 => Rs4s6s7s8s9s10s13s15s16s17s20; rxnVolume*s13_def*s13*Rs4s6s7s8s9s10s15s16s17s20;
  s8_0022: s8 + Rs4s6s11s15s16s17s20 => Rs4s6s8s11s15s16s17s20; rxnVolume*s8_def*s8*Rs4s6s11s15s16s17s20;
  s10_0002: s10 + Rs4s6s7s8s9s13s15s16s17s19s20 => Rs4s6s7s8s9s10s13s15s16s17s19s20; rxnVolume*s10_def*s10*Rs4s6s7s8s9s13s15s16s17s19s20;
  s11_0011: s11 + Rs4s6s7s8s9s13s15s16s17s19s20 => Rs4s6s7s8s9s11s13s15s16s17s19s20; rxnVolume*s11_def*s11*Rs4s6s7s8s9s13s15s16s17s19s20;
  s5_0003: s5 + Rs4s6s8s11s15s16s17s20 => Rs4s5s6s8s11s15s16s17s20; rxnVolume*s5_def*s5*Rs4s6s8s11s15s16s17s20;
  s7_0004: s7 + Rs4s6s8s11s15s16s17s20 => Rs4s6s7s8s11s15s16s17s20; rxnVolume*s7_def*s7*Rs4s6s8s11s15s16s17s20;
  s12_0006: s12 + Rs4s6s8s11s15s16s17s20 => Rs4s6s8s11s12s15s16s17s20; rxnVolume*s12_def*s12*Rs4s6s8s11s15s16s17s20;
  s7_0005: s7 + Rs4s5s6s8s11s15s16s17s20 => Rs4s5s6s7s8s11s15s16s17s20; rxnVolume*s7_def*s7*Rs4s5s6s8s11s15s16s17s20;
  s12_0007: s12 + Rs4s5s6s8s11s15s16s17s20 => Rs4s5s6s8s11s12s15s16s17s20; rxnVolume*s12_def*s12*Rs4s5s6s8s11s15s16s17s20;
  s5_0004: s5 + Rs4s6s7s8s11s15s16s17s20 => Rs4s5s6s7s8s11s15s16s17s20; rxnVolume*s5_def*s5*Rs4s6s7s8s11s15s16s17s20;
  s9_0005: s9 + Rs4s6s7s8s11s15s16s17s20 => Rs4s6s7s8s9s11s15s16s17s20; rxnVolume*s9_def*s9*Rs4s6s7s8s11s15s16s17s20;
  s12_0008: s12 + Rs4s6s7s8s11s15s16s17s20 => Rs4s6s7s8s11s12s15s16s17s20; rxnVolume*s12_def*s12*Rs4s6s7s8s11s15s16s17s20;
  s13_0008: s13 + Rs4s6s7s8s11s15s16s17s20 => Rs4s6s7s8s11s13s15s16s17s20; rxnVolume*s13_def*s13*Rs4s6s7s8s11s15s16s17s20;
  s9_0006: s9 + Rs4s5s6s7s8s11s15s16s17s20 => Rs4s5s6s7s8s9s11s15s16s17s20; rxnVolume*s9_def*s9*Rs4s5s6s7s8s11s15s16s17s20;
  s12_0009: s12 + Rs4s5s6s7s8s11s15s16s17s20 => Rs4s5s6s7s8s11s12s15s16s17s20; rxnVolume*s12_def*s12*Rs4s5s6s7s8s11s15s16s17s20;
  s13_0009: s13 + Rs4s5s6s7s8s11s15s16s17s20 => Rs4s5s6s7s8s11s13s15s16s17s20; rxnVolume*s13_def*s13*Rs4s5s6s7s8s11s15s16s17s20;
  s5_0005: s5 + Rs4s6s7s8s9s11s15s16s17s20 => Rs4s5s6s7s8s9s11s15s16s17s20; rxnVolume*s5_def*s5*Rs4s6s7s8s9s11s15s16s17s20;
  s10_0003: s10 + Rs4s6s7s8s9s11s15s16s17s20 => Rs4s6s7s8s9s10s11s15s16s17s20; rxnVolume*s10_def*s10*Rs4s6s7s8s9s11s15s16s17s20;
  s12_0010: s12 + Rs4s6s7s8s9s11s15s16s17s20 => Rs4s6s7s8s9s11s12s15s16s17s20; rxnVolume*s12_def*s12*Rs4s6s7s8s9s11s15s16s17s20;
  s13_0010: s13 + Rs4s6s7s8s9s11s15s16s17s20 => Rs4s6s7s8s9s11s13s15s16s17s20; rxnVolume*s13_def*s13*Rs4s6s7s8s9s11s15s16s17s20;
  s10_0004: s10 + Rs4s5s6s7s8s9s11s15s16s17s20 => Rs4s5s6s7s8s9s10s11s15s16s17s20; rxnVolume*s10_def*s10*Rs4s5s6s7s8s9s11s15s16s17s20;
  s11_0012: s11 + Rs4s6s7s8s9s10s13s15s16s17s19s20 => Rs4s6s7s8s9s10s11s13s15s16s17s19s20; rxnVolume*s11_def*s11*Rs4s6s7s8s9s10s13s15s16s17s19s20;
  s12_0011: s12 + Rs4s5s6s7s8s9s11s15s16s17s20 => Rs4s5s6s7s8s9s11s12s15s16s17s20; rxnVolume*s12_def*s12*Rs4s5s6s7s8s9s11s15s16s17s20;
  s14_0001: s14 + Rs4s6s7s8s9s10s13s15s16s17s19s20 => Rs4s6s7s8s9s10s13s14s15s16s17s19s20; rxnVolume*s14_def*s14*Rs4s6s7s8s9s10s13s15s16s17s19s20;
  s13_0011: s13 + Rs4s5s6s7s8s9s11s15s16s17s20 => Rs4s5s6s7s8s9s11s13s15s16s17s20; rxnVolume*s13_def*s13*Rs4s5s6s7s8s9s11s15s16s17s20;
  s5_0006: s5 + Rs4s6s7s8s9s10s11s15s16s17s20 => Rs4s5s6s7s8s9s10s11s15s16s17s20; rxnVolume*s5_def*s5*Rs4s6s7s8s9s10s11s15s16s17s20;
  s11_0013: s11 + Rs3s4s5s6s7s8s9s10s13s15s16s17s19s20 => Rs3s4s5s6s7s8s9s10s11s13s15s16s17s19s20; rxnVolume*s11_def*s11*Rs3s4s5s6s7s8s9s10s13s15s16s17s19s20;
  s12_0012: s12 + Rs3s4s5s6s7s8s9s10s13s15s16s17s19s20 => Rs3s4s5s6s7s8s9s10s12s13s15s16s17s19s20; rxnVolume*s12_def*s12*Rs3s4s5s6s7s8s9s10s13s15s16s17s19s20;
  s14_0002: s14 + Rs3s4s5s6s7s8s9s10s13s15s16s17s19s20 => Rs3s4s5s6s7s8s9s10s13s14s15s16s17s19s20; rxnVolume*s14_def*s14*Rs3s4s5s6s7s8s9s10s13s15s16s17s19s20;
  s13_0012: s13 + Rs4s6s7s8s9s10s11s15s16s17s20 => Rs4s6s7s8s9s10s11s13s15s16s17s20; rxnVolume*s13_def*s13*Rs4s6s7s8s9s10s11s15s16s17s20;
  s12_0013: s12 + Rs4s5s6s7s8s9s10s11s15s16s17s20 => Rs4s5s6s7s8s9s10s11s12s15s16s17s20; rxnVolume*s12_def*s12*Rs4s5s6s7s8s9s10s11s15s16s17s20;
  s13_0013: s13 + Rs4s5s6s7s8s9s10s11s15s16s17s20 => Rs4s5s6s7s8s9s10s11s13s15s16s17s20; rxnVolume*s13_def*s13*Rs4s5s6s7s8s9s10s11s15s16s17s20;
  s5_0007: s5 + Rs4s6s7s8s9s11s13s15s16s17s19s20 => Rs4s5s6s7s8s9s11s13s15s16s17s19s20; rxnVolume*s5_def*s5*Rs4s6s7s8s9s11s13s15s16s17s19s20;
  s10_0005: s10 + Rs4s6s7s8s9s11s13s15s16s17s19s20 => Rs4s6s7s8s9s10s11s13s15s16s17s19s20; rxnVolume*s10_def*s10*Rs4s6s7s8s9s11s13s15s16s17s19s20;
  s5_0008: s5 + Rs4s6s8s12s15s16s17s20 => Rs4s5s6s8s12s15s16s17s20; rxnVolume*s5_def*s5*Rs4s6s8s12s15s16s17s20;
  s14_0003: s14 + Rs4s6s7s8s9s11s13s15s16s17s19s20 => Rs4s6s7s8s9s11s13s14s15s16s17s19s20; rxnVolume*s14_def*s14*Rs4s6s7s8s9s11s13s15s16s17s19s20;
  s11_0014: s11 + Rs4s6s8s12s15s16s17s20 => Rs4s6s8s11s12s15s16s17s20; rxnVolume*s11_def*s11*Rs4s6s8s12s15s16s17s20;
  s10_0006: s10 + Rs4s5s6s7s8s9s11s13s15s16s17s19s20 => Rs4s5s6s7s8s9s10s11s13s15s16s17s19s20; rxnVolume*s10_def*s10*Rs4s5s6s7s8s9s11s13s15s16s17s19s20;
  s7_0006: s7 + Rs4s6s8s12s15s16s17s20 => Rs4s6s7s8s12s15s16s17s20; rxnVolume*s7_def*s7*Rs4s6s8s12s15s16s17s20;
  s12_0014: s12 + Rs4s5s6s7s8s9s11s13s15s16s17s19s20 => Rs4s5s6s7s8s9s11s12s13s15s16s17s19s20; rxnVolume*s12_def*s12*Rs4s5s6s7s8s9s11s13s15s16s17s19s20;
  s11_0015: s11 + Rs4s5s6s8s12s15s16s17s20 => Rs4s5s6s8s11s12s15s16s17s20; rxnVolume*s11_def*s11*Rs4s5s6s8s12s15s16s17s20;
  s14_0004: s14 + Rs4s5s6s7s8s9s11s13s15s16s17s19s20 => Rs4s5s6s7s8s9s11s13s14s15s16s17s19s20; rxnVolume*s14_def*s14*Rs4s5s6s7s8s9s11s13s15s16s17s19s20;
  s7_0007: s7 + Rs4s5s6s8s12s15s16s17s20 => Rs4s5s6s7s8s12s15s16s17s20; rxnVolume*s7_def*s7*Rs4s5s6s8s12s15s16s17s20;
  s5_0009: s5 + Rs4s6s7s8s9s10s11s13s15s16s17s19s20 => Rs4s5s6s7s8s9s10s11s13s15s16s17s19s20; rxnVolume*s5_def*s5*Rs4s6s7s8s9s10s11s13s15s16s17s19s20;
  s12_0015: s12 + Rs4s6s7s8s9s10s11s13s15s16s17s19s20 => Rs4s6s7s8s9s10s11s12s13s15s16s17s19s20; rxnVolume*s12_def*s12*Rs4s6s7s8s9s10s11s13s15s16s17s19s20;
  s14_0005: s14 + Rs4s6s7s8s9s10s11s13s15s16s17s19s20 => Rs4s6s7s8s9s10s11s13s14s15s16s17s19s20; rxnVolume*s14_def*s14*Rs4s6s7s8s9s10s11s13s15s16s17s19s20;
  s3_0000: s3 + Rs4s5s6s7s8s9s10s11s13s15s16s17s19s20 => Rs3s4s5s6s7s8s9s10s11s13s15s16s17s19s20; rxnVolume*s3_def*s3*Rs4s5s6s7s8s9s10s11s13s15s16s17s19s20;
  s12_0016: s12 + Rs4s5s6s7s8s9s10s11s13s15s16s17s19s20 => Rs4s5s6s7s8s9s10s11s12s13s15s16s17s19s20; rxnVolume*s12_def*s12*Rs4s5s6s7s8s9s10s11s13s15s16s17s19s20;
  s14_0006: s14 + Rs4s5s6s7s8s9s10s11s13s15s16s17s19s20 => Rs4s5s6s7s8s9s10s11s13s14s15s16s17s19s20; rxnVolume*s14_def*s14*Rs4s5s6s7s8s9s10s11s13s15s16s17s19s20;
  s12_0017: s12 + Rs3s4s5s6s7s8s9s10s11s13s15s16s17s19s20 => Rs3s4s5s6s7s8s9s10s11s12s13s15s16s17s19s20; rxnVolume*s12_def*s12*Rs3s4s5s6s7s8s9s10s11s13s15s16s17s19s20;
  s14_0007: s14 + Rs3s4s5s6s7s8s9s10s11s13s15s16s17s19s20 => Rs3s4s5s6s7s8s9s10s11s13s14s15s16s17s19s20; rxnVolume*s14_def*s14*Rs3s4s5s6s7s8s9s10s11s13s15s16s17s19s20;
  s5_0010: s5 + Rs4s6s7s8s12s15s16s17s20 => Rs4s5s6s7s8s12s15s16s17s20; rxnVolume*s5_def*s5*Rs4s6s7s8s12s15s16s17s20;
  s9_0007: s9 + Rs4s6s7s8s12s15s16s17s20 => Rs4s6s7s8s9s12s15s16s17s20; rxnVolume*s9_def*s9*Rs4s6s7s8s12s15s16s17s20;
  s11_0016: s11 + Rs4s6s7s8s12s15s16s17s20 => Rs4s6s7s8s11s12s15s16s17s20; rxnVolume*s11_def*s11*Rs4s6s7s8s12s15s16s17s20;
  s9_0008: s9 + Rs4s5s6s7s8s12s15s16s17s20 => Rs4s5s6s7s8s9s12s15s16s17s20; rxnVolume*s9_def*s9*Rs4s5s6s7s8s12s15s16s17s20;
  s11_0017: s11 + Rs4s5s6s7s8s12s15s16s17s20 => Rs4s5s6s7s8s11s12s15s16s17s20; rxnVolume*s11_def*s11*Rs4s5s6s7s8s12s15s16s17s20;
  s5_0011: s5 + Rs4s6s7s8s9s12s15s16s17s20 => Rs4s5s6s7s8s9s12s15s16s17s20; rxnVolume*s5_def*s5*Rs4s6s7s8s9s12s15s16s17s20;
  s11_0018: s11 + Rs4s6s7s8s9s12s15s16s17s20 => Rs4s6s7s8s9s11s12s15s16s17s20; rxnVolume*s11_def*s11*Rs4s6s7s8s9s12s15s16s17s20;
  s13_0014: s13 + Rs4s6s7s8s9s12s15s16s17s20 => Rs4s6s7s8s9s12s13s15s16s17s20; rxnVolume*s13_def*s13*Rs4s6s7s8s9s12s15s16s17s20;
  s11_0019: s11 + Rs4s5s6s7s8s9s12s15s16s17s20 => Rs4s5s6s7s8s9s11s12s15s16s17s20; rxnVolume*s11_def*s11*Rs4s5s6s7s8s9s12s15s16s17s20;
  s13_0015: s13 + Rs4s5s6s7s8s9s12s15s16s17s20 => Rs4s5s6s7s8s9s12s13s15s16s17s20; rxnVolume*s13_def*s13*Rs4s5s6s7s8s9s12s15s16s17s20;
  s5_0012: s5 + Rs4s6s8s11s12s15s16s17s20 => Rs4s5s6s8s11s12s15s16s17s20; rxnVolume*s5_def*s5*Rs4s6s8s11s12s15s16s17s20;
  s7_0008: s7 + Rs4s6s8s11s12s15s16s17s20 => Rs4s6s7s8s11s12s15s16s17s20; rxnVolume*s7_def*s7*Rs4s6s8s11s12s15s16s17s20;
  s7_0009: s7 + Rs4s5s6s8s11s12s15s16s17s20 => Rs4s5s6s7s8s11s12s15s16s17s20; rxnVolume*s7_def*s7*Rs4s5s6s8s11s12s15s16s17s20;
  s5_0013: s5 + Rs4s6s7s8s11s12s15s16s17s20 => Rs4s5s6s7s8s11s12s15s16s17s20; rxnVolume*s5_def*s5*Rs4s6s7s8s11s12s15s16s17s20;
  s9_0009: s9 + Rs4s6s7s8s11s12s15s16s17s20 => Rs4s6s7s8s9s11s12s15s16s17s20; rxnVolume*s9_def*s9*Rs4s6s7s8s11s12s15s16s17s20;
  s9_0010: s9 + Rs4s5s6s7s8s11s12s15s16s17s20 => Rs4s5s6s7s8s9s11s12s15s16s17s20; rxnVolume*s9_def*s9*Rs4s5s6s7s8s11s12s15s16s17s20;
  s19_0001: s19 + Rs4s5s6s7s8s11s12s15s16s17s20 => Rs4s5s6s7s8s11s12s15s16s17s19s20; rxnVolume*s19_def*s19*Rs4s5s6s7s8s11s12s15s16s17s20;
  s13_0016: s13 + Rs4s5s6s7s8s11s12s15s16s17s20 => Rs4s5s6s7s8s11s12s13s15s16s17s20; rxnVolume*s13_def*s13*Rs4s5s6s7s8s11s12s15s16s17s20;
  s5_0014: s5 + Rs4s6s7s8s9s11s12s15s16s17s20 => Rs4s5s6s7s8s9s11s12s15s16s17s20; rxnVolume*s5_def*s5*Rs4s6s7s8s9s11s12s15s16s17s20;
  s11_0020: s11 + Rs3s4s5s6s7s8s9s10s12s13s15s16s17s19s20 => Rs3s4s5s6s7s8s9s10s11s12s13s15s16s17s19s20; rxnVolume*s11_def*s11*Rs3s4s5s6s7s8s9s10s12s13s15s16s17s19s20;
  s14_0008: s14 + Rs3s4s5s6s7s8s9s10s12s13s15s16s17s19s20 => Rs3s4s5s6s7s8s9s10s12s13s14s15s16s17s19s20; rxnVolume*s14_def*s14*Rs3s4s5s6s7s8s9s10s12s13s15s16s17s19s20;
  s9_0011: s9 + Rs4s5s6s7s8s11s12s13s15s16s17s19s20 => Rs4s5s6s7s8s9s11s12s13s15s16s17s19s20; rxnVolume*s9_def*s9*Rs4s5s6s7s8s11s12s13s15s16s17s19s20;
  s10_0007: s10 + Rs4s5s6s7s8s9s11s12s13s15s16s17s19s20 => Rs4s5s6s7s8s9s10s11s12s13s15s16s17s19s20; rxnVolume*s10_def*s10*Rs4s5s6s7s8s9s11s12s13s15s16s17s19s20;
  s14_0009: s14 + Rs4s5s6s7s8s9s11s12s13s15s16s17s19s20 => Rs4s5s6s7s8s9s11s12s13s14s15s16s17s19s20; rxnVolume*s14_def*s14*Rs4s5s6s7s8s9s11s12s13s15s16s17s19s20;
  s5_0015: s5 + Rs4s6s7s8s9s10s11s12s13s15s16s17s19s20 => Rs4s5s6s7s8s9s10s11s12s13s15s16s17s19s20; rxnVolume*s5_def*s5*Rs4s6s7s8s9s10s11s12s13s15s16s17s19s20;
  s14_0010: s14 + Rs4s6s7s8s9s10s11s12s13s15s16s17s19s20 => Rs4s6s7s8s9s10s11s12s13s14s15s16s17s19s20; rxnVolume*s14_def*s14*Rs4s6s7s8s9s10s11s12s13s15s16s17s19s20;
  s3_0001: s3 + Rs4s5s6s7s8s9s10s11s12s13s15s16s17s19s20 => Rs3s4s5s6s7s8s9s10s11s12s13s15s16s17s19s20; rxnVolume*s3_def*s3*Rs4s5s6s7s8s9s10s11s12s13s15s16s17s19s20;
  s14_0011: s14 + Rs4s5s6s7s8s9s10s11s12s13s15s16s17s19s20 => Rs4s5s6s7s8s9s10s11s12s13s14s15s16s17s19s20; rxnVolume*s14_def*s14*Rs4s5s6s7s8s9s10s11s12s13s15s16s17s19s20;
  s14_0012: s14 + Rs3s4s5s6s7s8s9s10s11s12s13s15s16s17s19s20 => Rs3s4s5s6s7s8s9s10s11s12s13s14s15s16s17s19s20; rxnVolume*s14_def*s14*Rs3s4s5s6s7s8s9s10s11s12s13s15s16s17s19s20;
  s13_0017: s13 + Rs4s6s7s8s9s11s12s15s16s17s20 => Rs4s6s7s8s9s11s12s13s15s16s17s20; rxnVolume*s13_def*s13*Rs4s6s7s8s9s11s12s15s16s17s20;
  s10_0008: s10 + Rs4s5s6s7s8s9s11s12s15s16s17s20 => Rs4s5s6s7s8s9s10s11s12s15s16s17s20; rxnVolume*s10_def*s10*Rs4s5s6s7s8s9s11s12s15s16s17s20;
  s19_0002: s19 + Rs4s5s6s7s8s9s11s12s15s16s17s20 => Rs4s5s6s7s8s9s11s12s15s16s17s19s20; rxnVolume*s19_def*s19*Rs4s5s6s7s8s9s11s12s15s16s17s20;
  s13_0018: s13 + Rs4s5s6s7s8s9s11s12s15s16s17s20 => Rs4s5s6s7s8s9s11s12s13s15s16s17s20; rxnVolume*s13_def*s13*Rs4s5s6s7s8s9s11s12s15s16s17s20;
  s3_0002: s3 + Rs4s5s6s7s8s9s10s11s12s15s16s17s20 => Rs3s4s5s6s7s8s9s10s11s12s15s16s17s20; rxnVolume*s3_def*s3*Rs4s5s6s7s8s9s10s11s12s15s16s17s20;
  s13_0019: s13 + Rs4s5s6s7s8s9s10s11s12s15s16s17s20 => Rs4s5s6s7s8s9s10s11s12s13s15s16s17s20; rxnVolume*s13_def*s13*Rs4s5s6s7s8s9s10s11s12s15s16s17s20;
  s13_0020: s13 + Rs3s4s5s6s7s8s9s10s11s12s15s16s17s20 => Rs3s4s5s6s7s8s9s10s11s12s13s15s16s17s20; rxnVolume*s13_def*s13*Rs3s4s5s6s7s8s9s10s11s12s15s16s17s20;
  s5_0016: s5 + Rs4s6s7s8s13s15s16s17s20 => Rs4s5s6s7s8s13s15s16s17s20; rxnVolume*s5_def*s5*Rs4s6s7s8s13s15s16s17s20;
  s9_0012: s9 + Rs4s6s7s8s13s15s16s17s20 => Rs4s6s7s8s9s13s15s16s17s20; rxnVolume*s9_def*s9*Rs4s6s7s8s13s15s16s17s20;
  s11_0021: s11 + Rs4s6s7s8s13s15s16s17s20 => Rs4s6s7s8s11s13s15s16s17s20; rxnVolume*s11_def*s11*Rs4s6s7s8s13s15s16s17s20;
  s9_0013: s9 + Rs4s5s6s7s8s13s15s16s17s20 => Rs4s5s6s7s8s9s13s15s16s17s20; rxnVolume*s9_def*s9*Rs4s5s6s7s8s13s15s16s17s20;
  s11_0022: s11 + Rs4s5s6s7s8s13s15s16s17s20 => Rs4s5s6s7s8s11s13s15s16s17s20; rxnVolume*s11_def*s11*Rs4s5s6s7s8s13s15s16s17s20;
  s5_0017: s5 + Rs4s6s7s8s9s13s15s16s17s20 => Rs4s5s6s7s8s9s13s15s16s17s20; rxnVolume*s5_def*s5*Rs4s6s7s8s9s13s15s16s17s20;
  s10_0009: s10 + Rs4s6s7s8s9s13s15s16s17s20 => Rs4s6s7s8s9s10s13s15s16s17s20; rxnVolume*s10_def*s10*Rs4s6s7s8s9s13s15s16s17s20;
  s11_0023: s11 + Rs4s6s7s8s9s13s15s16s17s20 => Rs4s6s7s8s9s11s13s15s16s17s20; rxnVolume*s11_def*s11*Rs4s6s7s8s9s13s15s16s17s20;
  s12_0018: s12 + Rs4s6s7s8s9s13s15s16s17s20 => Rs4s6s7s8s9s12s13s15s16s17s20; rxnVolume*s12_def*s12*Rs4s6s7s8s9s13s15s16s17s20;
  s19_0003: s19 + Rs4s6s7s8s9s13s15s16s17s20 => Rs4s6s7s8s9s13s15s16s17s19s20; rxnVolume*s19_def*s19*Rs4s6s7s8s9s13s15s16s17s20;
  s10_0010: s10 + Rs4s5s6s7s8s9s13s15s16s17s20 => Rs4s5s6s7s8s9s10s13s15s16s17s20; rxnVolume*s10_def*s10*Rs4s5s6s7s8s9s13s15s16s17s20;
  s11_0024: s11 + Rs4s5s6s7s8s9s13s15s16s17s20 => Rs4s5s6s7s8s9s11s13s15s16s17s20; rxnVolume*s11_def*s11*Rs4s5s6s7s8s9s13s15s16s17s20;
  s12_0019: s12 + Rs4s5s6s7s8s9s13s15s16s17s20 => Rs4s5s6s7s8s9s12s13s15s16s17s20; rxnVolume*s12_def*s12*Rs4s5s6s7s8s9s13s15s16s17s20;
  s5_0018: s5 + Rs4s6s7s8s9s10s13s15s16s17s20 => Rs4s5s6s7s8s9s10s13s15s16s17s20; rxnVolume*s5_def*s5*Rs4s6s7s8s9s10s13s15s16s17s20;
  s11_0025: s11 + Rs4s6s7s8s9s10s13s15s16s17s20 => Rs4s6s7s8s9s10s11s13s15s16s17s20; rxnVolume*s11_def*s11*Rs4s6s7s8s9s10s13s15s16s17s20;
  s12_0020: s12 + Rs4s6s7s8s9s10s13s15s16s17s20 => Rs4s6s7s8s9s10s12s13s15s16s17s20; rxnVolume*s12_def*s12*Rs4s6s7s8s9s10s13s15s16s17s20;
  s19_0004: s19 + Rs4s6s7s8s9s10s13s15s16s17s20 => Rs4s6s7s8s9s10s13s15s16s17s19s20; rxnVolume*s19_def*s19*Rs4s6s7s8s9s10s13s15s16s17s20;
  s3_0003: s3 + Rs4s5s6s7s8s9s10s13s15s16s17s20 => Rs3s4s5s6s7s8s9s10s13s15s16s17s20; rxnVolume*s3_def*s3*Rs4s5s6s7s8s9s10s13s15s16s17s20;
  s11_0026: s11 + Rs4s5s6s7s8s9s10s13s15s16s17s20 => Rs4s5s6s7s8s9s10s11s13s15s16s17s20; rxnVolume*s11_def*s11*Rs4s5s6s7s8s9s10s13s15s16s17s20;
  s12_0021: s12 + Rs4s5s6s7s8s9s10s13s15s16s17s20 => Rs4s5s6s7s8s9s10s12s13s15s16s17s20; rxnVolume*s12_def*s12*Rs4s5s6s7s8s9s10s13s15s16s17s20;
  s11_0027: s11 + Rs3s4s5s6s7s8s9s10s13s15s16s17s20 => Rs3s4s5s6s7s8s9s10s11s13s15s16s17s20; rxnVolume*s11_def*s11*Rs3s4s5s6s7s8s9s10s13s15s16s17s20;
  s12_0022: s12 + Rs3s4s5s6s7s8s9s10s13s15s16s17s20 => Rs3s4s5s6s7s8s9s10s12s13s15s16s17s20; rxnVolume*s12_def*s12*Rs3s4s5s6s7s8s9s10s13s15s16s17s20;
  s19_0005: s19 + Rs3s4s5s6s7s8s9s10s13s15s16s17s20 => Rs3s4s5s6s7s8s9s10s13s15s16s17s19s20; rxnVolume*s19_def*s19*Rs3s4s5s6s7s8s9s10s13s15s16s17s20;
  s5_0019: s5 + Rs4s6s7s8s11s13s15s16s17s20 => Rs4s5s6s7s8s11s13s15s16s17s20; rxnVolume*s5_def*s5*Rs4s6s7s8s11s13s15s16s17s20;
  s9_0014: s9 + Rs4s6s7s8s11s13s15s16s17s20 => Rs4s6s7s8s9s11s13s15s16s17s20; rxnVolume*s9_def*s9*Rs4s6s7s8s11s13s15s16s17s20;
  s9_0015: s9 + Rs4s5s6s7s8s11s13s15s16s17s20 => Rs4s5s6s7s8s9s11s13s15s16s17s20; rxnVolume*s9_def*s9*Rs4s5s6s7s8s11s13s15s16s17s20;
  s12_0023: s12 + Rs4s5s6s7s8s11s13s15s16s17s20 => Rs4s5s6s7s8s11s12s13s15s16s17s20; rxnVolume*s12_def*s12*Rs4s5s6s7s8s11s13s15s16s17s20;
  s5_0020: s5 + Rs4s6s7s8s9s11s13s15s16s17s20 => Rs4s5s6s7s8s9s11s13s15s16s17s20; rxnVolume*s5_def*s5*Rs4s6s7s8s9s11s13s15s16s17s20;
  s13_0021: s13 + Rs4s5s6s7s8s9s11s12s14s15s16s17s19s20 => Rs4s5s6s7s8s9s11s12s13s14s15s16s17s19s20; rxnVolume*s13_def*s13*Rs4s5s6s7s8s9s11s12s14s15s16s17s19s20;
  s10_0011: s10 + Rs4s6s7s8s9s11s13s15s16s17s20 => Rs4s6s7s8s9s10s11s13s15s16s17s20; rxnVolume*s10_def*s10*Rs4s6s7s8s9s11s13s15s16s17s20;
  s12_0024: s12 + Rs4s6s7s8s9s11s13s15s16s17s20 => Rs4s6s7s8s9s11s12s13s15s16s17s20; rxnVolume*s12_def*s12*Rs4s6s7s8s9s11s13s15s16s17s20;
  s19_0006: s19 + Rs4s6s7s8s9s11s13s15s16s17s20 => Rs4s6s7s8s9s11s13s15s16s17s19s20; rxnVolume*s19_def*s19*Rs4s6s7s8s9s11s13s15s16s17s20;
  s10_0012: s10 + Rs4s5s6s7s8s9s11s13s15s16s17s20 => Rs4s5s6s7s8s9s10s11s13s15s16s17s20; rxnVolume*s10_def*s10*Rs4s5s6s7s8s9s11s13s15s16s17s20;
  s12_0025: s12 + Rs4s5s6s7s8s9s11s13s15s16s17s20 => Rs4s5s6s7s8s9s11s12s13s15s16s17s20; rxnVolume*s12_def*s12*Rs4s5s6s7s8s9s11s13s15s16s17s20;
  s19_0007: s19 + Rs4s5s6s7s8s9s11s13s15s16s17s20 => Rs4s5s6s7s8s9s11s13s15s16s17s19s20; rxnVolume*s19_def*s19*Rs4s5s6s7s8s9s11s13s15s16s17s20;
  s5_0021: s5 + Rs4s6s7s8s9s10s11s13s15s16s17s20 => Rs4s5s6s7s8s9s10s11s13s15s16s17s20; rxnVolume*s5_def*s5*Rs4s6s7s8s9s10s11s13s15s16s17s20;
  s12_0026: s12 + Rs4s6s7s8s9s10s11s13s15s16s17s20 => Rs4s6s7s8s9s10s11s12s13s15s16s17s20; rxnVolume*s12_def*s12*Rs4s6s7s8s9s10s11s13s15s16s17s20;
  s19_0008: s19 + Rs4s6s7s8s9s10s11s13s15s16s17s20 => Rs4s6s7s8s9s10s11s13s15s16s17s19s20; rxnVolume*s19_def*s19*Rs4s6s7s8s9s10s11s13s15s16s17s20;
  s3_0004: s3 + Rs4s5s6s7s8s9s10s11s13s15s16s17s20 => Rs3s4s5s6s7s8s9s10s11s13s15s16s17s20; rxnVolume*s3_def*s3*Rs4s5s6s7s8s9s10s11s13s15s16s17s20;
  s12_0027: s12 + Rs4s5s6s7s8s9s10s11s13s15s16s17s20 => Rs4s5s6s7s8s9s10s11s12s13s15s16s17s20; rxnVolume*s12_def*s12*Rs4s5s6s7s8s9s10s11s13s15s16s17s20;
  s19_0009: s19 + Rs4s5s6s7s8s9s10s11s13s15s16s17s20 => Rs4s5s6s7s8s9s10s11s13s15s16s17s19s20; rxnVolume*s19_def*s19*Rs4s5s6s7s8s9s10s11s13s15s16s17s20;
  s12_0028: s12 + Rs3s4s5s6s7s8s9s10s11s13s15s16s17s20 => Rs3s4s5s6s7s8s9s10s11s12s13s15s16s17s20; rxnVolume*s12_def*s12*Rs3s4s5s6s7s8s9s10s11s13s15s16s17s20;
  s19_0010: s19 + Rs3s4s5s6s7s8s9s10s11s13s15s16s17s20 => Rs3s4s5s6s7s8s9s10s11s13s15s16s17s19s20; rxnVolume*s19_def*s19*Rs3s4s5s6s7s8s9s10s11s13s15s16s17s20;
  s5_0022: s5 + Rs4s6s7s8s9s10s13s14s15s16s17s19s20 => Rs4s5s6s7s8s9s10s13s14s15s16s17s19s20; rxnVolume*s5_def*s5*Rs4s6s7s8s9s10s13s14s15s16s17s19s20;
  s11_0028: s11 + Rs4s6s7s8s9s10s13s14s15s16s17s19s20 => Rs4s6s7s8s9s10s11s13s14s15s16s17s19s20; rxnVolume*s11_def*s11*Rs4s6s7s8s9s10s13s14s15s16s17s19s20;
  s12_0029: s12 + Rs4s6s7s8s9s10s13s14s15s16s17s19s20 => Rs4s6s7s8s9s10s12s13s14s15s16s17s19s20; rxnVolume*s12_def*s12*Rs4s6s7s8s9s10s13s14s15s16s17s19s20;
  s3_0005: s3 + Rs4s5s6s7s8s9s10s13s14s15s16s17s19s20 => Rs3s4s5s6s7s8s9s10s13s14s15s16s17s19s20; rxnVolume*s3_def*s3*Rs4s5s6s7s8s9s10s13s14s15s16s17s19s20;
  s11_0029: s11 + Rs4s5s6s7s8s9s10s13s14s15s16s17s19s20 => Rs4s5s6s7s8s9s10s11s13s14s15s16s17s19s20; rxnVolume*s11_def*s11*Rs4s5s6s7s8s9s10s13s14s15s16s17s19s20;
  s5_0023: s5 + Rs4s6s7s8s9s12s13s15s16s17s20 => Rs4s5s6s7s8s9s12s13s15s16s17s20; rxnVolume*s5_def*s5*Rs4s6s7s8s9s12s13s15s16s17s20;
  s11_0030: s11 + Rs3s4s5s6s7s8s9s10s13s14s15s16s17s19s20 => Rs3s4s5s6s7s8s9s10s11s13s14s15s16s17s19s20; rxnVolume*s11_def*s11*Rs3s4s5s6s7s8s9s10s13s14s15s16s17s19s20;
  s10_0013: s10 + Rs4s6s7s8s9s12s13s15s16s17s20 => Rs4s6s7s8s9s10s12s13s15s16s17s20; rxnVolume*s10_def*s10*Rs4s6s7s8s9s12s13s15s16s17s20;
  s12_0030: s12 + Rs3s4s5s6s7s8s9s10s13s14s15s16s17s19s20 => Rs3s4s5s6s7s8s9s10s12s13s14s15s16s17s19s20; rxnVolume*s12_def*s12*Rs3s4s5s6s7s8s9s10s13s14s15s16s17s19s20;
  s11_0031: s11 + Rs4s6s7s8s9s12s13s15s16s17s20 => Rs4s6s7s8s9s11s12s13s15s16s17s20; rxnVolume*s11_def*s11*Rs4s6s7s8s9s12s13s15s16s17s20;
  s10_0014: s10 + Rs4s5s6s7s8s9s12s13s15s16s17s20 => Rs4s5s6s7s8s9s10s12s13s15s16s17s20; rxnVolume*s10_def*s10*Rs4s5s6s7s8s9s12s13s15s16s17s20;
  s5_0024: s5 + Rs4s6s7s8s9s11s13s14s15s16s17s19s20 => Rs4s5s6s7s8s9s11s13s14s15s16s17s19s20; rxnVolume*s5_def*s5*Rs4s6s7s8s9s11s13s14s15s16s17s19s20;
  s11_0032: s11 + Rs4s5s6s7s8s9s12s13s15s16s17s20 => Rs4s5s6s7s8s9s11s12s13s15s16s17s20; rxnVolume*s11_def*s11*Rs4s5s6s7s8s9s12s13s15s16s17s20;
  s10_0015: s10 + Rs4s6s7s8s9s11s13s14s15s16s17s19s20 => Rs4s6s7s8s9s10s11s13s14s15s16s17s19s20; rxnVolume*s10_def*s10*Rs4s6s7s8s9s11s13s14s15s16s17s19s20;
  s10_0016: s10 + Rs4s5s6s7s8s9s11s13s14s15s16s17s19s20 => Rs4s5s6s7s8s9s10s11s13s14s15s16s17s19s20; rxnVolume*s10_def*s10*Rs4s5s6s7s8s9s11s13s14s15s16s17s19s20;
  s12_0031: s12 + Rs4s5s6s7s8s9s11s13s14s15s16s17s19s20 => Rs4s5s6s7s8s9s11s12s13s14s15s16s17s19s20; rxnVolume*s12_def*s12*Rs4s5s6s7s8s9s11s13s14s15s16s17s19s20;
  s5_0025: s5 + Rs4s6s7s8s9s10s11s13s14s15s16s17s19s20 => Rs4s5s6s7s8s9s10s11s13s14s15s16s17s19s20; rxnVolume*s5_def*s5*Rs4s6s7s8s9s10s11s13s14s15s16s17s19s20;
  s12_0032: s12 + Rs4s6s7s8s9s10s11s13s14s15s16s17s19s20 => Rs4s6s7s8s9s10s11s12s13s14s15s16s17s19s20; rxnVolume*s12_def*s12*Rs4s6s7s8s9s10s11s13s14s15s16s17s19s20;
  s3_0006: s3 + Rs4s5s6s7s8s9s10s11s13s14s15s16s17s19s20 => Rs3s4s5s6s7s8s9s10s11s13s14s15s16s17s19s20; rxnVolume*s3_def*s3*Rs4s5s6s7s8s9s10s11s13s14s15s16s17s19s20;
  s12_0033: s12 + Rs4s5s6s7s8s9s10s11s13s14s15s16s17s19s20 => Rs4s5s6s7s8s9s10s11s12s13s14s15s16s17s19s20; rxnVolume*s12_def*s12*Rs4s5s6s7s8s9s10s11s13s14s15s16s17s19s20;
  s12_0034: s12 + Rs3s4s5s6s7s8s9s10s11s13s14s15s16s17s19s20 => Rs3s4s5s6s7s8s9s10s11s12s13s14s15s16s17s19s20; rxnVolume*s12_def*s12*Rs3s4s5s6s7s8s9s10s11s13s14s15s16s17s19s20;
  s5_0026: s5 + Rs4s6s7s8s9s10s12s13s15s16s17s20 => Rs4s5s6s7s8s9s10s12s13s15s16s17s20; rxnVolume*s5_def*s5*Rs4s6s7s8s9s10s12s13s15s16s17s20;
  s11_0033: s11 + Rs4s6s7s8s9s10s12s13s15s16s17s20 => Rs4s6s7s8s9s10s11s12s13s15s16s17s20; rxnVolume*s11_def*s11*Rs4s6s7s8s9s10s12s13s15s16s17s20;
  s3_0007: s3 + Rs4s5s6s7s8s9s10s12s13s15s16s17s20 => Rs3s4s5s6s7s8s9s10s12s13s15s16s17s20; rxnVolume*s3_def*s3*Rs4s5s6s7s8s9s10s12s13s15s16s17s20;
  s11_0034: s11 + Rs4s5s6s7s8s9s10s12s13s15s16s17s20 => Rs4s5s6s7s8s9s10s11s12s13s15s16s17s20; rxnVolume*s11_def*s11*Rs4s5s6s7s8s9s10s12s13s15s16s17s20;
  s11_0035: s11 + Rs3s4s5s6s7s8s9s10s12s13s15s16s17s20 => Rs3s4s5s6s7s8s9s10s11s12s13s15s16s17s20; rxnVolume*s11_def*s11*Rs3s4s5s6s7s8s9s10s12s13s15s16s17s20;
  s19_0011: s19 + Rs3s4s5s6s7s8s9s10s12s13s15s16s17s20 => Rs3s4s5s6s7s8s9s10s12s13s15s16s17s19s20; rxnVolume*s19_def*s19*Rs3s4s5s6s7s8s9s10s12s13s15s16s17s20;
  s9_0016: s9 + Rs4s5s6s7s8s11s12s13s15s16s17s20 => Rs4s5s6s7s8s9s11s12s13s15s16s17s20; rxnVolume*s9_def*s9*Rs4s5s6s7s8s11s12s13s15s16s17s20;
  s19_0012: s19 + Rs4s5s6s7s8s11s12s13s15s16s17s20 => Rs4s5s6s7s8s11s12s13s15s16s17s19s20; rxnVolume*s19_def*s19*Rs4s5s6s7s8s11s12s13s15s16s17s20;
  s5_0027: s5 + Rs4s6s7s8s9s11s12s13s15s16s17s20 => Rs4s5s6s7s8s9s11s12s13s15s16s17s20; rxnVolume*s5_def*s5*Rs4s6s7s8s9s11s12s13s15s16s17s20;
  s10_0017: s10 + Rs4s6s7s8s9s11s12s13s15s16s17s20 => Rs4s6s7s8s9s10s11s12s13s15s16s17s20; rxnVolume*s10_def*s10*Rs4s6s7s8s9s11s12s13s15s16s17s20;
  s10_0018: s10 + Rs4s5s6s7s8s9s11s12s13s15s16s17s20 => Rs4s5s6s7s8s9s10s11s12s13s15s16s17s20; rxnVolume*s10_def*s10*Rs4s5s6s7s8s9s11s12s13s15s16s17s20;
  s11_0036: s11 + Rs4s6s7s8s9s10s12s13s14s15s16s17s19s20 => Rs4s6s7s8s9s10s11s12s13s14s15s16s17s19s20; rxnVolume*s11_def*s11*Rs4s6s7s8s9s10s12s13s14s15s16s17s19s20;
  s19_0013: s19 + Rs4s5s6s7s8s9s11s12s13s15s16s17s20 => Rs4s5s6s7s8s9s11s12s13s15s16s17s19s20; rxnVolume*s19_def*s19*Rs4s5s6s7s8s9s11s12s13s15s16s17s20;
  s5_0028: s5 + Rs4s6s7s8s9s10s11s12s13s15s16s17s20 => Rs4s5s6s7s8s9s10s11s12s13s15s16s17s20; rxnVolume*s5_def*s5*Rs4s6s7s8s9s10s11s12s13s15s16s17s20;
  s19_0014: s19 + Rs4s6s7s8s9s10s11s12s13s15s16s17s20 => Rs4s6s7s8s9s10s11s12s13s15s16s17s19s20; rxnVolume*s19_def*s19*Rs4s6s7s8s9s10s11s12s13s15s16s17s20;
  s11_0037: s11 + Rs3s4s5s6s7s8s9s10s12s13s14s15s16s17s19s20 => Rs3s4s5s6s7s8s9s10s11s12s13s14s15s16s17s19s20; rxnVolume*s11_def*s11*Rs3s4s5s6s7s8s9s10s12s13s14s15s16s17s19s20;
  s20_0013: s20 + R => Rs20; rxnVolume*s20_def*s20*R;
  s3_0008: s3 + Rs4s5s6s7s8s9s10s11s12s13s15s16s17s20 => Rs3s4s5s6s7s8s9s10s11s12s13s15s16s17s20; rxnVolume*s3_def*s3*Rs4s5s6s7s8s9s10s11s12s13s15s16s17s20;
  s19_0015: s19 + Rs4s5s6s7s8s9s10s11s12s13s15s16s17s20 => Rs4s5s6s7s8s9s10s11s12s13s15s16s17s19s20; rxnVolume*s19_def*s19*Rs4s5s6s7s8s9s10s11s12s13s15s16s17s20;
  s19_0016: s19 + Rs3s4s5s6s7s8s9s10s11s12s13s15s16s17s20 => Rs3s4s5s6s7s8s9s10s11s12s13s15s16s17s19s20; rxnVolume*s19_def*s19*Rs3s4s5s6s7s8s9s10s11s12s13s15s16s17s20;
  s10_0019: s10 + Rs4s5s6s7s8s9s11s12s13s14s15s16s17s19s20 => Rs4s5s6s7s8s9s10s11s12s13s14s15s16s17s19s20; rxnVolume*s10_def*s10*Rs4s5s6s7s8s9s11s12s13s14s15s16s17s19s20;
  s5_0029: s5 + Rs4s6s7s8s9s10s11s12s13s14s15s16s17s19s20 => Rs4s5s6s7s8s9s10s11s12s13s14s15s16s17s19s20; rxnVolume*s5_def*s5*Rs4s6s7s8s9s10s11s12s13s14s15s16s17s19s20;
  s3_0009: s3 + Rs4s5s6s7s8s9s10s11s12s13s14s15s16s17s19s20 => Rs3s4s5s6s7s8s9s10s11s12s13s14s15s16s17s19s20; rxnVolume*s3_def*s3*Rs4s5s6s7s8s9s10s11s12s13s14s15s16s17s19s20;
  s14_0013: s14 + Rs4s6s7s8s9s10s13s15s17s19 => Rs4s6s7s8s9s10s13s14s15s17s19; rxnVolume*s14_def*s14*Rs4s6s7s8s9s10s13s15s17s19;
  s4_0014: s4 + R => Rs4; rxnVolume*s4_def*s4*R;
  s15_0010: s15 + R => Rs15; rxnVolume*s15_def*s15*R;
  s17_0023: s17 + R => Rs17; rxnVolume*s17_def*s17*R;
  s8_0023: s8 + R => Rs8; rxnVolume*s8_def*s8*R;
  s20_0014: s20 + Rs4 => Rs4s20; rxnVolume*s20_def*s20*Rs4;
  s15_0011: s15 + Rs4 => Rs4s15; rxnVolume*s15_def*s15*Rs4;

  // Unit definitions:
  unit per_M_per_s = litre / (mole * second);
end
