// SBML level 2 version 4

model In_vitro_SSU_assembly_reduced_model_15_C()
  // Towards a whole-cell model of ribosome biogenesis: Kinetic modeling of SSU assembly
  // Tyler M. Earnest1,2, Jonathan Lai3, Ke Chen3,4, Michael J. Hallock5, James R. Williamson6,7,8, Zaida Luthey-Schulten1,2,3,†
  // 1Center for the Physics of Living Cells, Urbana, IL, USA; 2Department of Physics, University of Illinois, Urbana, IL, USA; 3Department of Chemistry, University of Illinois, Urbana, IL, USA; 4Department of Bioengineering, University of California, San Diego, La Jolla, CA, USA; 5School of Chemical Sciences, University of Illinois, Urbana, IL USA; 6Department of Integrative Structural and Computational Biology, Scripps Research Institute, La Jolla, CA, USA; 7Department of Chemistry, Scripps Research Institute, La Jolla, CA, USA; 8Skaggs Institute for Chemical Biology, Scripps Research Institute, La Jolla, CA, USA
  // †Correspondence to zan@illinois.edu
  // doi:10.1016/j.bpj.2015.07.030
  // In vitro SSU assembly, reduced model @ 15°C

  // Compartments:
  compartment rxnVolume = 0.00059;

  // Species:
  // Assembly intermediate 16S
  species R in rxnVolume = 3.05e-7;
  // Assembly intermediate 000:17
  species Rs17 in rxnVolume = 0;
  // Assembly intermediate 000:4
  species Rs4 in rxnVolume = 0;
  // Assembly intermediate 000:20
  species Rs20 in rxnVolume = 0;
  // Assembly intermediate 000:4,17
  species Rs4s17 in rxnVolume = 0;
  // Assembly intermediate 000:4,20
  species Rs4s20 in rxnVolume = 0;
  // Assembly intermediate 000:4,16,20
  species Rs4s16s20 in rxnVolume = 0;
  // Assembly intermediate 000:17,20
  species Rs17s20 in rxnVolume = 0;
  // Assembly intermediate 100
  species Rs4s17s20 in rxnVolume = 0;
  // Assembly intermediate 200
  species Rs4s16s17s20 in rxnVolume = 0;
  // Assembly intermediate 101
  species Rs4s7s17s20 in rxnVolume = 0;
  // Assembly intermediate 201
  species Rs4s7s16s17s20 in rxnVolume = 0;
  // Assembly intermediate 100:8
  species Rs4s8s17s20 in rxnVolume = 0;
  // Assembly intermediate 200:8
  species Rs4s8s16s17s20 in rxnVolume = 0;
  // Assembly intermediate 200:5,8
  species Rs4s5s8s16s17s20 in rxnVolume = 0;
  // Assembly intermediate 201:5,8
  species Rs4s5s7s8s16s17s20 in rxnVolume = 0;
  // Assembly intermediate 201:5,8,9,19
  species Rs4s5s7s8s9s16s17s19s20 in rxnVolume = 0;
  // Assembly intermediate 201:5,8,9
  species Rs4s5s7s8s9s16s17s20 in rxnVolume = 0;
  // Assembly intermediate 212:10,14
  species Rs4s7s8s9s10s13s14s15s16s17s19s20 in rxnVolume = 0;
  // Assembly intermediate 213:5
  species Rs3s4s5s7s8s9s10s13s14s15s16s17s19s20 in rxnVolume = 0;
  // Assembly intermediate 201:5,8,9,10
  species Rs4s5s7s8s9s10s16s17s20 in rxnVolume = 0;
  // Assembly intermediate 201:3,5,8,9,10
  species Rs3s4s5s7s8s9s10s16s17s20 in rxnVolume = 0;
  // Assembly intermediate 200:8,12
  species Rs4s8s12s16s17s20 in rxnVolume = 0;
  // Assembly intermediate 201:8,12
  species Rs4s7s8s12s16s17s20 in rxnVolume = 0;
  // Assembly intermediate 201:8,9,12
  species Rs4s7s8s9s12s16s17s20 in rxnVolume = 0;
  // Assembly intermediate 201:8,9,12,19
  species Rs4s7s8s9s12s16s17s19s20 in rxnVolume = 0;
  // Assembly intermediate 301:8,9
  species Rs4s5s7s8s9s12s16s17s20 in rxnVolume = 0;
  // Assembly intermediate 231:9
  species Rs4s6s7s8s9s11s15s16s17s20 in rxnVolume = 0;
  // Assembly intermediate 201:8,9,10,12
  species Rs4s7s8s9s10s12s16s17s20 in rxnVolume = 0;
  // Assembly intermediate 201:8,9,10,12,19
  species Rs4s7s8s9s10s12s16s17s19s20 in rxnVolume = 0;
  // Assembly intermediate 221:9,10,19
  species Rs4s6s7s8s9s10s15s16s17s19s20 in rxnVolume = 0;
  // Assembly intermediate 202:5,8
  species Rs4s5s7s8s9s13s16s17s19s20 in rxnVolume = 0;
  // Assembly intermediate 202:5,8,10
  species Rs4s5s7s8s9s10s13s16s17s19s20 in rxnVolume = 0;
  // Assembly intermediate 202:3,5,8,10
  species Rs3s4s5s7s8s9s10s13s16s17s19s20 in rxnVolume = 0;
  // Assembly intermediate 202:8
  species Rs4s7s8s9s13s16s17s19s20 in rxnVolume = 0;
  // Assembly intermediate 231:9,10
  species Rs4s6s7s8s9s10s11s15s16s17s20 in rxnVolume = 0;
  // Assembly intermediate 231:19
  species Rs4s6s7s8s11s15s16s17s19s20 in rxnVolume = 0;
  // Assembly intermediate 202:8,12
  species Rs4s7s8s9s12s13s16s17s19s20 in rxnVolume = 0;
  // Assembly intermediate 231:9,19
  species Rs4s6s7s8s9s11s15s16s17s19s20 in rxnVolume = 0;
  // Assembly intermediate 202:8,10,12
  species Rs4s7s8s9s10s12s13s16s17s19s20 in rxnVolume = 0;
  // Assembly intermediate 202:8,10
  species Rs4s7s8s9s10s13s16s17s19s20 in rxnVolume = 0;
  // Assembly intermediate 231:9,10,19
  species Rs4s6s7s8s9s10s11s15s16s17s19s20 in rxnVolume = 0;
  // Assembly intermediate 101:8
  species Rs4s7s8s17s20 in rxnVolume = 0;
  // Assembly intermediate 201:8
  species Rs4s7s8s16s17s20 in rxnVolume = 0;
  // Assembly intermediate 201:9
  species Rs4s7s9s16s17s20 in rxnVolume = 0;
  // Assembly intermediate 202:8,10,14
  species Rs4s7s8s9s10s13s14s16s17s19s20 in rxnVolume = 0;
  // Assembly intermediate 202:5,8,10,14
  species Rs4s5s7s8s9s10s13s14s16s17s19s20 in rxnVolume = 0;
  // Assembly intermediate 203:5,8
  species Rs3s4s5s7s8s9s10s13s14s16s17s19s20 in rxnVolume = 0;
  // Assembly intermediate 201:8,9
  species Rs4s7s8s9s16s17s20 in rxnVolume = 0;
  // Assembly intermediate 202:8,10,12,14
  species Rs4s7s8s9s10s12s13s14s16s17s19s20 in rxnVolume = 0;
  // Assembly intermediate 201:8,9,10
  species Rs4s7s8s9s10s16s17s20 in rxnVolume = 0;
  // Assembly intermediate 201:8,19
  species Rs4s7s8s16s17s19s20 in rxnVolume = 0;
  // Assembly intermediate 201:9,15
  species Rs4s7s9s15s16s17s20 in rxnVolume = 0;
  // Assembly intermediate 221:9,19
  species Rs4s6s7s8s9s15s16s17s19s20 in rxnVolume = 0;
  // Assembly intermediate 221:5,9
  species Rs4s5s6s7s8s9s15s16s17s20 in rxnVolume = 0;
  // Assembly intermediate 211:9,10
  species Rs4s7s8s9s10s15s16s17s20 in rxnVolume = 0;
  // Assembly intermediate 211:3,5,9,10
  species Rs3s4s5s7s8s9s10s15s16s17s20 in rxnVolume = 0;
  // Assembly intermediate 221:9,10
  species Rs4s6s7s8s9s10s15s16s17s20 in rxnVolume = 0;
  // Assembly intermediate 221:3,5,9,10
  species Rs3s4s5s6s7s8s9s10s15s16s17s20 in rxnVolume = 0;
  // Assembly intermediate 200:6,11,15
  species Rs4s6s11s15s16s17s20 in rxnVolume = 0;
  // Assembly intermediate 201:6,11,15
  species Rs4s6s7s11s15s16s17s20 in rxnVolume = 0;
  // Assembly intermediate 230
  species Rs4s6s8s11s15s16s17s20 in rxnVolume = 0;
  // Assembly intermediate 230:5
  species Rs4s5s6s8s11s15s16s17s20 in rxnVolume = 0;
  // Assembly intermediate 231
  species Rs4s6s7s8s11s15s16s17s20 in rxnVolume = 0;
  // Assembly intermediate 231:5
  species Rs4s5s6s7s8s11s15s16s17s20 in rxnVolume = 0;
  // Assembly intermediate 201:8,9,19
  species Rs4s7s8s9s16s17s19s20 in rxnVolume = 0;
  // Assembly intermediate 231:5,19
  species Rs4s5s6s7s8s11s15s16s17s19s20 in rxnVolume = 0;
  // Assembly intermediate 201:6,9,11,15
  species Rs4s6s7s9s11s15s16s17s20 in rxnVolume = 0;
  // Assembly intermediate 231:5,9
  species Rs4s5s6s7s8s9s11s15s16s17s20 in rxnVolume = 0;
  // Assembly intermediate 231:5,9,19
  species Rs4s5s6s7s8s9s11s15s16s17s19s20 in rxnVolume = 0;
  // Assembly intermediate 231:5,9,10
  species Rs4s5s6s7s8s9s10s11s15s16s17s20 in rxnVolume = 0;
  // Assembly intermediate 231:3,5,9,10
  species Rs3s4s5s6s7s8s9s10s11s15s16s17s20 in rxnVolume = 0;
  // Assembly intermediate 231:5,9,10,19
  species Rs4s5s6s7s8s9s10s11s15s16s17s19s20 in rxnVolume = 0;
  // Assembly intermediate 231:3,5,9,10,19
  species Rs3s4s5s6s7s8s9s10s11s15s16s17s19s20 in rxnVolume = 0;
  // Assembly intermediate 211:9,12
  species Rs4s7s8s9s12s15s16s17s20 in rxnVolume = 0;
  // Assembly intermediate 311:9
  species Rs4s5s7s8s9s12s15s16s17s20 in rxnVolume = 0;
  // Assembly intermediate 221:9,12
  species Rs4s6s7s8s9s12s15s16s17s20 in rxnVolume = 0;
  // Assembly intermediate 321:9
  species Rs4s5s6s7s8s9s12s15s16s17s20 in rxnVolume = 0;
  // Assembly intermediate 211:9,10,12
  species Rs4s7s8s9s10s12s15s16s17s20 in rxnVolume = 0;
  // Assembly intermediate 221:9,10,12
  species Rs4s6s7s8s9s10s12s15s16s17s20 in rxnVolume = 0;
  // Assembly intermediate 230:12
  species Rs4s6s8s11s12s15s16s17s20 in rxnVolume = 0;
  // Assembly intermediate 231:12
  species Rs4s6s7s8s11s12s15s16s17s20 in rxnVolume = 0;
  // Assembly intermediate 231:12,19
  species Rs4s6s7s8s11s12s15s16s17s19s20 in rxnVolume = 0;
  // Assembly intermediate 231:9,12
  species Rs4s6s7s8s9s11s12s15s16s17s20 in rxnVolume = 0;
  // Assembly intermediate 231:9,12,19
  species Rs4s6s7s8s9s11s12s15s16s17s19s20 in rxnVolume = 0;
  // Assembly intermediate 331:9
  species Rs4s5s6s7s8s9s11s12s15s16s17s20 in rxnVolume = 0;
  // Assembly intermediate 331:9,19
  species Rs4s5s6s7s8s9s11s12s15s16s17s19s20 in rxnVolume = 0;
  // Assembly intermediate 201:8,9,10,19
  species Rs4s7s8s9s10s16s17s19s20 in rxnVolume = 0;
  // Assembly intermediate 231:9,10,12
  species Rs4s6s7s8s9s10s11s12s15s16s17s20 in rxnVolume = 0;
  // Assembly intermediate 231:9,10,12,19
  species Rs4s6s7s8s9s10s11s12s15s16s17s19s20 in rxnVolume = 0;
  // Assembly intermediate 331:9,10
  species Rs4s5s6s7s8s9s10s11s12s15s16s17s20 in rxnVolume = 0;
  // Assembly intermediate 331:3,9,10
  species Rs3s4s5s6s7s8s9s10s11s12s15s16s17s20 in rxnVolume = 0;
  // Assembly intermediate 331:9,10,19
  species Rs4s5s6s7s8s9s10s11s12s15s16s17s19s20 in rxnVolume = 0;
  // Assembly intermediate 331:3,9,10,19
  species Rs3s4s5s6s7s8s9s10s11s12s15s16s17s19s20 in rxnVolume = 0;
  // Assembly intermediate 222:3,5,10
  species Rs3s4s5s6s7s8s9s10s13s15s16s17s19s20 in rxnVolume = 0;
  // Assembly intermediate 232:5
  species Rs4s5s6s7s8s9s11s13s15s16s17s19s20 in rxnVolume = 0;
  // Assembly intermediate 222
  species Rs4s6s7s8s9s13s15s16s17s19s20 in rxnVolume = 0;
  // Assembly intermediate 232:3,5,10
  species Rs3s4s5s6s7s8s9s10s11s13s15s16s17s19s20 in rxnVolume = 0;
  // Assembly intermediate 212:10,12
  species Rs4s7s8s9s10s12s13s15s16s17s19s20 in rxnVolume = 0;
  // Assembly intermediate 222:10,12
  species Rs4s6s7s8s9s10s12s13s15s16s17s19s20 in rxnVolume = 0;
  // Assembly intermediate 232:12
  species Rs4s6s7s8s9s11s12s13s15s16s17s19s20 in rxnVolume = 0;
  // Assembly intermediate 332
  species Rs4s5s6s7s8s9s11s12s13s15s16s17s19s20 in rxnVolume = 0;
  // Assembly intermediate 232:10,12
  species Rs4s6s7s8s9s10s11s12s13s15s16s17s19s20 in rxnVolume = 0;
  // Assembly intermediate 332:10
  species Rs4s5s6s7s8s9s10s11s12s13s15s16s17s19s20 in rxnVolume = 0;
  // Assembly intermediate 332:3,10
  species Rs3s4s5s6s7s8s9s10s11s12s13s15s16s17s19s20 in rxnVolume = 0;
  // Assembly intermediate 212:10
  species Rs4s7s8s9s10s13s15s16s17s19s20 in rxnVolume = 0;
  // Assembly intermediate 212:3,5,10
  species Rs3s4s5s7s8s9s10s13s15s16s17s19s20 in rxnVolume = 0;
  // Assembly intermediate 222:10
  species Rs4s6s7s8s9s10s13s15s16s17s19s20 in rxnVolume = 0;
  // Assembly intermediate 231:13,19
  species Rs4s6s7s8s11s13s15s16s17s19s20 in rxnVolume = 0;
  // Assembly intermediate 100:15
  species Rs4s15s17s20 in rxnVolume = 0;
  // Assembly intermediate 100:6,15
  species Rs4s6s15s17s20 in rxnVolume = 0;
  // Assembly intermediate 232
  species Rs4s6s7s8s9s11s13s15s16s17s19s20 in rxnVolume = 0;
  // Assembly intermediate 200:15
  species Rs4s15s16s17s20 in rxnVolume = 0;
  // Assembly intermediate 200:6,15
  species Rs4s6s15s16s17s20 in rxnVolume = 0;
  // Assembly intermediate 201:6,15
  species Rs4s6s7s15s16s17s20 in rxnVolume = 0;
  // Assembly intermediate 210
  species Rs4s8s15s16s17s20 in rxnVolume = 0;
  // Assembly intermediate 220
  species Rs4s6s8s15s16s17s20 in rxnVolume = 0;
  // Assembly intermediate 221
  species Rs4s6s7s8s15s16s17s20 in rxnVolume = 0;
  // Assembly intermediate 222:10,14
  species Rs4s6s7s8s9s10s13s14s15s16s17s19s20 in rxnVolume = 0;
  // Assembly intermediate 223:5
  species Rs3s4s5s6s7s8s9s10s13s14s15s16s17s19s20 in rxnVolume = 0;
  // Assembly intermediate 201:6,9,15
  species Rs4s6s7s9s15s16s17s20 in rxnVolume = 0;
  // Assembly intermediate 232:10
  species Rs4s6s7s8s9s10s11s13s15s16s17s19s20 in rxnVolume = 0;
  // Assembly intermediate 232:5,10
  species Rs4s5s6s7s8s9s10s11s13s15s16s17s19s20 in rxnVolume = 0;
  // Assembly intermediate 211:9
  species Rs4s7s8s9s15s16s17s20 in rxnVolume = 0;
  // Assembly intermediate 211:5,9
  species Rs4s5s7s8s9s15s16s17s20 in rxnVolume = 0;
  // Assembly intermediate 221:9
  species Rs4s6s7s8s9s15s16s17s20 in rxnVolume = 0;
  // Assembly intermediate 232:10,14
  species Rs4s6s7s8s9s10s11s13s14s15s16s17s19s20 in rxnVolume = 0;
  // Assembly intermediate 232:5,10,14
  species Rs4s5s6s7s8s9s10s11s13s14s15s16s17s19s20 in rxnVolume = 0;
  // Assembly intermediate 233:5
  species Rs3s4s5s6s7s8s9s10s11s13s14s15s16s17s19s20 in rxnVolume = 0;
  // Assembly intermediate 212:10,12,14
  species Rs4s7s8s9s10s12s13s14s15s16s17s19s20 in rxnVolume = 0;
  // Assembly intermediate 222:10,12,14
  species Rs4s6s7s8s9s10s12s13s14s15s16s17s19s20 in rxnVolume = 0;
  // Assembly intermediate 232:10,12,14
  species Rs4s6s7s8s9s10s11s12s13s14s15s16s17s19s20 in rxnVolume = 0;
  // Assembly intermediate 332:10,14
  species Rs4s5s6s7s8s9s10s11s12s13s14s15s16s17s19s20 in rxnVolume = 0;
  // Assembly intermediate 30S
  species Rs3s4s5s6s7s8s9s10s11s12s13s14s15s16s17s19s20 in rxnVolume = 0;
  // Free S3
  species s3 in rxnVolume = 4.58e-7;
  // Free S4
  species s4 in rxnVolume = 4.58e-7;
  // Free S5
  species s5 in rxnVolume = 4.58e-7;
  // Free S6
  species s6 in rxnVolume = 4.58e-7;
  // Free S7
  species s7 in rxnVolume = 4.58e-7;
  // Free S8
  species s8 in rxnVolume = 4.58e-7;
  // Free S9
  species s9 in rxnVolume = 4.58e-7;
  // Free S10
  species s10 in rxnVolume = 4.58e-7;
  // Free S11
  species s11 in rxnVolume = 4.58e-7;
  // Free S12
  species s12 in rxnVolume = 4.58e-7;
  // Free S13
  species s13 in rxnVolume = 4.58e-7;
  // Free S14
  species s14 in rxnVolume = 4.58e-7;
  // Free S15
  species s15 in rxnVolume = 4.58e-7;
  // Free S16
  species s16 in rxnVolume = 4.58e-7;
  // Free S17
  species s17 in rxnVolume = 4.58e-7;
  // Free S19
  species s19 in rxnVolume = 4.58e-7;
  // Free S20
  species s20 in rxnVolume = 4.58e-7;

  // Parameters:
  s13_19 = 113360.8 per_M_per_s;
  s13_pri = 4 per_M_per_s;
  s13_def = 4 per_M_per_s;
  s14_def = 1173.074 per_M_per_s;
  s3_def = 37034.96 per_M_per_s;
  s16_def = 76552.16 per_M_per_s;
  s8_7r9 = 34185.18 per_M_per_s;
  s8_13 = 3428.903 per_M_per_s;
  s8_def = 452.0315 per_M_per_s;
  s11_def = 24412.12 per_M_per_s;
  s5_def = 170.1008 per_M_per_s;
  s12_def = 180.5918 per_M_per_s;
  s9_19 = 445553 per_M_per_s;
  s9_13 = 3007.371 per_M_per_s;
  s9_5c = 1027.184 per_M_per_s;
  s9_pri = 4 per_M_per_s;
  s9_def = 25723.82 per_M_per_s;
  s19_pri = 1838.055 per_M_per_s;
  s19_def = 571.7598 per_M_per_s;
  s6_def = 289038.9 per_M_per_s;
  s4_o7 = 291755.7 per_M_per_s;
  s4_def = 217280.7 per_M_per_s;
  s15_13o19 = 4 per_M_per_s;
  s15_def = 1265.167 per_M_per_s;
  s7_5c = 5146.03 per_M_per_s;
  s7_def = 1664.805 per_M_per_s;
  s10_19 = 65840.4 per_M_per_s;
  s10_def = 400.8128 per_M_per_s;
  s17_13o19 = 115190.8 per_M_per_s;
  s17_def = 161432.4 per_M_per_s;
  s20_7 = 932535.6 per_M_per_s;
  s20_def = 496781 per_M_per_s;

  // Reactions:
  s4_0000: s4 + Rs17 => Rs4s17; rxnVolume*s4_def*s4*Rs17;
  s20_0000: s20 + Rs17 => Rs17s20; rxnVolume*s20_def*s20*Rs17;
  s20_0001: s20 + Rs4s17 => Rs4s17s20; rxnVolume*s20_def*s20*Rs4s17;
  s17_0000: s17 + Rs4s16s20 => Rs4s16s17s20; rxnVolume*s17_def*s17*Rs4s16s20;
  s4_0001: s4 + Rs17s20 => Rs4s17s20; rxnVolume*s4_def*s4*Rs17s20;
  s15_0000: s15 + Rs4s17s20 => Rs4s15s17s20; rxnVolume*s15_def*s15*Rs4s17s20;
  s8_0000: s8 + Rs4s17s20 => Rs4s8s17s20; rxnVolume*s8_def*s8*Rs4s17s20;
  s7_0000: s7 + Rs4s17s20 => Rs4s7s17s20; rxnVolume*s7_def*s7*Rs4s17s20;
  s16_0000: s16 + Rs4s17s20 => Rs4s16s17s20; rxnVolume*s16_def*s16*Rs4s17s20;
  s8_0001: s8 + Rs4s7s17s20 => Rs4s7s8s17s20; rxnVolume*s8_7r9*s8*Rs4s7s17s20;
  s16_0001: s16 + Rs4s7s17s20 => Rs4s7s16s17s20; rxnVolume*s16_def*s16*Rs4s7s17s20;
  s7_0001: s7 + Rs4s8s17s20 => Rs4s7s8s17s20; rxnVolume*s7_def*s7*Rs4s8s17s20;
  s16_0002: s16 + Rs4s8s17s20 => Rs4s8s16s17s20; rxnVolume*s16_def*s16*Rs4s8s17s20;
  s16_0003: s16 + Rs4s7s8s17s20 => Rs4s7s8s16s17s20; rxnVolume*s16_def*s16*Rs4s7s8s17s20;
  s6_0000: s6 + Rs4s15s17s20 => Rs4s6s15s17s20; rxnVolume*s6_def*s6*Rs4s15s17s20;
  s16_0004: s16 + Rs4s15s17s20 => Rs4s15s16s17s20; rxnVolume*s16_def*s16*Rs4s15s17s20;
  s16_0005: s16 + Rs4s6s15s17s20 => Rs4s6s15s16s17s20; rxnVolume*s16_def*s16*Rs4s6s15s17s20;
  s9_0000: s9 + Rs4s7s8s16s17s19s20 => Rs4s7s8s9s16s17s19s20; rxnVolume*s9_19*s9*Rs4s7s8s16s17s19s20;
  s13_0000: s13 + Rs4s7s8s9s16s17s19s20 => Rs4s7s8s9s13s16s17s19s20; rxnVolume*s13_19*s13*Rs4s7s8s9s16s17s19s20;
  s5_0000: s5 + Rs4s7s8s9s16s17s19s20 => Rs4s5s7s8s9s16s17s19s20; rxnVolume*s5_def*s5*Rs4s7s8s9s16s17s19s20;
  s10_0000: s10 + Rs4s7s8s9s16s17s19s20 => Rs4s7s8s9s10s16s17s19s20; rxnVolume*s10_19*s10*Rs4s7s8s9s16s17s19s20;
  s12_0000: s12 + Rs4s7s8s9s16s17s19s20 => Rs4s7s8s9s12s16s17s19s20; rxnVolume*s12_def*s12*Rs4s7s8s9s16s17s19s20;
  s13_0001: s13 + Rs4s5s7s8s9s16s17s19s20 => Rs4s5s7s8s9s13s16s17s19s20; rxnVolume*s13_19*s13*Rs4s5s7s8s9s16s17s19s20;
  s13_0002: s13 + Rs4s7s8s9s10s16s17s19s20 => Rs4s7s8s9s10s13s16s17s19s20; rxnVolume*s13_19*s13*Rs4s7s8s9s10s16s17s19s20;
  s12_0001: s12 + Rs4s7s8s9s10s16s17s19s20 => Rs4s7s8s9s10s12s16s17s19s20; rxnVolume*s12_def*s12*Rs4s7s8s9s10s16s17s19s20;
  s13_0003: s13 + Rs4s7s8s9s12s16s17s19s20 => Rs4s7s8s9s12s13s16s17s19s20; rxnVolume*s13_19*s13*Rs4s7s8s9s12s16s17s19s20;
  s10_0001: s10 + Rs4s7s8s9s12s16s17s19s20 => Rs4s7s8s9s10s12s16s17s19s20; rxnVolume*s10_19*s10*Rs4s7s8s9s12s16s17s19s20;
  s13_0004: s13 + Rs4s7s8s9s10s12s16s17s19s20 => Rs4s7s8s9s10s12s13s16s17s19s20; rxnVolume*s13_19*s13*Rs4s7s8s9s10s12s16s17s19s20;
  s5_0001: s5 + Rs4s7s8s9s13s16s17s19s20 => Rs4s5s7s8s9s13s16s17s19s20; rxnVolume*s5_def*s5*Rs4s7s8s9s13s16s17s19s20;
  s10_0002: s10 + Rs4s7s8s9s13s16s17s19s20 => Rs4s7s8s9s10s13s16s17s19s20; rxnVolume*s10_19*s10*Rs4s7s8s9s13s16s17s19s20;
  s12_0002: s12 + Rs4s7s8s9s13s16s17s19s20 => Rs4s7s8s9s12s13s16s17s19s20; rxnVolume*s12_def*s12*Rs4s7s8s9s13s16s17s19s20;
  s10_0003: s10 + Rs4s5s7s8s9s13s16s17s19s20 => Rs4s5s7s8s9s10s13s16s17s19s20; rxnVolume*s10_19*s10*Rs4s5s7s8s9s13s16s17s19s20;
  s14_0000: s14 + Rs4s7s8s9s10s13s16s17s19s20 => Rs4s7s8s9s10s13s14s16s17s19s20; rxnVolume*s14_def*s14*Rs4s7s8s9s10s13s16s17s19s20;
  s5_0002: s5 + Rs4s7s8s9s10s13s16s17s19s20 => Rs4s5s7s8s9s10s13s16s17s19s20; rxnVolume*s5_def*s5*Rs4s7s8s9s10s13s16s17s19s20;
  s15_0001: s15 + Rs4s7s8s9s10s13s16s17s19s20 => Rs4s7s8s9s10s13s15s16s17s19s20; rxnVolume*s15_def*s15*Rs4s7s8s9s10s13s16s17s19s20;
  s12_0003: s12 + Rs4s7s8s9s10s13s16s17s19s20 => Rs4s7s8s9s10s12s13s16s17s19s20; rxnVolume*s12_def*s12*Rs4s7s8s9s10s13s16s17s19s20;
  s14_0001: s14 + Rs4s5s7s8s9s10s13s16s17s19s20 => Rs4s5s7s8s9s10s13s14s16s17s19s20; rxnVolume*s14_def*s14*Rs4s5s7s8s9s10s13s16s17s19s20;
  s3_0000: s3 + Rs4s5s7s8s9s10s13s16s17s19s20 => Rs3s4s5s7s8s9s10s13s16s17s19s20; rxnVolume*s3_def*s3*Rs4s5s7s8s9s10s13s16s17s19s20;
  s14_0002: s14 + Rs3s4s5s7s8s9s10s13s16s17s19s20 => Rs3s4s5s7s8s9s10s13s14s16s17s19s20; rxnVolume*s14_def*s14*Rs3s4s5s7s8s9s10s13s16s17s19s20;
  s15_0002: s15 + Rs3s4s5s7s8s9s10s13s16s17s19s20 => Rs3s4s5s7s8s9s10s13s15s16s17s19s20; rxnVolume*s15_def*s15*Rs3s4s5s7s8s9s10s13s16s17s19s20;
  s10_0004: s10 + Rs4s7s8s9s12s13s16s17s19s20 => Rs4s7s8s9s10s12s13s16s17s19s20; rxnVolume*s10_19*s10*Rs4s7s8s9s12s13s16s17s19s20;
  s14_0003: s14 + Rs4s7s8s9s10s12s13s16s17s19s20 => Rs4s7s8s9s10s12s13s14s16s17s19s20; rxnVolume*s14_def*s14*Rs4s7s8s9s10s12s13s16s17s19s20;
  s15_0003: s15 + Rs4s7s8s9s10s12s13s16s17s19s20 => Rs4s7s8s9s10s12s13s15s16s17s19s20; rxnVolume*s15_def*s15*Rs4s7s8s9s10s12s13s16s17s19s20;
  s15_0004: s15 + Rs4s16s17s20 => Rs4s15s16s17s20; rxnVolume*s15_def*s15*Rs4s16s17s20;
  s8_0002: s8 + Rs4s16s17s20 => Rs4s8s16s17s20; rxnVolume*s8_def*s8*Rs4s16s17s20;
  s7_0002: s7 + Rs4s16s17s20 => Rs4s7s16s17s20; rxnVolume*s7_def*s7*Rs4s16s17s20;
  s8_0003: s8 + Rs4s7s16s17s20 => Rs4s7s8s16s17s20; rxnVolume*s8_7r9*s8*Rs4s7s16s17s20;
  s9_0001: s9 + Rs4s7s16s17s20 => Rs4s7s9s16s17s20; rxnVolume*s9_def*s9*Rs4s7s16s17s20;
  s5_0003: s5 + Rs4s8s16s17s20 => Rs4s5s8s16s17s20; rxnVolume*s5_def*s5*Rs4s8s16s17s20;
  s15_0005: s15 + Rs4s8s16s17s20 => Rs4s8s15s16s17s20; rxnVolume*s15_def*s15*Rs4s8s16s17s20;
  s7_0003: s7 + Rs4s8s16s17s20 => Rs4s7s8s16s17s20; rxnVolume*s7_def*s7*Rs4s8s16s17s20;
  s12_0004: s12 + Rs4s8s16s17s20 => Rs4s8s12s16s17s20; rxnVolume*s12_def*s12*Rs4s8s16s17s20;
  s7_0004: s7 + Rs4s5s8s16s17s20 => Rs4s5s7s8s16s17s20; rxnVolume*s7_def*s7*Rs4s5s8s16s17s20;
  s5_0004: s5 + Rs4s7s8s16s17s20 => Rs4s5s7s8s16s17s20; rxnVolume*s5_def*s5*Rs4s7s8s16s17s20;
  s9_0002: s9 + Rs4s7s8s16s17s20 => Rs4s7s8s9s16s17s20; rxnVolume*s9_def*s9*Rs4s7s8s16s17s20;
  s12_0005: s12 + Rs4s7s8s16s17s20 => Rs4s7s8s12s16s17s20; rxnVolume*s12_def*s12*Rs4s7s8s16s17s20;
  s19_0000: s19 + Rs4s7s8s16s17s20 => Rs4s7s8s16s17s19s20; rxnVolume*s19_def*s19*Rs4s7s8s16s17s20;
  s9_0003: s9 + Rs4s5s7s8s16s17s20 => Rs4s5s7s8s9s16s17s20; rxnVolume*s9_def*s9*Rs4s5s7s8s16s17s20;
  s5_0005: s5 + Rs4s7s8s9s10s13s14s16s17s19s20 => Rs4s5s7s8s9s10s13s14s16s17s19s20; rxnVolume*s5_def*s5*Rs4s7s8s9s10s13s14s16s17s19s20;
  s15_0006: s15 + Rs4s7s8s9s10s13s14s16s17s19s20 => Rs4s7s8s9s10s13s14s15s16s17s19s20; rxnVolume*s15_def*s15*Rs4s7s8s9s10s13s14s16s17s19s20;
  s12_0006: s12 + Rs4s7s8s9s10s13s14s16s17s19s20 => Rs4s7s8s9s10s12s13s14s16s17s19s20; rxnVolume*s12_def*s12*Rs4s7s8s9s10s13s14s16s17s19s20;
  s3_0001: s3 + Rs4s5s7s8s9s10s13s14s16s17s19s20 => Rs3s4s5s7s8s9s10s13s14s16s17s19s20; rxnVolume*s3_def*s3*Rs4s5s7s8s9s10s13s14s16s17s19s20;
  s15_0007: s15 + Rs3s4s5s7s8s9s10s13s14s16s17s19s20 => Rs3s4s5s7s8s9s10s13s14s15s16s17s19s20; rxnVolume*s15_def*s15*Rs3s4s5s7s8s9s10s13s14s16s17s19s20;
  s15_0008: s15 + Rs4s7s8s9s10s12s13s14s16s17s19s20 => Rs4s7s8s9s10s12s13s14s15s16s17s19s20; rxnVolume*s15_def*s15*Rs4s7s8s9s10s12s13s14s16s17s19s20;
  s15_0009: s15 + Rs4s7s9s16s17s20 => Rs4s7s9s15s16s17s20; rxnVolume*s15_def*s15*Rs4s7s9s16s17s20;
  s8_0004: s8 + Rs4s7s9s16s17s20 => Rs4s7s8s9s16s17s20; rxnVolume*s8_7r9*s8*Rs4s7s9s16s17s20;
  s5_0006: s5 + Rs4s7s8s9s16s17s20 => Rs4s5s7s8s9s16s17s20; rxnVolume*s5_def*s5*Rs4s7s8s9s16s17s20;
  s15_0010: s15 + Rs4s7s8s9s16s17s20 => Rs4s7s8s9s15s16s17s20; rxnVolume*s15_def*s15*Rs4s7s8s9s16s17s20;
  s10_0005: s10 + Rs4s7s8s9s16s17s20 => Rs4s7s8s9s10s16s17s20; rxnVolume*s10_def*s10*Rs4s7s8s9s16s17s20;
  s12_0007: s12 + Rs4s7s8s9s16s17s20 => Rs4s7s8s9s12s16s17s20; rxnVolume*s12_def*s12*Rs4s7s8s9s16s17s20;
  s19_0001: s19 + Rs4s7s8s9s16s17s20 => Rs4s7s8s9s16s17s19s20; rxnVolume*s19_def*s19*Rs4s7s8s9s16s17s20;
  s15_0011: s15 + Rs4s5s7s8s9s16s17s20 => Rs4s5s7s8s9s15s16s17s20; rxnVolume*s15_def*s15*Rs4s5s7s8s9s16s17s20;
  s10_0006: s10 + Rs4s5s7s8s9s16s17s20 => Rs4s5s7s8s9s10s16s17s20; rxnVolume*s10_def*s10*Rs4s5s7s8s9s16s17s20;
  s12_0008: s12 + Rs4s5s7s8s9s16s17s20 => Rs4s5s7s8s9s12s16s17s20; rxnVolume*s12_def*s12*Rs4s5s7s8s9s16s17s20;
  s19_0002: s19 + Rs4s5s7s8s9s16s17s20 => Rs4s5s7s8s9s16s17s19s20; rxnVolume*s19_def*s19*Rs4s5s7s8s9s16s17s20;
  s5_0007: s5 + Rs4s7s8s9s10s16s17s20 => Rs4s5s7s8s9s10s16s17s20; rxnVolume*s5_def*s5*Rs4s7s8s9s10s16s17s20;
  s15_0012: s15 + Rs4s7s8s9s10s16s17s20 => Rs4s7s8s9s10s15s16s17s20; rxnVolume*s15_def*s15*Rs4s7s8s9s10s16s17s20;
  s12_0009: s12 + Rs4s7s8s9s10s16s17s20 => Rs4s7s8s9s10s12s16s17s20; rxnVolume*s12_def*s12*Rs4s7s8s9s10s16s17s20;
  s19_0003: s19 + Rs4s7s8s9s10s16s17s20 => Rs4s7s8s9s10s16s17s19s20; rxnVolume*s19_def*s19*Rs4s7s8s9s10s16s17s20;
  s3_0002: s3 + Rs4s5s7s8s9s10s16s17s20 => Rs3s4s5s7s8s9s10s16s17s20; rxnVolume*s3_def*s3*Rs4s5s7s8s9s10s16s17s20;
  s15_0013: s15 + Rs3s4s5s7s8s9s10s16s17s20 => Rs3s4s5s7s8s9s10s15s16s17s20; rxnVolume*s15_def*s15*Rs3s4s5s7s8s9s10s16s17s20;
  s7_0005: s7 + Rs4s8s12s16s17s20 => Rs4s7s8s12s16s17s20; rxnVolume*s7_def*s7*Rs4s8s12s16s17s20;
  s9_0004: s9 + Rs4s7s8s12s16s17s20 => Rs4s7s8s9s12s16s17s20; rxnVolume*s9_def*s9*Rs4s7s8s12s16s17s20;
  s5_0008: s5 + Rs4s7s8s9s12s16s17s20 => Rs4s5s7s8s9s12s16s17s20; rxnVolume*s5_def*s5*Rs4s7s8s9s12s16s17s20;
  s15_0014: s15 + Rs4s7s8s9s12s16s17s20 => Rs4s7s8s9s12s15s16s17s20; rxnVolume*s15_def*s15*Rs4s7s8s9s12s16s17s20;
  s10_0007: s10 + Rs4s7s8s9s12s16s17s20 => Rs4s7s8s9s10s12s16s17s20; rxnVolume*s10_def*s10*Rs4s7s8s9s12s16s17s20;
  s19_0004: s19 + Rs4s7s8s9s12s16s17s20 => Rs4s7s8s9s12s16s17s19s20; rxnVolume*s19_def*s19*Rs4s7s8s9s12s16s17s20;
  s15_0015: s15 + Rs4s5s7s8s9s12s16s17s20 => Rs4s5s7s8s9s12s15s16s17s20; rxnVolume*s15_def*s15*Rs4s5s7s8s9s12s16s17s20;
  s15_0016: s15 + Rs4s7s8s9s10s12s16s17s20 => Rs4s7s8s9s10s12s15s16s17s20; rxnVolume*s15_def*s15*Rs4s7s8s9s10s12s16s17s20;
  s19_0005: s19 + Rs4s7s8s9s10s12s16s17s20 => Rs4s7s8s9s10s12s16s17s19s20; rxnVolume*s19_def*s19*Rs4s7s8s9s10s12s16s17s20;
  s13_0005: s13 + Rs4s6s7s8s9s15s16s17s19s20 => Rs4s6s7s8s9s13s15s16s17s19s20; rxnVolume*s13_19*s13*Rs4s6s7s8s9s15s16s17s19s20;
  s10_0008: s10 + Rs4s6s7s8s9s15s16s17s19s20 => Rs4s6s7s8s9s10s15s16s17s19s20; rxnVolume*s10_19*s10*Rs4s6s7s8s9s15s16s17s19s20;
  s11_0000: s11 + Rs4s6s7s8s9s15s16s17s19s20 => Rs4s6s7s8s9s11s15s16s17s19s20; rxnVolume*s11_def*s11*Rs4s6s7s8s9s15s16s17s19s20;
  s13_0006: s13 + Rs4s6s7s8s9s10s15s16s17s19s20 => Rs4s6s7s8s9s10s13s15s16s17s19s20; rxnVolume*s13_19*s13*Rs4s6s7s8s9s10s15s16s17s19s20;
  s11_0001: s11 + Rs4s6s7s8s9s10s15s16s17s19s20 => Rs4s6s7s8s9s10s11s15s16s17s19s20; rxnVolume*s11_def*s11*Rs4s6s7s8s9s10s15s16s17s19s20;
  s13_0007: s13 + Rs4s6s7s8s11s15s16s17s19s20 => Rs4s6s7s8s11s13s15s16s17s19s20; rxnVolume*s13_19*s13*Rs4s6s7s8s11s15s16s17s19s20;
  s5_0009: s5 + Rs4s6s7s8s11s15s16s17s19s20 => Rs4s5s6s7s8s11s15s16s17s19s20; rxnVolume*s5_def*s5*Rs4s6s7s8s11s15s16s17s19s20;
  s9_0005: s9 + Rs4s6s7s8s11s15s16s17s19s20 => Rs4s6s7s8s9s11s15s16s17s19s20; rxnVolume*s9_19*s9*Rs4s6s7s8s11s15s16s17s19s20;
  s12_0010: s12 + Rs4s6s7s8s11s15s16s17s19s20 => Rs4s6s7s8s11s12s15s16s17s19s20; rxnVolume*s12_def*s12*Rs4s6s7s8s11s15s16s17s19s20;
  s9_0006: s9 + Rs4s5s6s7s8s11s15s16s17s19s20 => Rs4s5s6s7s8s9s11s15s16s17s19s20; rxnVolume*s9_19*s9*Rs4s5s6s7s8s11s15s16s17s19s20;
  s13_0008: s13 + Rs4s6s7s8s9s11s15s16s17s19s20 => Rs4s6s7s8s9s11s13s15s16s17s19s20; rxnVolume*s13_19*s13*Rs4s6s7s8s9s11s15s16s17s19s20;
  s5_0010: s5 + Rs4s6s7s8s9s11s15s16s17s19s20 => Rs4s5s6s7s8s9s11s15s16s17s19s20; rxnVolume*s5_def*s5*Rs4s6s7s8s9s11s15s16s17s19s20;
  s10_0009: s10 + Rs4s6s7s8s9s11s15s16s17s19s20 => Rs4s6s7s8s9s10s11s15s16s17s19s20; rxnVolume*s10_19*s10*Rs4s6s7s8s9s11s15s16s17s19s20;
  s12_0011: s12 + Rs4s6s7s8s9s11s15s16s17s19s20 => Rs4s6s7s8s9s11s12s15s16s17s19s20; rxnVolume*s12_def*s12*Rs4s6s7s8s9s11s15s16s17s19s20;
  s13_0009: s13 + Rs4s5s6s7s8s9s11s15s16s17s19s20 => Rs4s5s6s7s8s9s11s13s15s16s17s19s20; rxnVolume*s13_19*s13*Rs4s5s6s7s8s9s11s15s16s17s19s20;
  s10_0010: s10 + Rs4s5s6s7s8s9s11s15s16s17s19s20 => Rs4s5s6s7s8s9s10s11s15s16s17s19s20; rxnVolume*s10_19*s10*Rs4s5s6s7s8s9s11s15s16s17s19s20;
  s12_0012: s12 + Rs4s5s6s7s8s9s11s15s16s17s19s20 => Rs4s5s6s7s8s9s11s12s15s16s17s19s20; rxnVolume*s12_def*s12*Rs4s5s6s7s8s9s11s15s16s17s19s20;
  s13_0010: s13 + Rs4s6s7s8s9s10s11s15s16s17s19s20 => Rs4s6s7s8s9s10s11s13s15s16s17s19s20; rxnVolume*s13_19*s13*Rs4s6s7s8s9s10s11s15s16s17s19s20;
  s5_0011: s5 + Rs4s6s7s8s9s10s11s15s16s17s19s20 => Rs4s5s6s7s8s9s10s11s15s16s17s19s20; rxnVolume*s5_def*s5*Rs4s6s7s8s9s10s11s15s16s17s19s20;
  s8_0005: s8 + Rs4s15s16s17s20 => Rs4s8s15s16s17s20; rxnVolume*s8_def*s8*Rs4s15s16s17s20;
  s12_0013: s12 + Rs4s6s7s8s9s10s11s15s16s17s19s20 => Rs4s6s7s8s9s10s11s12s15s16s17s19s20; rxnVolume*s12_def*s12*Rs4s6s7s8s9s10s11s15s16s17s19s20;
  s13_0011: s13 + Rs4s5s6s7s8s9s10s11s15s16s17s19s20 => Rs4s5s6s7s8s9s10s11s13s15s16s17s19s20; rxnVolume*s13_19*s13*Rs4s5s6s7s8s9s10s11s15s16s17s19s20;
  s6_0001: s6 + Rs4s15s16s17s20 => Rs4s6s15s16s17s20; rxnVolume*s6_def*s6*Rs4s15s16s17s20;
  s8_0006: s8 + Rs4s6s15s16s17s20 => Rs4s6s8s15s16s17s20; rxnVolume*s8_def*s8*Rs4s6s15s16s17s20;
  s3_0003: s3 + Rs4s5s6s7s8s9s10s11s15s16s17s19s20 => Rs3s4s5s6s7s8s9s10s11s15s16s17s19s20; rxnVolume*s3_def*s3*Rs4s5s6s7s8s9s10s11s15s16s17s19s20;
  s11_0002: s11 + Rs4s6s15s16s17s20 => Rs4s6s11s15s16s17s20; rxnVolume*s11_def*s11*Rs4s6s15s16s17s20;
  s12_0014: s12 + Rs4s5s6s7s8s9s10s11s15s16s17s19s20 => Rs4s5s6s7s8s9s10s11s12s15s16s17s19s20; rxnVolume*s12_def*s12*Rs4s5s6s7s8s9s10s11s15s16s17s19s20;
  s7_0006: s7 + Rs4s6s15s16s17s20 => Rs4s6s7s15s16s17s20; rxnVolume*s7_def*s7*Rs4s6s15s16s17s20;
  s13_0012: s13 + Rs3s4s5s6s7s8s9s10s11s15s16s17s19s20 => Rs3s4s5s6s7s8s9s10s11s13s15s16s17s19s20; rxnVolume*s13_19*s13*Rs3s4s5s6s7s8s9s10s11s15s16s17s19s20;
  s12_0015: s12 + Rs3s4s5s6s7s8s9s10s11s15s16s17s19s20 => Rs3s4s5s6s7s8s9s10s11s12s15s16s17s19s20; rxnVolume*s12_def*s12*Rs3s4s5s6s7s8s9s10s11s15s16s17s19s20;
  s8_0007: s8 + Rs4s6s7s15s16s17s20 => Rs4s6s7s8s15s16s17s20; rxnVolume*s8_7r9*s8*Rs4s6s7s15s16s17s20;
  s9_0007: s9 + Rs4s6s7s15s16s17s20 => Rs4s6s7s9s15s16s17s20; rxnVolume*s9_def*s9*Rs4s6s7s15s16s17s20;
  s11_0003: s11 + Rs4s6s7s15s16s17s20 => Rs4s6s7s11s15s16s17s20; rxnVolume*s11_def*s11*Rs4s6s7s15s16s17s20;
  s6_0002: s6 + Rs4s8s15s16s17s20 => Rs4s6s8s15s16s17s20; rxnVolume*s6_def*s6*Rs4s8s15s16s17s20;
  s11_0004: s11 + Rs4s6s8s15s16s17s20 => Rs4s6s8s11s15s16s17s20; rxnVolume*s11_def*s11*Rs4s6s8s15s16s17s20;
  s7_0007: s7 + Rs4s6s8s15s16s17s20 => Rs4s6s7s8s15s16s17s20; rxnVolume*s7_def*s7*Rs4s6s8s15s16s17s20;
  s9_0008: s9 + Rs4s6s7s8s15s16s17s20 => Rs4s6s7s8s9s15s16s17s20; rxnVolume*s9_5c*s9*Rs4s6s7s8s15s16s17s20;
  s11_0005: s11 + Rs4s6s7s8s15s16s17s20 => Rs4s6s7s8s11s15s16s17s20; rxnVolume*s11_def*s11*Rs4s6s7s8s15s16s17s20;
  s8_0008: s8 + Rs4s7s9s15s16s17s20 => Rs4s7s8s9s15s16s17s20; rxnVolume*s8_7r9*s8*Rs4s7s9s15s16s17s20;
  s6_0003: s6 + Rs4s7s9s15s16s17s20 => Rs4s6s7s9s15s16s17s20; rxnVolume*s6_def*s6*Rs4s7s9s15s16s17s20;
  s8_0009: s8 + Rs4s6s7s9s15s16s17s20 => Rs4s6s7s8s9s15s16s17s20; rxnVolume*s8_7r9*s8*Rs4s6s7s9s15s16s17s20;
  s11_0006: s11 + Rs4s6s7s9s15s16s17s20 => Rs4s6s7s9s11s15s16s17s20; rxnVolume*s11_def*s11*Rs4s6s7s9s15s16s17s20;
  s5_0012: s5 + Rs4s7s8s9s15s16s17s20 => Rs4s5s7s8s9s15s16s17s20; rxnVolume*s5_def*s5*Rs4s7s8s9s15s16s17s20;
  s10_0011: s10 + Rs4s7s8s9s15s16s17s20 => Rs4s7s8s9s10s15s16s17s20; rxnVolume*s10_def*s10*Rs4s7s8s9s15s16s17s20;
  s9_0009: s9 + Rs4s6s7s8s11s12s15s16s17s19s20 => Rs4s6s7s8s9s11s12s15s16s17s19s20; rxnVolume*s9_19*s9*Rs4s6s7s8s11s12s15s16s17s19s20;
  s6_0004: s6 + Rs4s7s8s9s15s16s17s20 => Rs4s6s7s8s9s15s16s17s20; rxnVolume*s6_def*s6*Rs4s7s8s9s15s16s17s20;
  s12_0016: s12 + Rs4s7s8s9s15s16s17s20 => Rs4s7s8s9s12s15s16s17s20; rxnVolume*s12_def*s12*Rs4s7s8s9s15s16s17s20;
  s13_0013: s13 + Rs4s6s7s8s9s11s12s15s16s17s19s20 => Rs4s6s7s8s9s11s12s13s15s16s17s19s20; rxnVolume*s13_19*s13*Rs4s6s7s8s9s11s12s15s16s17s19s20;
  s5_0013: s5 + Rs4s6s7s8s9s11s12s15s16s17s19s20 => Rs4s5s6s7s8s9s11s12s15s16s17s19s20; rxnVolume*s5_def*s5*Rs4s6s7s8s9s11s12s15s16s17s19s20;
  s6_0005: s6 + Rs4s5s7s8s9s15s16s17s20 => Rs4s5s6s7s8s9s15s16s17s20; rxnVolume*s6_def*s6*Rs4s5s7s8s9s15s16s17s20;
  s10_0012: s10 + Rs4s6s7s8s9s11s12s15s16s17s19s20 => Rs4s6s7s8s9s10s11s12s15s16s17s19s20; rxnVolume*s10_19*s10*Rs4s6s7s8s9s11s12s15s16s17s19s20;
  s12_0017: s12 + Rs4s5s7s8s9s15s16s17s20 => Rs4s5s7s8s9s12s15s16s17s20; rxnVolume*s12_def*s12*Rs4s5s7s8s9s15s16s17s20;
  s13_0014: s13 + Rs4s5s6s7s8s9s11s12s15s16s17s19s20 => Rs4s5s6s7s8s9s11s12s13s15s16s17s19s20; rxnVolume*s13_19*s13*Rs4s5s6s7s8s9s11s12s15s16s17s19s20;
  s10_0013: s10 + Rs4s5s6s7s8s9s11s12s15s16s17s19s20 => Rs4s5s6s7s8s9s10s11s12s15s16s17s19s20; rxnVolume*s10_19*s10*Rs4s5s6s7s8s9s11s12s15s16s17s19s20;
  s5_0014: s5 + Rs4s6s7s8s9s15s16s17s20 => Rs4s5s6s7s8s9s15s16s17s20; rxnVolume*s5_def*s5*Rs4s6s7s8s9s15s16s17s20;
  s13_0015: s13 + Rs4s6s7s8s9s10s11s12s15s16s17s19s20 => Rs4s6s7s8s9s10s11s12s13s15s16s17s19s20; rxnVolume*s13_19*s13*Rs4s6s7s8s9s10s11s12s15s16s17s19s20;
  s10_0014: s10 + Rs4s6s7s8s9s15s16s17s20 => Rs4s6s7s8s9s10s15s16s17s20; rxnVolume*s10_def*s10*Rs4s6s7s8s9s15s16s17s20;
  s11_0007: s11 + Rs4s6s7s8s9s15s16s17s20 => Rs4s6s7s8s9s11s15s16s17s20; rxnVolume*s11_def*s11*Rs4s6s7s8s9s15s16s17s20;
  s5_0015: s5 + Rs4s6s7s8s9s10s11s12s15s16s17s19s20 => Rs4s5s6s7s8s9s10s11s12s15s16s17s19s20; rxnVolume*s5_def*s5*Rs4s6s7s8s9s10s11s12s15s16s17s19s20;
  s12_0018: s12 + Rs4s6s7s8s9s15s16s17s20 => Rs4s6s7s8s9s12s15s16s17s20; rxnVolume*s12_def*s12*Rs4s6s7s8s9s15s16s17s20;
  s13_0016: s13 + Rs4s5s6s7s8s9s10s11s12s15s16s17s19s20 => Rs4s5s6s7s8s9s10s11s12s13s15s16s17s19s20; rxnVolume*s13_19*s13*Rs4s5s6s7s8s9s10s11s12s15s16s17s19s20;
  s19_0006: s19 + Rs4s6s7s8s9s15s16s17s20 => Rs4s6s7s8s9s15s16s17s19s20; rxnVolume*s19_pri*s19*Rs4s6s7s8s9s15s16s17s20;
  s3_0004: s3 + Rs4s5s6s7s8s9s10s11s12s15s16s17s19s20 => Rs3s4s5s6s7s8s9s10s11s12s15s16s17s19s20; rxnVolume*s3_def*s3*Rs4s5s6s7s8s9s10s11s12s15s16s17s19s20;
  s13_0017: s13 + Rs3s4s5s6s7s8s9s10s11s12s15s16s17s19s20 => Rs3s4s5s6s7s8s9s10s11s12s13s15s16s17s19s20; rxnVolume*s13_19*s13*Rs3s4s5s6s7s8s9s10s11s12s15s16s17s19s20;
  s11_0008: s11 + Rs4s5s6s7s8s9s15s16s17s20 => Rs4s5s6s7s8s9s11s15s16s17s20; rxnVolume*s11_def*s11*Rs4s5s6s7s8s9s15s16s17s20;
  s12_0019: s12 + Rs4s5s6s7s8s9s15s16s17s20 => Rs4s5s6s7s8s9s12s15s16s17s20; rxnVolume*s12_def*s12*Rs4s5s6s7s8s9s15s16s17s20;
  s6_0006: s6 + Rs4s7s8s9s10s15s16s17s20 => Rs4s6s7s8s9s10s15s16s17s20; rxnVolume*s6_def*s6*Rs4s7s8s9s10s15s16s17s20;
  s12_0020: s12 + Rs4s7s8s9s10s15s16s17s20 => Rs4s7s8s9s10s12s15s16s17s20; rxnVolume*s12_def*s12*Rs4s7s8s9s10s15s16s17s20;
  s6_0007: s6 + Rs3s4s5s7s8s9s10s15s16s17s20 => Rs3s4s5s6s7s8s9s10s15s16s17s20; rxnVolume*s6_def*s6*Rs3s4s5s7s8s9s10s15s16s17s20;
  s11_0009: s11 + Rs4s6s7s8s9s10s15s16s17s20 => Rs4s6s7s8s9s10s11s15s16s17s20; rxnVolume*s11_def*s11*Rs4s6s7s8s9s10s15s16s17s20;
  s12_0021: s12 + Rs4s6s7s8s9s10s15s16s17s20 => Rs4s6s7s8s9s10s12s15s16s17s20; rxnVolume*s12_def*s12*Rs4s6s7s8s9s10s15s16s17s20;
  s19_0007: s19 + Rs4s6s7s8s9s10s15s16s17s20 => Rs4s6s7s8s9s10s15s16s17s19s20; rxnVolume*s19_pri*s19*Rs4s6s7s8s9s10s15s16s17s20;
  s11_0010: s11 + Rs3s4s5s6s7s8s9s10s15s16s17s20 => Rs3s4s5s6s7s8s9s10s11s15s16s17s20; rxnVolume*s11_def*s11*Rs3s4s5s6s7s8s9s10s15s16s17s20;
  s8_0010: s8 + Rs4s6s11s15s16s17s20 => Rs4s6s8s11s15s16s17s20; rxnVolume*s8_def*s8*Rs4s6s11s15s16s17s20;
  s7_0008: s7 + Rs4s6s11s15s16s17s20 => Rs4s6s7s11s15s16s17s20; rxnVolume*s7_def*s7*Rs4s6s11s15s16s17s20;
  s8_0011: s8 + Rs4s6s7s11s15s16s17s20 => Rs4s6s7s8s11s15s16s17s20; rxnVolume*s8_7r9*s8*Rs4s6s7s11s15s16s17s20;
  s9_0010: s9 + Rs4s6s7s11s15s16s17s20 => Rs4s6s7s9s11s15s16s17s20; rxnVolume*s9_def*s9*Rs4s6s7s11s15s16s17s20;
  s5_0016: s5 + Rs4s6s8s11s15s16s17s20 => Rs4s5s6s8s11s15s16s17s20; rxnVolume*s5_def*s5*Rs4s6s8s11s15s16s17s20;
  s10_0015: s10 + Rs4s6s7s8s9s13s15s16s17s19s20 => Rs4s6s7s8s9s10s13s15s16s17s19s20; rxnVolume*s10_19*s10*Rs4s6s7s8s9s13s15s16s17s19s20;
  s11_0011: s11 + Rs4s6s7s8s9s13s15s16s17s19s20 => Rs4s6s7s8s9s11s13s15s16s17s19s20; rxnVolume*s11_def*s11*Rs4s6s7s8s9s13s15s16s17s19s20;
  s7_0009: s7 + Rs4s6s8s11s15s16s17s20 => Rs4s6s7s8s11s15s16s17s20; rxnVolume*s7_def*s7*Rs4s6s8s11s15s16s17s20;
  s12_0022: s12 + Rs4s6s8s11s15s16s17s20 => Rs4s6s8s11s12s15s16s17s20; rxnVolume*s12_def*s12*Rs4s6s8s11s15s16s17s20;
  s7_0010: s7 + Rs4s5s6s8s11s15s16s17s20 => Rs4s5s6s7s8s11s15s16s17s20; rxnVolume*s7_def*s7*Rs4s5s6s8s11s15s16s17s20;
  s5_0017: s5 + Rs4s6s7s8s11s15s16s17s20 => Rs4s5s6s7s8s11s15s16s17s20; rxnVolume*s5_def*s5*Rs4s6s7s8s11s15s16s17s20;
  s9_0011: s9 + Rs4s6s7s8s11s15s16s17s20 => Rs4s6s7s8s9s11s15s16s17s20; rxnVolume*s9_5c*s9*Rs4s6s7s8s11s15s16s17s20;
  s12_0023: s12 + Rs4s6s7s8s11s15s16s17s20 => Rs4s6s7s8s11s12s15s16s17s20; rxnVolume*s12_def*s12*Rs4s6s7s8s11s15s16s17s20;
  s14_0004: s14 + Rs4s7s8s9s10s13s15s16s17s19s20 => Rs4s7s8s9s10s13s14s15s16s17s19s20; rxnVolume*s14_def*s14*Rs4s7s8s9s10s13s15s16s17s19s20;
  s19_0008: s19 + Rs4s6s7s8s11s15s16s17s20 => Rs4s6s7s8s11s15s16s17s19s20; rxnVolume*s19_pri*s19*Rs4s6s7s8s11s15s16s17s20;
  s6_0008: s6 + Rs4s7s8s9s10s13s15s16s17s19s20 => Rs4s6s7s8s9s10s13s15s16s17s19s20; rxnVolume*s6_def*s6*Rs4s7s8s9s10s13s15s16s17s19s20;
  s9_0012: s9 + Rs4s5s6s7s8s11s15s16s17s20 => Rs4s5s6s7s8s9s11s15s16s17s20; rxnVolume*s9_5c*s9*Rs4s5s6s7s8s11s15s16s17s20;
  s12_0024: s12 + Rs4s7s8s9s10s13s15s16s17s19s20 => Rs4s7s8s9s10s12s13s15s16s17s19s20; rxnVolume*s12_def*s12*Rs4s7s8s9s10s13s15s16s17s19s20;
  s19_0009: s19 + Rs4s5s6s7s8s11s15s16s17s20 => Rs4s5s6s7s8s11s15s16s17s19s20; rxnVolume*s19_pri*s19*Rs4s5s6s7s8s11s15s16s17s20;
  s8_0012: s8 + Rs4s6s7s9s11s15s16s17s20 => Rs4s6s7s8s9s11s15s16s17s20; rxnVolume*s8_7r9*s8*Rs4s6s7s9s11s15s16s17s20;
  s14_0005: s14 + Rs3s4s5s7s8s9s10s13s15s16s17s19s20 => Rs3s4s5s7s8s9s10s13s14s15s16s17s19s20; rxnVolume*s14_def*s14*Rs3s4s5s7s8s9s10s13s15s16s17s19s20;
  s6_0009: s6 + Rs3s4s5s7s8s9s10s13s15s16s17s19s20 => Rs3s4s5s6s7s8s9s10s13s15s16s17s19s20; rxnVolume*s6_def*s6*Rs3s4s5s7s8s9s10s13s15s16s17s19s20;
  s5_0018: s5 + Rs4s6s7s8s9s11s15s16s17s20 => Rs4s5s6s7s8s9s11s15s16s17s20; rxnVolume*s5_def*s5*Rs4s6s7s8s9s11s15s16s17s20;
  s14_0006: s14 + Rs4s6s7s8s9s10s13s15s16s17s19s20 => Rs4s6s7s8s9s10s13s14s15s16s17s19s20; rxnVolume*s14_def*s14*Rs4s6s7s8s9s10s13s15s16s17s19s20;
  s10_0016: s10 + Rs4s6s7s8s9s11s15s16s17s20 => Rs4s6s7s8s9s10s11s15s16s17s20; rxnVolume*s10_def*s10*Rs4s6s7s8s9s11s15s16s17s20;
  s12_0025: s12 + Rs4s6s7s8s9s11s15s16s17s20 => Rs4s6s7s8s9s11s12s15s16s17s20; rxnVolume*s12_def*s12*Rs4s6s7s8s9s11s15s16s17s20;
  s11_0012: s11 + Rs4s6s7s8s9s10s13s15s16s17s19s20 => Rs4s6s7s8s9s10s11s13s15s16s17s19s20; rxnVolume*s11_def*s11*Rs4s6s7s8s9s10s13s15s16s17s19s20;
  s19_0010: s19 + Rs4s6s7s8s9s11s15s16s17s20 => Rs4s6s7s8s9s11s15s16s17s19s20; rxnVolume*s19_pri*s19*Rs4s6s7s8s9s11s15s16s17s20;
  s12_0026: s12 + Rs4s6s7s8s9s10s13s15s16s17s19s20 => Rs4s6s7s8s9s10s12s13s15s16s17s19s20; rxnVolume*s12_def*s12*Rs4s6s7s8s9s10s13s15s16s17s19s20;
  s10_0017: s10 + Rs4s5s6s7s8s9s11s15s16s17s20 => Rs4s5s6s7s8s9s10s11s15s16s17s20; rxnVolume*s10_def*s10*Rs4s5s6s7s8s9s11s15s16s17s20;
  s12_0027: s12 + Rs4s5s6s7s8s9s11s15s16s17s20 => Rs4s5s6s7s8s9s11s12s15s16s17s20; rxnVolume*s12_def*s12*Rs4s5s6s7s8s9s11s15s16s17s20;
  s19_0011: s19 + Rs4s5s6s7s8s9s11s15s16s17s20 => Rs4s5s6s7s8s9s11s15s16s17s19s20; rxnVolume*s19_pri*s19*Rs4s5s6s7s8s9s11s15s16s17s20;
  s14_0007: s14 + Rs3s4s5s6s7s8s9s10s13s15s16s17s19s20 => Rs3s4s5s6s7s8s9s10s13s14s15s16s17s19s20; rxnVolume*s14_def*s14*Rs3s4s5s6s7s8s9s10s13s15s16s17s19s20;
  s11_0013: s11 + Rs3s4s5s6s7s8s9s10s13s15s16s17s19s20 => Rs3s4s5s6s7s8s9s10s11s13s15s16s17s19s20; rxnVolume*s11_def*s11*Rs3s4s5s6s7s8s9s10s13s15s16s17s19s20;
  s5_0019: s5 + Rs4s6s7s8s9s10s11s15s16s17s20 => Rs4s5s6s7s8s9s10s11s15s16s17s20; rxnVolume*s5_def*s5*Rs4s6s7s8s9s10s11s15s16s17s20;
  s12_0028: s12 + Rs4s6s7s8s9s10s11s15s16s17s20 => Rs4s6s7s8s9s10s11s12s15s16s17s20; rxnVolume*s12_def*s12*Rs4s6s7s8s9s10s11s15s16s17s20;
  s19_0012: s19 + Rs4s6s7s8s9s10s11s15s16s17s20 => Rs4s6s7s8s9s10s11s15s16s17s19s20; rxnVolume*s19_pri*s19*Rs4s6s7s8s9s10s11s15s16s17s20;
  s9_0013: s9 + Rs4s6s7s8s11s13s15s16s17s19s20 => Rs4s6s7s8s9s11s13s15s16s17s19s20; rxnVolume*s9_19*s9*Rs4s6s7s8s11s13s15s16s17s19s20;
  s3_0005: s3 + Rs4s5s6s7s8s9s10s11s15s16s17s20 => Rs3s4s5s6s7s8s9s10s11s15s16s17s20; rxnVolume*s3_def*s3*Rs4s5s6s7s8s9s10s11s15s16s17s20;
  s12_0029: s12 + Rs4s5s6s7s8s9s10s11s15s16s17s20 => Rs4s5s6s7s8s9s10s11s12s15s16s17s20; rxnVolume*s12_def*s12*Rs4s5s6s7s8s9s10s11s15s16s17s20;
  s19_0013: s19 + Rs4s5s6s7s8s9s10s11s15s16s17s20 => Rs4s5s6s7s8s9s10s11s15s16s17s19s20; rxnVolume*s19_pri*s19*Rs4s5s6s7s8s9s10s11s15s16s17s20;
  s12_0030: s12 + Rs3s4s5s6s7s8s9s10s11s15s16s17s20 => Rs3s4s5s6s7s8s9s10s11s12s15s16s17s20; rxnVolume*s12_def*s12*Rs3s4s5s6s7s8s9s10s11s15s16s17s20;
  s19_0014: s19 + Rs3s4s5s6s7s8s9s10s11s15s16s17s20 => Rs3s4s5s6s7s8s9s10s11s15s16s17s19s20; rxnVolume*s19_pri*s19*Rs3s4s5s6s7s8s9s10s11s15s16s17s20;
  s5_0020: s5 + Rs4s7s8s9s12s15s16s17s20 => Rs4s5s7s8s9s12s15s16s17s20; rxnVolume*s5_def*s5*Rs4s7s8s9s12s15s16s17s20;
  s10_0018: s10 + Rs4s7s8s9s12s15s16s17s20 => Rs4s7s8s9s10s12s15s16s17s20; rxnVolume*s10_def*s10*Rs4s7s8s9s12s15s16s17s20;
  s6_0010: s6 + Rs4s7s8s9s12s15s16s17s20 => Rs4s6s7s8s9s12s15s16s17s20; rxnVolume*s6_def*s6*Rs4s7s8s9s12s15s16s17s20;
  s5_0021: s5 + Rs4s6s7s8s9s11s13s15s16s17s19s20 => Rs4s5s6s7s8s9s11s13s15s16s17s19s20; rxnVolume*s5_def*s5*Rs4s6s7s8s9s11s13s15s16s17s19s20;
  s10_0019: s10 + Rs4s6s7s8s9s11s13s15s16s17s19s20 => Rs4s6s7s8s9s10s11s13s15s16s17s19s20; rxnVolume*s10_19*s10*Rs4s6s7s8s9s11s13s15s16s17s19s20;
  s12_0031: s12 + Rs4s6s7s8s9s11s13s15s16s17s19s20 => Rs4s6s7s8s9s11s12s13s15s16s17s19s20; rxnVolume*s12_def*s12*Rs4s6s7s8s9s11s13s15s16s17s19s20;
  s10_0020: s10 + Rs4s5s6s7s8s9s11s13s15s16s17s19s20 => Rs4s5s6s7s8s9s10s11s13s15s16s17s19s20; rxnVolume*s10_19*s10*Rs4s5s6s7s8s9s11s13s15s16s17s19s20;
  s12_0032: s12 + Rs4s5s6s7s8s9s11s13s15s16s17s19s20 => Rs4s5s6s7s8s9s11s12s13s15s16s17s19s20; rxnVolume*s12_def*s12*Rs4s5s6s7s8s9s11s13s15s16s17s19s20;
  s14_0008: s14 + Rs4s6s7s8s9s10s11s13s15s16s17s19s20 => Rs4s6s7s8s9s10s11s13s14s15s16s17s19s20; rxnVolume*s14_def*s14*Rs4s6s7s8s9s10s11s13s15s16s17s19s20;
  s5_0022: s5 + Rs4s6s7s8s9s10s11s13s15s16s17s19s20 => Rs4s5s6s7s8s9s10s11s13s15s16s17s19s20; rxnVolume*s5_def*s5*Rs4s6s7s8s9s10s11s13s15s16s17s19s20;
  s12_0033: s12 + Rs4s6s7s8s9s10s11s13s15s16s17s19s20 => Rs4s6s7s8s9s10s11s12s13s15s16s17s19s20; rxnVolume*s12_def*s12*Rs4s6s7s8s9s10s11s13s15s16s17s19s20;
  s14_0009: s14 + Rs4s5s6s7s8s9s10s11s13s15s16s17s19s20 => Rs4s5s6s7s8s9s10s11s13s14s15s16s17s19s20; rxnVolume*s14_def*s14*Rs4s5s6s7s8s9s10s11s13s15s16s17s19s20;
  s3_0006: s3 + Rs4s5s6s7s8s9s10s11s13s15s16s17s19s20 => Rs3s4s5s6s7s8s9s10s11s13s15s16s17s19s20; rxnVolume*s3_def*s3*Rs4s5s6s7s8s9s10s11s13s15s16s17s19s20;
  s12_0034: s12 + Rs4s5s6s7s8s9s10s11s13s15s16s17s19s20 => Rs4s5s6s7s8s9s10s11s12s13s15s16s17s19s20; rxnVolume*s12_def*s12*Rs4s5s6s7s8s9s10s11s13s15s16s17s19s20;
  s14_0010: s14 + Rs3s4s5s6s7s8s9s10s11s13s15s16s17s19s20 => Rs3s4s5s6s7s8s9s10s11s13s14s15s16s17s19s20; rxnVolume*s14_def*s14*Rs3s4s5s6s7s8s9s10s11s13s15s16s17s19s20;
  s12_0035: s12 + Rs3s4s5s6s7s8s9s10s11s13s15s16s17s19s20 => Rs3s4s5s6s7s8s9s10s11s12s13s15s16s17s19s20; rxnVolume*s12_def*s12*Rs3s4s5s6s7s8s9s10s11s13s15s16s17s19s20;
  s6_0011: s6 + Rs4s5s7s8s9s12s15s16s17s20 => Rs4s5s6s7s8s9s12s15s16s17s20; rxnVolume*s6_def*s6*Rs4s5s7s8s9s12s15s16s17s20;
  s5_0023: s5 + Rs4s6s7s8s9s12s15s16s17s20 => Rs4s5s6s7s8s9s12s15s16s17s20; rxnVolume*s5_def*s5*Rs4s6s7s8s9s12s15s16s17s20;
  s10_0021: s10 + Rs4s6s7s8s9s12s15s16s17s20 => Rs4s6s7s8s9s10s12s15s16s17s20; rxnVolume*s10_def*s10*Rs4s6s7s8s9s12s15s16s17s20;
  s11_0014: s11 + Rs4s6s7s8s9s12s15s16s17s20 => Rs4s6s7s8s9s11s12s15s16s17s20; rxnVolume*s11_def*s11*Rs4s6s7s8s9s12s15s16s17s20;
  s11_0015: s11 + Rs4s5s6s7s8s9s12s15s16s17s20 => Rs4s5s6s7s8s9s11s12s15s16s17s20; rxnVolume*s11_def*s11*Rs4s5s6s7s8s9s12s15s16s17s20;
  s6_0012: s6 + Rs4s7s8s9s10s12s15s16s17s20 => Rs4s6s7s8s9s10s12s15s16s17s20; rxnVolume*s6_def*s6*Rs4s7s8s9s10s12s15s16s17s20;
  s11_0016: s11 + Rs4s6s7s8s9s10s12s15s16s17s20 => Rs4s6s7s8s9s10s11s12s15s16s17s20; rxnVolume*s11_def*s11*Rs4s6s7s8s9s10s12s15s16s17s20;
  s14_0011: s14 + Rs4s7s8s9s10s12s13s15s16s17s19s20 => Rs4s7s8s9s10s12s13s14s15s16s17s19s20; rxnVolume*s14_def*s14*Rs4s7s8s9s10s12s13s15s16s17s19s20;
  s6_0013: s6 + Rs4s7s8s9s10s12s13s15s16s17s19s20 => Rs4s6s7s8s9s10s12s13s15s16s17s19s20; rxnVolume*s6_def*s6*Rs4s7s8s9s10s12s13s15s16s17s19s20;
  s14_0012: s14 + Rs4s6s7s8s9s10s12s13s15s16s17s19s20 => Rs4s6s7s8s9s10s12s13s14s15s16s17s19s20; rxnVolume*s14_def*s14*Rs4s6s7s8s9s10s12s13s15s16s17s19s20;
  s11_0017: s11 + Rs4s6s7s8s9s10s12s13s15s16s17s19s20 => Rs4s6s7s8s9s10s11s12s13s15s16s17s19s20; rxnVolume*s11_def*s11*Rs4s6s7s8s9s10s12s13s15s16s17s19s20;
  s5_0024: s5 + Rs4s6s7s8s9s11s12s13s15s16s17s19s20 => Rs4s5s6s7s8s9s11s12s13s15s16s17s19s20; rxnVolume*s5_def*s5*Rs4s6s7s8s9s11s12s13s15s16s17s19s20;
  s10_0022: s10 + Rs4s6s7s8s9s11s12s13s15s16s17s19s20 => Rs4s6s7s8s9s10s11s12s13s15s16s17s19s20; rxnVolume*s10_19*s10*Rs4s6s7s8s9s11s12s13s15s16s17s19s20;
  s10_0023: s10 + Rs4s5s6s7s8s9s11s12s13s15s16s17s19s20 => Rs4s5s6s7s8s9s10s11s12s13s15s16s17s19s20; rxnVolume*s10_19*s10*Rs4s5s6s7s8s9s11s12s13s15s16s17s19s20;
  s14_0013: s14 + Rs4s6s7s8s9s10s11s12s13s15s16s17s19s20 => Rs4s6s7s8s9s10s11s12s13s14s15s16s17s19s20; rxnVolume*s14_def*s14*Rs4s6s7s8s9s10s11s12s13s15s16s17s19s20;
  s5_0025: s5 + Rs4s6s7s8s9s10s11s12s13s15s16s17s19s20 => Rs4s5s6s7s8s9s10s11s12s13s15s16s17s19s20; rxnVolume*s5_def*s5*Rs4s6s7s8s9s10s11s12s13s15s16s17s19s20;
  s14_0014: s14 + Rs4s5s6s7s8s9s10s11s12s13s15s16s17s19s20 => Rs4s5s6s7s8s9s10s11s12s13s14s15s16s17s19s20; rxnVolume*s14_def*s14*Rs4s5s6s7s8s9s10s11s12s13s15s16s17s19s20;
  s3_0007: s3 + Rs4s5s6s7s8s9s10s11s12s13s15s16s17s19s20 => Rs3s4s5s6s7s8s9s10s11s12s13s15s16s17s19s20; rxnVolume*s3_def*s3*Rs4s5s6s7s8s9s10s11s12s13s15s16s17s19s20;
  s14_0015: s14 + Rs3s4s5s6s7s8s9s10s11s12s13s15s16s17s19s20 => Rs3s4s5s6s7s8s9s10s11s12s13s14s15s16s17s19s20; rxnVolume*s14_def*s14*Rs3s4s5s6s7s8s9s10s11s12s13s15s16s17s19s20;
  s7_0011: s7 + Rs4s6s8s11s12s15s16s17s20 => Rs4s6s7s8s11s12s15s16s17s20; rxnVolume*s7_def*s7*Rs4s6s8s11s12s15s16s17s20;
  s9_0014: s9 + Rs4s6s7s8s11s12s15s16s17s20 => Rs4s6s7s8s9s11s12s15s16s17s20; rxnVolume*s9_5c*s9*Rs4s6s7s8s11s12s15s16s17s20;
  s19_0015: s19 + Rs4s6s7s8s11s12s15s16s17s20 => Rs4s6s7s8s11s12s15s16s17s19s20; rxnVolume*s19_pri*s19*Rs4s6s7s8s11s12s15s16s17s20;
  s5_0026: s5 + Rs4s6s7s8s9s11s12s15s16s17s20 => Rs4s5s6s7s8s9s11s12s15s16s17s20; rxnVolume*s5_def*s5*Rs4s6s7s8s9s11s12s15s16s17s20;
  s10_0024: s10 + Rs4s6s7s8s9s11s12s15s16s17s20 => Rs4s6s7s8s9s10s11s12s15s16s17s20; rxnVolume*s10_def*s10*Rs4s6s7s8s9s11s12s15s16s17s20;
  s19_0016: s19 + Rs4s6s7s8s9s11s12s15s16s17s20 => Rs4s6s7s8s9s11s12s15s16s17s19s20; rxnVolume*s19_pri*s19*Rs4s6s7s8s9s11s12s15s16s17s20;
  s10_0025: s10 + Rs4s5s6s7s8s9s11s12s15s16s17s20 => Rs4s5s6s7s8s9s10s11s12s15s16s17s20; rxnVolume*s10_def*s10*Rs4s5s6s7s8s9s11s12s15s16s17s20;
  s19_0017: s19 + Rs4s5s6s7s8s9s11s12s15s16s17s20 => Rs4s5s6s7s8s9s11s12s15s16s17s19s20; rxnVolume*s19_pri*s19*Rs4s5s6s7s8s9s11s12s15s16s17s20;
  s5_0027: s5 + Rs4s6s7s8s9s10s11s12s15s16s17s20 => Rs4s5s6s7s8s9s10s11s12s15s16s17s20; rxnVolume*s5_def*s5*Rs4s6s7s8s9s10s11s12s15s16s17s20;
  s19_0018: s19 + Rs4s6s7s8s9s10s11s12s15s16s17s20 => Rs4s6s7s8s9s10s11s12s15s16s17s19s20; rxnVolume*s19_pri*s19*Rs4s6s7s8s9s10s11s12s15s16s17s20;
  s3_0008: s3 + Rs4s5s6s7s8s9s10s11s12s15s16s17s20 => Rs3s4s5s6s7s8s9s10s11s12s15s16s17s20; rxnVolume*s3_def*s3*Rs4s5s6s7s8s9s10s11s12s15s16s17s20;
  s19_0019: s19 + Rs4s5s6s7s8s9s10s11s12s15s16s17s20 => Rs4s5s6s7s8s9s10s11s12s15s16s17s19s20; rxnVolume*s19_pri*s19*Rs4s5s6s7s8s9s10s11s12s15s16s17s20;
  s19_0020: s19 + Rs3s4s5s6s7s8s9s10s11s12s15s16s17s20 => Rs3s4s5s6s7s8s9s10s11s12s15s16s17s19s20; rxnVolume*s19_pri*s19*Rs3s4s5s6s7s8s9s10s11s12s15s16s17s20;
  s6_0014: s6 + Rs4s7s8s9s10s13s14s15s16s17s19s20 => Rs4s6s7s8s9s10s13s14s15s16s17s19s20; rxnVolume*s6_def*s6*Rs4s7s8s9s10s13s14s15s16s17s19s20;
  s12_0036: s12 + Rs4s7s8s9s10s13s14s15s16s17s19s20 => Rs4s7s8s9s10s12s13s14s15s16s17s19s20; rxnVolume*s12_def*s12*Rs4s7s8s9s10s13s14s15s16s17s19s20;
  s6_0015: s6 + Rs3s4s5s7s8s9s10s13s14s15s16s17s19s20 => Rs3s4s5s6s7s8s9s10s13s14s15s16s17s19s20; rxnVolume*s6_def*s6*Rs3s4s5s7s8s9s10s13s14s15s16s17s19s20;
  s11_0018: s11 + Rs4s6s7s8s9s10s13s14s15s16s17s19s20 => Rs4s6s7s8s9s10s11s13s14s15s16s17s19s20; rxnVolume*s11_def*s11*Rs4s6s7s8s9s10s13s14s15s16s17s19s20;
  s12_0037: s12 + Rs4s6s7s8s9s10s13s14s15s16s17s19s20 => Rs4s6s7s8s9s10s12s13s14s15s16s17s19s20; rxnVolume*s12_def*s12*Rs4s6s7s8s9s10s13s14s15s16s17s19s20;
  s11_0019: s11 + Rs3s4s5s6s7s8s9s10s13s14s15s16s17s19s20 => Rs3s4s5s6s7s8s9s10s11s13s14s15s16s17s19s20; rxnVolume*s11_def*s11*Rs3s4s5s6s7s8s9s10s13s14s15s16s17s19s20;
  s5_0028: s5 + Rs4s6s7s8s9s10s11s13s14s15s16s17s19s20 => Rs4s5s6s7s8s9s10s11s13s14s15s16s17s19s20; rxnVolume*s5_def*s5*Rs4s6s7s8s9s10s11s13s14s15s16s17s19s20;
  s12_0038: s12 + Rs4s6s7s8s9s10s11s13s14s15s16s17s19s20 => Rs4s6s7s8s9s10s11s12s13s14s15s16s17s19s20; rxnVolume*s12_def*s12*Rs4s6s7s8s9s10s11s13s14s15s16s17s19s20;
  s3_0009: s3 + Rs4s5s6s7s8s9s10s11s13s14s15s16s17s19s20 => Rs3s4s5s6s7s8s9s10s11s13s14s15s16s17s19s20; rxnVolume*s3_def*s3*Rs4s5s6s7s8s9s10s11s13s14s15s16s17s19s20;
  s12_0039: s12 + Rs4s5s6s7s8s9s10s11s13s14s15s16s17s19s20 => Rs4s5s6s7s8s9s10s11s12s13s14s15s16s17s19s20; rxnVolume*s12_def*s12*Rs4s5s6s7s8s9s10s11s13s14s15s16s17s19s20;
  s12_0040: s12 + Rs3s4s5s6s7s8s9s10s11s13s14s15s16s17s19s20 => Rs3s4s5s6s7s8s9s10s11s12s13s14s15s16s17s19s20; rxnVolume*s12_def*s12*Rs3s4s5s6s7s8s9s10s11s13s14s15s16s17s19s20;
  s6_0016: s6 + Rs4s7s8s9s10s12s13s14s15s16s17s19s20 => Rs4s6s7s8s9s10s12s13s14s15s16s17s19s20; rxnVolume*s6_def*s6*Rs4s7s8s9s10s12s13s14s15s16s17s19s20;
  s11_0020: s11 + Rs4s6s7s8s9s10s12s13s14s15s16s17s19s20 => Rs4s6s7s8s9s10s11s12s13s14s15s16s17s19s20; rxnVolume*s11_def*s11*Rs4s6s7s8s9s10s12s13s14s15s16s17s19s20;
  s5_0029: s5 + Rs4s6s7s8s9s10s11s12s13s14s15s16s17s19s20 => Rs4s5s6s7s8s9s10s11s12s13s14s15s16s17s19s20; rxnVolume*s5_def*s5*Rs4s6s7s8s9s10s11s12s13s14s15s16s17s19s20;
  s3_0010: s3 + Rs4s5s6s7s8s9s10s11s12s13s14s15s16s17s19s20 => Rs3s4s5s6s7s8s9s10s11s12s13s14s15s16s17s19s20; rxnVolume*s3_def*s3*Rs4s5s6s7s8s9s10s11s12s13s14s15s16s17s19s20;
  s4_0002: s4 + R => Rs4; rxnVolume*s4_def*s4*R;
  s17_0001: s17 + R => Rs17; rxnVolume*s17_def*s17*R;
  s20_0002: s20 + R => Rs20; rxnVolume*s20_def*s20*R;
  s17_0002: s17 + Rs4 => Rs4s17; rxnVolume*s17_def*s17*Rs4;
  s20_0003: s20 + Rs4 => Rs4s20; rxnVolume*s20_def*s20*Rs4;
  s4_0003: s4 + Rs20 => Rs4s20; rxnVolume*s4_def*s4*Rs20;
  s17_0003: s17 + Rs20 => Rs17s20; rxnVolume*s17_def*s17*Rs20;
  s17_0004: s17 + Rs4s20 => Rs4s17s20; rxnVolume*s17_def*s17*Rs4s20;
  s16_0006: s16 + Rs4s20 => Rs4s16s20; rxnVolume*s16_def*s16*Rs4s20;

  // Unit definitions:
  unit per_M_per_s = litre / (mole * second);
end
